Simulations: Version=199
  Experiment
    Factors
      Permutation
        Factor: Specification=[Weather].FileName = Te Puke.met, Kerikeri.met
    Simulation sensibility test
      Weather: FileName=Kerikeri.met
      Clock: Start=2007-01-01; End=2024-06-30
      Summary
      SoilArbitrator Soil Arbitrator
      Zone Block: Area=1; Slope=0; AspectAngle=0; Altitude=50
        Report: EventNames=[Clock].DoReport
          VariableNames:
            [KiwiFruit].Leaf.Wt
            [KiwiFruit].Leaf.Canopy.Height
            [KiwiFruit].Leaf.NodeNumber
            [Clock].Today
            [KiwiFruit].Phenology.Stage
            [KiwiFruit].Phenology.CurrentStageName
            [KiwiFruit].Phenology.ProportionBB
            [KiwiFruit].Phenology.BrokenBuds
            [KiwiFruit].Phenology.BudBurstDOY
            [KiwiFruit].Phenology.BrokenBuds.Vegetative.BrokenBuds.Max_buds
            [KiwiFruit].Phenology.EndoDormancy.ProgressThroughPhase
            [KiwiFruit].Phenology.EcoDormancy.ProgressThroughPhase
            [KiwiFruit].Phenology.ProportionCU
            [KiwiFruit].Phenology.MaxBBP
            [KiwiFruit].Phenology.AccumulatedChillingPreEndo
        Report Stages
          VariableNames:
            [KiwiFruit].Phenology.MaxBBP
            [KiwiFruit].Phenology.FloweringDOY
        Plant KiwiFruit
        Fertiliser
        SurfaceOrganicMatter: InitialResidueName=wheat_stubble; InitialResidueType=wheat; InitialResidueMass=500; InitialStandingFraction=0; InitialCPR=0; InitialCNR=100
        Irrigation
        MicroClimate: a_interception=0; b_interception=1; c_interception=0; d_interception=0; SoilHeatFluxFraction=0.4; MinimumHeightDiffForNewLayer=0; NightInterceptionFraction=0.5; ReferenceHeight=2
        Manager ReportOnEvents
```csharp
using Models.Core;
using System;
using Models.PMF.Phen;

namespace Models
{
    [Serializable]
    public class Script : Model
    {
        //> Links to other Apsim models
        [Link(ByName = true)] Report stages; 
        
        public string StageName {get; set;}
        
        private void setAndOutput(PhaseChangedType change)
        {
           StageName = change.StageName;
    	   stages.DoOutput();
        }
        
        [EventSubscribe("PhaseChanged")]
        private void OnPhaseChanged(object sender, PhaseChangedType change)
        {
        	if (change.StageName == "StartFlowering") {setAndOutput(change);}

        }

	}
}
```
        Manager Reset on date
          ResetWater = True
          ResetNutrients = True
          ResetSOM = True
```csharp
using Models.Soils.Nutrients;
using APSIM.Shared.Utilities;
using Models.Surface;
using Models.Utilities;
using Models.Soils.Nutrients;
using Models.Soils;
using Models.PMF;
using Models.Core;
using System;
using System.Linq;
using Models.Interfaces;
using Models.PMF.Phen;
using System.Diagnostics;

namespace Models
{
    [Serializable]
    public class Script : Model
    {
        [Link] private Clock Clock;
        [Link] private Plant Wheat;
        [Link] private ISoilWater SoilWater;
        [Link] private Nutrient nutrient;
        [Link] private SurfaceOrganicMatter SOM;
        [Link] private Summary Summary;

        [Description("Reset Water? (Yes or No)")]
        public bool ResetWater {get;set;}

        [Description("Reset Soil Nutrients ? (Yes or No)")]
        public bool ResetNutrients {get;set;}

        [Description("Reset Surface Organic Matter? (Yes or No)")]
        public bool ResetSOM {get;set;}

        [EventSubscribe("PhaseChanged")]
        private void OnDoManagement(object sender, PhaseChangedType pct)
        {
            if (pct.StageName == "StartGrowth")
            {
                if (ResetWater == true)
                {
                    Summary.WriteMessage(this, "Reset Water", MessageType.Diagnostic);
                    SoilWater.Reset();
                }
                if (ResetNutrients == true)
                {
                    Summary.WriteMessage(this, "Reset Nitrogen", MessageType.Diagnostic);
                    nutrient.Reset();
                }
                if (ResetSOM == true)
                {
                    Summary.WriteMessage(this, "Reset Surface OM", MessageType.Diagnostic);
                    SOM.Reset();
                }
            }
        }
    }
}
```
        Soil: Latitude=0; Longitude=0
          LayerStructure: Thickness=[200, 200, 200, 200, 200, 200, 300, 300, 400, 800]
          Chemical: Thickness=[100, 200, 300, 300, 300, 300]; PH=[6.6, 6.2, 5.7, 5.5, 5.5, 5.5]; PHUnits=Water
          Water: Thickness=[300, 300, 300, 300, 300, 300, 1200]; InitialValues=[0.3, 0.21, 0.18, 0.17, 0.17, 0.17, 0.17]; FilledFromTop=false
          WaterBalance SoilWater: SummerDate=1-Nov; SummerU=9; SummerCona=4.4; WinterDate=1-Apr; WinterU=9; WinterCona=4.4; DiffusConst=88; DiffusSlope=35.4; Salb=0.3; CN2Bare=68; CNRed=20; CNCov=0.8; DischargeWidth=0; CatchmentArea=0; PSIDul=-100
            Thickness  SWCON  KLAT
            300        0.55   0
            300        0.55   0
            300        0.55   0
            300        0.55   0
            300        0.1    0
            300        0.02   0
            400        0.02   0
            800        0      0
          Organic: FOMCNRatio=30; CarbonUnits=Total
            Thickness  Carbon  SoilCNRatio  FBiom  FInert  FOM
            100        1.82    11.5         0.025  0.3     1243.931
            200        1.47    11.5         0.025  0.4     833.832
            300        1.2     11.5         0.015  0.75    457.617
            300        1.03    11.5         0.01   0.9     251.145
            300        0.47    11.5         0.01   0.96    137.831
            300        0.47    11.5         0.01   0.96    75.644
          OutputLayers: Thickness=[300, 300, 300, 300, 300, 300]
          Solute NO3: Thickness=[100, 200, 300, 300, 300, 300]; InitialValues=[217, 15, 1.66667, 1.66667, 0, 0]; InitialValuesUnits=ppm; WaterTableConcentration=0; D0=0; DepthConstant=0; MaxDepthSoluteAccessible=0; RunoffEffectivenessAtMovingSolute=0; MaxEffectiveRunoff=0
          Solute NH4: Thickness=[100, 200, 300, 300, 300, 300]; InitialValues=[0, 0, 0, 0, 0, 0]; InitialValuesUnits=ppm; WaterTableConcentration=0; D0=0; DepthConstant=0; MaxDepthSoluteAccessible=0; RunoffEffectivenessAtMovingSolute=0; MaxEffectiveRunoff=0
          Solute Urea: Thickness=[100, 200, 300, 300, 300, 300]; InitialValues=[0, 0, 0, 0, 0, 0]; InitialValuesUnits=kg/ha; WaterTableConcentration=0; D0=0; DepthConstant=0; MaxDepthSoluteAccessible=0; RunoffEffectivenessAtMovingSolute=0; MaxEffectiveRunoff=0
          Physical
            Thickness  ParticleSizeSand  ParticleSizeSilt  ParticleSizeClay  Rocks     BD  AirDry  LL15  DUL  SAT  KS
            300        5                 65                30                0.309221  1   0.15    0.15  0.3  0.4  100
            300        5                 65                30                0.309221  1   0.15    0.15  0.3  0.4  100
            300        5                 65                30                0.309221  1   0.15    0.15  0.3  0.4  50
            300        5                 65                30                0.309221  1   0.15    0.15  0.3  0.4  40
            300        5                 65                30                0.309221  1   0.15    0.15  0.3  0.4  40
            300        5                 65                30                0.309221  1   0.15    0.15  0.3  0.4  40
            1200       5                 65                30                0.309221  1   0.15    0.15  0.3  0.4  40
            Rocks, ParticleSizeSand, ParticleSizeSilt, ParticleSizeClay source: Calculated
            SoilCrop KiwiFruitSoil: LL=[0.15, 0.15, 0.15, 0.15, 0.15, 0.15, 0.15]; KL=[1, 1, 1, 1, 1, 1, 1]; XF=[1, 1, 1, 1, 1, 1, 1]
          Nutrient
          SoilTemperature Temperature
        Manager AutomaticIrrigation
          allowIrrigation = True
          seasonStart = 1-Aug
          seasonEnd = 30-May
          seasonsAllocation = 1000
          triggerDeficit = 70
          targetDeficit = 95
          returndays = 3
          maximumAmount = 30
          depthPAWC = 650
```csharp
using Newtonsoft.Json;
using APSIM.Shared.Utilities;
using System.Xml.Serialization;
using Models.Soils;
using Models.PMF;
using Models.Core;
using System;
using System.Linq;
using Models.Interfaces;



        
namespace Models
{
    [Serializable] 
    [System.Xml.Serialization.XmlInclude(typeof(Model))]
    public class Script : Model
    {
        [Link] private ISummary summary;
        [Link] private Irrigation Irrigation;
        [Link] private Clock Clock;
        [Link] private Soil Soil;
        [Link(IsOptional = true)] private IPlant existingCrop;
        private DateTime StartDate;
        private DateTime EndDate;
        private double TopDUL;
        private double TopLL;
        private int nLayers;
        [Link]
        private IPhysical soilPhysical;
        [Link]
        private ISoilWater waterBalance;
        //Communication to other modules
       
        //User inputs from properties tab
        [Description("Turn irrigation on?")]
        public bool allowIrrigation { get; set; }
        [Description("Start of irrigation season (dd-MMM)")]
        public string seasonStart { get; set; }
        [Description("End of irrigation season (dd-MMM)")]
        public string seasonEnd { get; set; }
        [Description("Season allocation (mm)")]
        public double seasonsAllocation { get; set; }
        [Description("Deficit to trigger irrigation (% PAWC)")]
        public double triggerDeficit { get; set; }
        [Description("Deficit to stop irrigaton (% PAWC)")]
        public double targetDeficit { get; set; }
        [Description("Minimum days for irrigation to return")]
        public double returndays { get; set; }
        [Description("Maximum irrigation application (mm/day)")]
        public double maximumAmount { get; set; }
        [Description("Depth to calculate PAWC (mm)")]
        public double depthPAWC { get; set; }

        //Class members
        [JsonIgnore] public double TopSWdeficit { get; set; }
        [JsonIgnore] public double TopSWC { get; set; }
        [JsonIgnore] public double DaysSinceIrrigation { get; set; }
        [JsonIgnore] public double AmountToApply { get; set; }
        [JsonIgnore] public double SeasonAppliedAmount { get; set; }
        
        private bool IrrigationIsAllowed { get; set; }
        private bool SeasonIsOpen { get; set; }
        private bool CropIsActive { get; set; }
        private bool IrrigatorIsAvailable { get; set; }
        private bool SoilIsDry { get; set; }

    
        //Calculate static soil variables
        [EventSubscribe("StartOfSimulation")]
        private void OnStartOfSimulation(object sender, EventArgs e)
        {   
            //Set the season dates
            StartDate = DateTime.Parse(seasonStart + "-" + Clock.Today.Year.ToString());
            EndDate = DateTime.Parse(seasonEnd + "-" + Clock.Today.Year.ToString());
            
            //Can we irrigate at all?
            IrrigationIsAllowed = false; 
            if (allowIrrigation)
                IrrigationIsAllowed = true; 

            //Calculate soil water variables
            double depthFromSurface = 0.0;
            double fracLayer = 0.0;
            nLayers = soilPhysical.Thickness.Length;
            for (int layer = 0; layer < nLayers; layer++)
            {
                fracLayer = Math.Min(1.0, (depthPAWC - depthFromSurface) / soilPhysical.Thickness[layer]);
                TopLL += soilPhysical.LL15mm[layer] * fracLayer;
                TopDUL += soilPhysical.DULmm[layer] * fracLayer;
                depthFromSurface += soilPhysical.Thickness[layer];
                if (depthFromSurface >= depthPAWC)
                    layer = nLayers;
            }
        }
             
        //Determine daily requirement for irrigation
        [EventSubscribe("StartOfDay")]
        private void OnStartOfDay(object sender, EventArgs e)
        {
            //Can we irrigate today?          
            SeasonIsOpen = isBetween(Clock.Today, StartDate, EndDate);
            if (!SeasonIsOpen)
                SeasonAppliedAmount = 0;

            //Is there a crop in the ground that needs irrigation?
            CropIsActive = false;
            if ((existingCrop != null) && (existingCrop.IsAlive))
                CropIsActive = true;
            //if ((existingCrop.Phenology.Stage >= 3.0) && (existingCrop.Phenology.Stage < 6.0))
          
            //Is the irrigator available?
            IrrigatorIsAvailable = false;
            DaysSinceIrrigation += 1;
            if (DaysSinceIrrigation >= returndays)
                IrrigatorIsAvailable = true;
          
            //Is the soil dry enough to require irrigation?
            SoilIsDry = false;
            double depthFromSurface = 0.0;
            double fracLayer = 0.0;
            TopSWC = 0.0;
            for (int layer = 0; layer < nLayers; layer++)
            //for (int layer = 0; depthFromSurface < depthPAWC + soilPhysical.Thickness[layer]; layer++)
            {
                fracLayer = Math.Min(1.0, (depthPAWC - depthFromSurface) / soilPhysical.Thickness[layer]);
                TopSWC += waterBalance.SWmm[layer] * fracLayer;
                depthFromSurface += soilPhysical.Thickness[layer];
                if (depthFromSurface >= depthPAWC)
                    layer = nLayers;
            }
            
            TopSWdeficit = TopSWC - TopDUL;
            if (Math.Max(0.0, -TopSWdeficit) >= (TopDUL - TopLL) * (100 - triggerDeficit) / 100)
                SoilIsDry = true;
                
            //Are all the conditions ratifying irrigation
            if (IrrigationIsAllowed && SeasonIsOpen && CropIsActive && IrrigatorIsAvailable && SoilIsDry)
            {
                //Lets bloody well irrigate then!!!!
                AmountToApply = TopDUL * targetDeficit / 100 - TopSWC;
                AmountToApply = Math.Max(0.0, Math.Min(AmountToApply, seasonsAllocation - SeasonAppliedAmount));
                AmountToApply = Math.Min(AmountToApply,maximumAmount);
                Irrigation.Apply(AmountToApply);
                DaysSinceIrrigation = 0;
                SeasonAppliedAmount += AmountToApply;
            }
        }
        
        ///Checks whether theDate is between iniDate and endDate (non-year specific)
        private bool isBetween(DateTime theDay, DateTime iniDate, DateTime endDate)
        {
            bool result = false;
            if (iniDate.DayOfYear < endDate.DayOfYear)
            {
                // period is within one year, ex: summer in the northern hemisphere
                if ((theDay.DayOfYear >= iniDate.DayOfYear) && (theDay.DayOfYear <= endDate.DayOfYear))
                    result = true;
            }
            else
            {
                // period goes over the end of the year, ex: summer in the southern hemisphere
                if ((theDay.DayOfYear >= iniDate.DayOfYear) || (theDay.DayOfYear <= endDate.DayOfYear))
                    result = true;
            }
            
            return result;
        }
    }
}
```
        Manager FactorLabels
          AGENT_NO = 999
          Lat = 999
          Lon = 999
          SoilStamp = SiltLoam
          GCM = ERA
          RCP = ERA
          TS = BaseLine
```csharp
using Models.Soils;
using Models.Core;
using System;

namespace Models
{
    [Serializable]
    public class Script : Model
    {
        //> Links to other Apsim models
        [Link] Clock Clock;
        [Link] ISummary mySummary;

        //> User inputs from properties tab
        [Separator("Tags used to defined simulation factors")]
        [Description("Agent number: ")]
        public string AGENT_NO { get; set; }
        [Description("Latitude: ")]
        public string Lat { get; set; }
        [Description("Longitude: ")]
        public string Lon { get; set; }
        [Description("SoilStamp: ")]
        public string SoilStamp { get; set; }
        [Description("GCM: ")]
        public string GCM { get; set; }
        [Description("RCP: ")]
        public string RCP { get; set; }
        [Description("Time slice: ")]
        public string TS { get; set; }

        //> Internal variables
        private string someVar;
        
        [EventSubscribe("DoManagementCalculations")]
        private void OnDoManagementCalculations(object sender, EventArgs e)
        {
            // Sort out time slice classification
            if ((Clock.Today.Date.Year <= 2005))
            {
                TS = "Baseline";
            }
            else
            {
                TS = "Future";
            }
        }
    }
}
```
        Manager AutomaticFertiliser
          EachYear = True
          Dates = 30-nov, 15-apr
          UseCritNThreshold = False
          CritNThreshold = 50
          CritNDepth = 75
          Depth = 50
          Amount = 25
          FertiliserType = UreaN
```csharp
using APSIM.Core;
using Models.Soils.Nutrients;
using System;
using Models.Core;
using Models.Soils;
using Models.PMF;
using APSIM.Shared.Utilities;
using System.Linq;
using Models.Interfaces;

namespace Models
{
    [Serializable]
    public class Script : Model, IStructureDependency
    {
        [Link] private Clock clock;
        [Link] private Fertiliser fertiliser;
        [Link] private ISummary summary;
        [Link] private Soil soil;
        private Nutrient nutrient;
        [Link]
        private IPhysical soilPhysical;
        public IStructure Structure { private get; set; }
        
        


        [Separator("Fertiliser will be applied on the date(s) below")]
        [Description("Apply fertiliser on the same day(s) each year? If no, then must include the year of appliaction below")]
        public bool EachYear { get; set; }

        [Description("Dates for one or more fertiliser applications (dd-mmm or dd-mmm-yyyy) as a list with a comma between dates")]
        public string[] Dates { get; set; }

        [Separator("Test for the mineral N in the soil and don't apply the fertiliser if greater than X kgN/ha is stored in the soil above a depth of Y mm")]
        [Description("Use a critical soil mineral N to prevent application above a threshold?")]
        public bool UseCritNThreshold { get; set; }

        [Description("Don't add fertiliser if N in the soil to the depth below exceeds (kg/ha)")]
        public double CritNThreshold { get; set; }

        [Description("Depth to which the amount of N in the soil should be calculated (mm)")]
        public double CritNDepth { get; set; }

        [Separator("Fertiliser application details")]
        [Description("Depth at which to apply the fertiliser (mm)")]
        public double Depth { get; set; }

        [Description("Amount of fertiliser to apply (kg N /ha) per application")]
        public double Amount { get; set; }

        [Description("Fertiliser type - select from the list")]
        [Display(Type = DisplayType.FertiliserType)]public string FertiliserType { get; set; }


        [EventSubscribe("StartOfSimulation")]
        private void FindSoilNOrNutrient(object sender, EventArgs e)
        {
            nutrient =  Structure.Find<Nutrient>() as Nutrient;

            if (nutrient == null)
                throw new Exception(string.Format("Error in script {0}: Unable to find nutrient.", Name));
        }

        [EventSubscribe("DoManagement")]
        private void OnDoManagement(object sender, EventArgs e)
        {
            if (OnApplicationDate())
            {
                if (NContentBelowThreshold())
                    fertiliser.Apply(Amount, FertiliserType, Depth);
                else
                    summary.WriteMessage(this, "Skipping fertiliser application due to soil mineral N content being above critical threshold.", MessageType.Diagnostic);
            }
        }

        /// <summary>Checks if today's date is one of the specified fertiliser application dates.</summary>
        private bool OnApplicationDate()
        {
            if (EachYear)
                return Dates.Any(d => DateUtilities.DatesEqual(d, clock.Today));
            
            DateTime[] dates = Dates.Select(d => DateTime.ParseExact(d, "d-MMM-yyyy", null)).ToArray();
            return dates.Any(d => SameDate(d, clock.Today));
        }

        /// <summary>Checks if N content in soil is below critical threshold.</summary>
        private bool NContentBelowThreshold()
        {
            if (!UseCritNThreshold)
                return true;
            
            double[] weights = GetLayerWeights();
            double cumSoilN = 0;

            for (int i = 0; i < soilPhysical.Thickness.Length; i++)
            {
                cumSoilN += weights[i] * nutrient.MineralN[i];
            }

            return cumSoilN <= CritNThreshold;
        }

        private double[] GetLayerWeights()
        {
            double[] weights = new double[soilPhysical.Thickness.Length];
            double cumDepth = 0;

            for (int i = 0; i < soilPhysical.Thickness.Length; i++)
            {
                cumDepth += soilPhysical.Thickness[i];
                if (cumDepth < CritNDepth)
                    weights[i] = 1;
                else if (cumDepth - soilPhysical.Thickness[i] <= CritNDepth)
                    weights[i] = (CritNDepth - (cumDepth - soilPhysical.Thickness[i])) / soilPhysical.Thickness[i];
                else
                    weights[i] = 0;
            }

            return weights;
        }

        private bool SameDate(DateTime d1, DateTime d2)
        {
            return d1.Year == d2.Year && d1.DayOfYear == d2.DayOfYear;
        }
    }
}
```
        Manager WaterStatus
          DepthToMonitorFollowRoots = False
          MinimumDepth = 0
          DepthToMonitor = 600
```csharp
using APSIM.Core;
using Models.Interfaces;
using Models.PMF.Organs;
using APSIM.Shared.Utilities;
using System.Xml.Serialization;
using Models.Soils;
using Models.PMF;
using Models.Core;
using System;
using System.Linq;
using Models.Soils.Nutrients;
using Models.PMF.Phen;
using Newtonsoft.Json;

        
namespace Models
{
    [Serializable] 
    [System.Xml.Serialization.XmlInclude(typeof(Model))]
    public class Script : Model, IStructureDependency
    {      
        [Link] private Zone myZone;
        [Link] private Clock Clock;
        [Link] private ISummary summary;
        [Link] private IPhysical soilPhysical;
        [Link] private ISoilWater waterBalance;
        private int indexBottomOfMonitoredLayer;
        private double fractionBottomOfMonitoredLayer;
        private double lowerLimitOfMonitoredLayer;
        private double upperLimitOfMonitoredLayer;
        private double depthOfMonitoredLayer;
        public IStructure Structure { private get; set; }

        //User inputs from properties tab
        [Description("Depth to monitor soil moisture is based on root depth?")]
        public bool DepthToMonitorFollowRoots { get; set; }
        [Description("Minimum depth to monitor soil moisture (mm):")]
        [Display(VisibleCallback = "usingRootDepth")]
        public double MinimumDepth { get; set; }
        [Description("Depth to monitor soil moisture (mm):")]
        [Display(VisibleCallback = "usingGivenDepth")]
        public double DepthToMonitor { get; set; }

        //Class members
        [JsonIgnore][Units("mm")] public double SoilWaterContentOfMonitoredLayer { get; set; }
        [JsonIgnore][Units("mm")] public double SoilAvailableWaterOfMonitoredLayer { get; set; }
        [JsonIgnore][Units("mm")] public double RelativeSoilMoistureOfMonitoredLayer { get; set; }
        [JsonIgnore][Units("mm")] public double SoilWaterDeficitOfMonitoredLayer { get; set; }
        //[JsonIgnore][Units("dry/moist/wet")] public string SoilStatusOfMonitoredLayer { get; set; }
        [JsonIgnore][Units("0 or 1")] public double SoilStatusOfMonitoredLayer { get; set; }


        
        private bool usingRootDepth  { get { return DepthToMonitorFollowRoots; } }
        private bool usingGivenDepth { get { return !DepthToMonitorFollowRoots; } }



        

        [EventSubscribe("StartOfSimulation")]
        private void OnStartOfSimulation(object sender, EventArgs e)
        {
            // check the depth to monitor
            depthOfMonitoredLayer = DepthToMonitor;
            if (DepthToMonitorFollowRoots)
            {
                depthOfMonitoredLayer = MinimumDepth;
            }

            // get some soil water variables
            getMonitoredLayerParams(depthOfMonitoredLayer);
       }

       //[EventSubscribe("StartOfDay")]
        [EventSubscribe("EndOfDay")]
        private void OnStartOfDay(object sender, EventArgs e)
        {
            // check whether depth to monitor varies
            if (DepthToMonitorFollowRoots)
            {
                // check root depth
                double currentRootDepth = 0.0;
                foreach (Plant species in myZone.FindAllChildren<Plant>().OfType<IModel>().ToList())
                {
                    if (species.IsAlive)
                    {
                        double thisRootDepth = (double)Structure.Get("[" + species.Name + "].Root.Depth", relativeTo: myZone);
                        currentRootDepth = Math.Max(currentRootDepth, thisRootDepth);
                    }
                }
                currentRootDepth = Math.Min(MinimumDepth, currentRootDepth);
                
                if (Math.Abs(currentRootDepth - depthOfMonitoredLayer) > 0.001)
                { // update some soil water variables
                    depthOfMonitoredLayer = currentRootDepth;
                    getMonitoredLayerParams(depthOfMonitoredLayer);
                }
            }

            // get current soil moisture
            SoilWaterContentOfMonitoredLayer = 0.0;
            for (int layer = 0; layer < indexBottomOfMonitoredLayer; layer++)
            {
                SoilWaterContentOfMonitoredLayer += waterBalance.SWmm[layer];
            }

            SoilWaterContentOfMonitoredLayer += waterBalance.SWmm[indexBottomOfMonitoredLayer] * fractionBottomOfMonitoredLayer;

            // compute soil water deficit and available water
            SoilWaterDeficitOfMonitoredLayer = SoilWaterContentOfMonitoredLayer - upperLimitOfMonitoredLayer;
            SoilAvailableWaterOfMonitoredLayer = SoilWaterContentOfMonitoredLayer - lowerLimitOfMonitoredLayer;
            RelativeSoilMoistureOfMonitoredLayer = SoilAvailableWaterOfMonitoredLayer/(upperLimitOfMonitoredLayer - lowerLimitOfMonitoredLayer);

            // check the water status
            if (RelativeSoilMoistureOfMonitoredLayer >= 1.0)
            {
                //SoilStatusOfMonitoredLayer = "wet";
                SoilStatusOfMonitoredLayer = 1.0;
            }
            else if (RelativeSoilMoistureOfMonitoredLayer >= 0.5)
            {
                //SoilStatusOfMonitoredLayer = "moist";
                SoilStatusOfMonitoredLayer = 0.0;
            }
            else
            {
                //SoilStatusOfMonitoredLayer = "dry";
                SoilStatusOfMonitoredLayer = 0.0;
            }
        }
              
        
        ///<summary>Computes a selection of soil params over the given depth.</summary>
        private void getMonitoredLayerParams(double depthToCompute)
        {
            // Calculate some soil water variables
            double depthFromSurface = 0.0;
            lowerLimitOfMonitoredLayer = 0.0;
            upperLimitOfMonitoredLayer = 0.0;
            for (int layer = 0; layer < soilPhysical.Thickness.Length; layer++)
            {
                fractionBottomOfMonitoredLayer = Math.Min(1.0, (depthToCompute - depthFromSurface) / soilPhysical.Thickness[layer]);
                lowerLimitOfMonitoredLayer += soilPhysical.LL15mm[layer] * fractionBottomOfMonitoredLayer;
                upperLimitOfMonitoredLayer += soilPhysical.DULmm[layer] * fractionBottomOfMonitoredLayer;
                depthFromSurface += soilPhysical.Thickness[layer];
                if (depthFromSurface >= depthToCompute)
                {
                    indexBottomOfMonitoredLayer = layer;
                    layer = soilPhysical.Thickness.Length;
                }
            }
        }
       
    }
}
```
        Manager SowDateCv
          InitialRootDepth = 5
          CropToSow = Heyward_KK
          SowingDate = 05/25/2007 00:00:00
```csharp
using Models.Soils;
using System;
using Models.Core;
using System.Collections.Generic;
using System.Text;
using Models.PMF;
using Models;
using System.Xml.Serialization;
using APSIM.Shared.Utilities;
using System.Data;
using Models.PMF.Interfaces;
using Models.Surface;

namespace Models
{
    [Serializable] 
    //[System.Xml.Serialization.XmlInclude(typeof(Model))]
    public class Script : Model
    {
        [Link] Plant KiwiFruit;
        [Link] Clock Clock;
        [Link] Zone zone;
        [Link] Simulation Simulation;
        [Link] SurfaceOrganicMatter SurfOM;
        
                
        [Description("Initial Root Depth")]
        public double InitialRootDepth { get; set; }
        [Description("Sown Crop")]
        public string CropToSow { get; set; }
        [Description("Sowing Date")]
        public DateTime SowingDate { get; set; }
        
        
        [EventSubscribe("DoManagement")]
        private void OnDoManagement(object sender, EventArgs e)
        {
            if (Clock.Today.Date == SowingDate)
            {
                KiwiFruit.Sow(cultivar: CropToSow, population: 9, depth: InitialRootDepth, rowSpacing: 500);}            
            
            
        }
    }
}
```
        Manager BudNumber (disabled)
          MaxBudNum = 12.5
```csharp
using APSIM.Core;
using Newtonsoft.Json;
using System;
using Models.Core;
using System.Collections.Generic;
using System.Text;
using Models.PMF;
using Models;
using System.Xml.Serialization;
using APSIM.Shared.Utilities;
using System.Data;
using Models.PMF.Interfaces;
using Models.Surface;
using Models.Soils;

namespace Models
{
    [Serializable] 
    //[System.Xml.Serialization.XmlInclude(typeof(Model))]
    public class Script : Model, IStructureDependency
    {
        [Link] private Plant KiwiFruit;
        [Link] private Clock Clock;
        [Link] private Zone zone;
        public IStructure Structure { private get; set; }

        
        [Description("MaximumBudNum")]
        public double MaxBudNum { get; set; }
        
        bool FirstDay {get; set;}


        

        [EventSubscribe("StartOfSimulation")]
        private void OnSimulationCommencing(object sender, EventArgs e)
        {
        FirstDay = false;
        }
        
        [EventSubscribe("DoManagement")]
        private void OnDoManagement(object sender, EventArgs e)
        {
            if (FirstDay == false)
            {
                FirstDay = true;

                object ResetValue = MaxBudNum;
                Structure.Set("[KiwiFruit].Phenology.BrokenBuds.Vegetative.BrokenBuds.Max_buds.FixedValue", ResetValue, relativeTo: zone); 
            }          
        }
    }
}
```
        AgriChemical
        Operations
          2020-08-30  [AgriChemical].Apply()
        BiomassRemovalEvents OnPrune: NameOfPlantToRemoveFrom=KiwiFruit; RemovalType=3
          BiomassRemovalFractions:
            PlantName  OrganName  TypeString  LiveToRemove  DeadToRemove  LiveToResidue  DeadToResidue
            KiwiFruit  Trunk      Pruning     0             0             0              0
            KiwiFruit  Leaf       Pruning     0             0             0              0
            KiwiFruit  Stem       Pruning     0             0             0              0
            KiwiFruit  Root       Pruning     0             0             0              0
            KiwiFruit  Fruit      Pruning     0             0             0              0
  DataStore
    ExcelInput ObsAllData: FileNames=[ObservAll.xlsx]; SheetNames=[BB, Flwr]
    PredictedObserved PredictedObservedBB: PredictedTableName=Report; ObservedTableName=BB; FieldNameUsedForMatch=SimulationName; FieldName2UsedForMatch=Clock.Today.Year; FieldName3UsedForMatch=KiwiFruit.Phenology.CurrentStageName; AllColumns=false
    PredictedObserved PredictedObservedMaxBB: PredictedTableName=Stages; ObservedTableName=BB; FieldNameUsedForMatch=SimulationName; FieldName2UsedForMatch=Clock.Today.Year; FieldName3UsedForMatch=KiwiFruit.Phenology.CurrentStageName; AllColumns=false
    PredictedObserved PredictedObservedFlowering: PredictedTableName=Stages; ObservedTableName=Flwr; FieldNameUsedForMatch=SimulationName; FieldName2UsedForMatch=Clock.Today.Year; FieldName3UsedForMatch=KiwiFruit.Phenology.CurrentStageName; AllColumns=false
    ExcelInput HC_BB_Flwr: FileNames=[HC_Observations.xlsx]; SheetNames=[BB-HC, Flwr-HC]
    PredictedObserved PredictedObservedBB-HC: PredictedTableName=Report; ObservedTableName=BB-HC; FieldNameUsedForMatch=SimulationName; FieldName2UsedForMatch=Clock.Today.Year; FieldName3UsedForMatch=KiwiFruit.Phenology.CurrentStageName; AllColumns=false
    PredictedObserved PredictedObservedMaxBBHC: PredictedTableName=Stages; ObservedTableName=BB-HC; FieldNameUsedForMatch=SimulationName; FieldName2UsedForMatch=Clock.Today.Year; FieldName3UsedForMatch=KiwiFruit.Phenology.CurrentStageName; AllColumns=false
    ExcelInput Yield: FileNames=[Yield.xlsx]; SheetNames=[SingleBerryFW, SingleBerryDW, SingleBerryDMC]
    PredictedObserved PredictedObserved_Fruit: PredictedTableName=Report; ObservedTableName=SingleBerryFW; FieldNameUsedForMatch=SimulationName; FieldName2UsedForMatch=Clock.Today.Year; FieldName3UsedForMatch=KiwiFruit.Phenology.CurrentStageName; AllColumns=false
  Folder Replacements
    Plant KiwiFruit: PlantType=KiwiFruit
      BiomassArbitrator Arbitrator
        Memo
          The partitioning of biomass to fodder beet organs follows a "Relative Allocation" routine (see Arbitrator module documentation) guided by coefficients derived from the October sowing date data of the test dataset
        PlantNutrientsDelta Carbon
        PlantNutrientsDelta Nitrogen
      RootUptakesArbitrator
      Phenology
        LinearInterpolationFunction ThermalTime
          XYPairs: X=[7, 17, 25, 35]; Y=[0, 1, 1, 0]
          VariableReference XValue: VariableName=[IWeather].MeanT
        LinearInterpolationFunction HCSensitivityChill
          XYPairs
            X=[0, 100, 200, 300, 400, 500, 600, 700, 800, 900, 1000, 1100, 1200, 1284, 1331, 1378.9, 1426, 1473, 1520, 1600, 1700, 1800, 1900]
            Y=[0.955, 0.955, 0.955, 0.955, 0.955, 0.955, 0.955, 0.955, 0.955, 0.955, 0.955, 0.955, 0.955, 0.957, 0.964, 0.981, 0.995, 0.999, 1, 1, 1, 1, 1]
          VariableReference XValue: VariableName=[Phenology].ChillingAtHC
        LinearInterpolationFunction HCSensitivityHeat
          XYPairs
            X=[0, 100, 200, 300, 400, 500, 600, 700, 800, 900, 1000, 1426, 1478, 1600, 1700, 1800, 1900]
            Y=[0, 0, 0, 0, 0, 0, 0, 0, 0, 0, 0, 0, 0.57, 0.6, 0.6, 0.6, 0.6]
          VariableReference XValue: VariableName=[Phenology].ChillingAtHC
        SubDailyInterpolation PaulsModel: agregationMethod=1
          XYPairs Response
            X=[-3, 0, 3, 6, 9, 12, 15, 18, 21, 24, 27, 30, 33]
            Y=[-0.89, 0, 0.61, 0.93, 0.98, 0.74, 0.21, -0.59, -1.69, -3, -4.7, -6.7, -8.9]
          HourlySinPpAdjusted InterpolationMethod
        SubDailyInterpolation ChillModelHourly: agregationMethod=1
          XYPairs Response
            X=[-3, -2, -1, 0, 1, 3, 4, 6, 7, 9, 10, 12, 14.5, 15, 20, 25, 30, 35]
            Y=[0, 0, 0, 0, 0.26, 0.66, 0.81, 0.97, 1, 0.93, 0.84, 0.54, 0, 0, 0, 0, 0, 0]
          HourlySinPpAdjusted InterpolationMethod
        SubDailyInterpolation HeatModelHourlyBB: agregationMethod=1
          WangEngelTempFunction Response: MinTemp=3.79; OptTemp=21.8; MaxTemp=24.5; RefTemp=21.8; MaximumTemperatureWeighting=0; Units=GDH
          HourlySinPpAdjusted InterpolationMethod
        SubDailyInterpolation HeatModelHourlyFlwr: agregationMethod=1
          WangEngelTempFunction Response: MinTemp=8.7; OptTemp=25.48; MaxTemp=31.65; RefTemp=25.48; MaximumTemperatureWeighting=0; Units=GDH
          HourlySinPpAdjusted InterpolationMethod
        SubDailyInterpolation HeatModelHourlyFruit: same as Replacements.KiwiFruit.Phenology.HeatModelHourlyFlwr
        PhaseLookup ProportionBB
          PhaseLookupValue StartEndoToFruitMature: Start=StartEndo; End=FruitMature
            AddFunction PBBControlHC
              MultiplyFunction ControlFraction
                Constant C1: FixedValue=0.0003
                AccumulateFunctionGeneral Sum: AccumulateToday=false; AccumulateEventName=[Clock].StartOfDay; StartDate=19-Mar; EndDate=1-Aug; ReduceStageName=FruitMature; FractionRemovedOnStage=1; FractionRemovedOnEvent=0; FractionRemovedOnDate=0; FractionRemovedOnCut=0; FractionRemovedOnHarvest=0; FractionRemovedOnGraze=0; FractionRemovedOnPrune=0
                  VariableReference HourlyTemp: VariableName=[Phenology].ChillModelHourly
              LessThanFunction HCFraction
                Constant Zero: FixedValue=0
                VariableReference ChillingAtHC: VariableName=[Phenology].ChillingAtHC
                MultiplyFunction HCEffect
                  SubtractFunction
                    Constant one: FixedValue=1
                    VariableReference HCSensitivityChill: VariableName=[Phenology].HCSensitivityChill
                  DivideFunction
                    Constant C2: FixedValue=10000
                    AccumulateFunctionGeneral Sum: same as Replacements.KiwiFruit.Phenology.ProportionBB.StartEndoToFruitMature.PBBControlHC.ControlFraction.Sum
                Constant Zeroo: FixedValue=0
        PhaseLookup BrokenBuds
          PhaseLookupValue Dormant: Start=StartEndo; End=EndChilling
            Constant Zero: FixedValue=0
          PhaseLookupValue Vegetative: Start=EndChilling; End=FruitMature
            MultiplyFunction
              Constant TotalDormantBuds: FixedValue=27
                Memo
                  A functional–structural kiwifruit vine model integrating architecture, carbon dynamics and effects of the environment

                  P.759 (average number of buds along canes with different lengths)

                  Fig.8.A, average number of nodes on one shoot ~ 13
              SigmoidFunction
                AccumulateFunctionGeneral XValue: AccumulateToday=false; AccumulateEventName=[Clock].StartOfDay; StartStageName=EndChilling; EndStageName=EndFlowering; ReduceStageName=FruitMature; FractionRemovedOnStage=1; FractionRemovedOnEvent=0; FractionRemovedOnDate=0; FractionRemovedOnCut=0; FractionRemovedOnHarvest=0; FractionRemovedOnGraze=0; FractionRemovedOnPrune=0
                  VariableReference HourlyTemp: VariableName=[Phenology].HeatModelHourlyFlwr
                VariableReference Ymax: VariableName=[Phenology].MaxBBP
                Constant Xo: FixedValue=450
                Constant b: FixedValue=50
        GenericPhase ZeroPhase: Start=ModelInitialisation; End=StartEndo; IsEmerged=false
          Memo
            It is necessary to have a phase before Dormancy otherwise the rewind doesn't work
          VariableReference Progression: VariableName=[Phenology].ThermalTime
          Constant Target: FixedValue=0; Units=oCd
        ParallelPhaseStart: StartStage=2; IsInPhase=false
          VariableReference Progression: VariableName=[Phenology].HeatModelHourlyFlwr
          Constant Target: FixedValue=550; Units=GDH
        GenericPhase EndoDormancy: Start=StartEndo; End=EndChilling; IsEmerged=true
          Memo
            It is necessary to have a phase before Dormancy otherwise the rewind doesn't work
          VariableReference Progression: VariableName=[Phenology].ChillModelHourly
          SubtractFunction Target
            MultiplyFunction HCEffect
              Constant FixedTarget: FixedValue=1689.3
              LessThanFunction
                Constant Zero: FixedValue=0
                VariableReference ChillingAtHC: VariableName=[Phenology].ChillingAtHC
                VariableReference HCSensitivityChill: VariableName=[Phenology].HCSensitivityChill
                Constant One: FixedValue=1
            VariableReference AccumulatedChillingPreEndo: VariableName=[Phenology].AccumulatedChillingPreEndo
        GenericPhase EcoDormancy: Start=EndChilling; End=BudBreak; IsEmerged=true
          VariableReference Progression: VariableName=[Phenology].HeatModelHourlyBB
          MultiplyFunction Target
            Constant FixedTarget: FixedValue=101.29; Units=oC hours
            LessThanFunction
              Constant Zero: FixedValue=0
              VariableReference ChillingAtHC: VariableName=[Phenology].ChillingAtHC
              VariableReference HCSensitivityHeat: VariableName=[Phenology].HCSensitivityHeat
              Constant One: FixedValue=1
        GenericPhase EarlyLeaf: Start=BudBreak; End=StartFlowering; IsEmerged=true
          VariableReference Progression: VariableName=[Phenology].HeatModelHourlyFlwr
          Constant Target: FixedValue=200; Units=GDH
        GenericPhase Flowering: Start=StartFlowering; End=EndFlowering; IsEmerged=true
          VariableReference Progression: VariableName=[Phenology].HeatModelHourlyFlwr
          Constant Target: FixedValue=400; Units=GDH
        GenericPhase RapidBerryGrowth: Start=EndFlowering; End=StartFruitGrowth; IsEmerged=true
          VariableReference Progression: VariableName=[Phenology].HeatModelHourlyFlwr
          Constant Target: FixedValue=300; Units=GDH
        GenericPhase FruitGrowth: Start=StartFruitGrowth; End=FruitMaxSize; IsEmerged=true
          VariableReference Progression: VariableName=[Phenology].HeatModelHourlyFlwr
          Constant Target: FixedValue=850; Units=GDH
        GenericPhase FruitMaturity: Start=FruitMaxSize; End=FruitMature; IsEmerged=true
          VariableReference Progression: VariableName=[Phenology].ChillModelHourly
          Constant Target: FixedValue=250; Units=GDH
        GenericPhase LeafDrop: Start=FruitMature; End=BareTree; IsEmerged=true
          VariableReference Progression: VariableName=[Phenology].HeatModelHourlyFlwr
          LinearInterpolationFunction Target
            XYPairs: X=[0, 11, 11.5]; Y=[0, 10, 20000]
            VariableReference XValue: VariableName=[Phenology].Photoperiod
        GotoPhase: Start=BareTree; IsEmerged=false; PhaseNameToGoto=ZeroPhase; RemovalType=3
        AccumulateFunctionGeneral AccumulatedChillingPreEndo: AccumulateToday=false; AccumulateEventName=[Clock].DoReportCalculations; NameOfPlantToLink=KiwiFruit; EndStageName=StartEndo; StartDate=19-Mar; ReduceStageName=BudBreak; FractionRemovedOnStage=1; FractionRemovedOnEvent=0; FractionRemovedOnDate=0; FractionRemovedOnCut=0; FractionRemovedOnHarvest=0; FractionRemovedOnGraze=0; FractionRemovedOnPrune=0
          VariableReference HourlyChill: VariableName=[Phenology].ChillModelHourly
        AccumulateFunctionGeneral AccumulatedChilling: AccumulateToday=false; AccumulateEventName=[Clock].DoReportCalculations; NameOfPlantToLink=KiwiFruit; EndStageName=EndChilling; StartDate=19-Mar; ReduceStageName=BudBreak; FractionRemovedOnStage=1; FractionRemovedOnEvent=0; FractionRemovedOnDate=0; FractionRemovedOnCut=0; FractionRemovedOnHarvest=0; FractionRemovedOnGraze=0; FractionRemovedOnPrune=0
          VariableReference HourlyChill: VariableName=[Phenology].ChillModelHourly
        OnEventFunctionHC ChillingAtHC: SetEvent=[AgriChemical].Sprayed; ReSetEvent=BudBrerak
          Constant PreEventValue: FixedValue=0
          VariableReference PostEventValue: VariableName=[Phenology].AccumulatedChilling
        OnEventFunction BudBurstDOY: SetEvent=BudBreak; ReSetEvent=EndFlowering
          Constant PreEventValue: FixedValue=0
          VariableReference PostEventValue: VariableName=[Clock].Today.DayOfYear
        OnEventFunction FloweringDOY: SetEvent=StartFlowering; ReSetEvent=EndFlowering
          Constant PreEventValue: FixedValue=0
          VariableReference PostEventValue: VariableName=[Clock].Today.DayOfYear
        OnEventFunction MaxBBP: SetEvent=StartFlowering; ReSetEvent=FruitMature
          Constant PreEventValue: FixedValue=0
          VariableReference PostEventValue: VariableName=[Phenology].ProportionBB
        ExpressionFunction VegetativeShootsLeaves: Expression=0.7 * [Phenology].BrokenBuds * (1 * [Leaf].LeafNumber)
        ExpressionFunction FruitingShootsLeaves: Expression=0.3 * [Phenology].BrokenBuds * (0.5*[Leaf].LeafNumber)
        ExpressionFunction TotalCaneLeaves
          Expression=[Phenology].VegetativeShootsLeaves + [Phenology].FruitingShootsLeaves
        Age: AnniversaryOnWinterSolstice=false
        AddFunction AgeDecimal
          VariableReference AgeInt: VariableName=[Phenology].Age
          DivideFunction Decimal
            VariableReference DOY: VariableName=[Weather].DaysSinceWinterSolstice
            Constant DaysInAYear: FixedValue=365
        PhotoperiodFunction Photoperiod: Twilight=-6; DayLength=0
      Organ Trunk: Cconc=0.4; IsAboveGround=true
        Constant InitialWt: FixedValue=300
        Respiration
          Constant MaintenanceRespirationFunction: FixedValue=0; Units=0-1
          NutrientFunctions AssimilationCostFunctions
            Constant C: FixedValue=0; Units=0-1
            Constant N: FixedValue=0; Units=0-1
            Constant P: FixedValue=0; Units=0-1
            Constant K: FixedValue=0; Units=0-1
          NutrientFunctions MobilisationCostFunctions: same as Replacements.KiwiFruit.Trunk.Respiration.AssimilationCostFunctions
        Constant SenescenceRate: FixedValue=0; Units=/d
        Constant DetachmentRate: FixedValue=0; Units=/d
        OrganNutrientDelta Carbon: MaxCDelta=0
          OrganNutrientSupplies Supplies: Fixation=0; Uptake=0
            NutrientPoolsState ReAllocation
            NutrientPoolsState ReTranslocation
          NutrientDemandFunctions DemandFunctions
            DeficitDemandFunction Structural
            DeficitDemandFunction Metabolic
            DeficitDemandFunction Storage
            Constant QStructuralPriority: FixedValue=79.7034
            Constant QMetabolicPriority: FixedValue=79.7034
            Constant QStoragePriority: FixedValue=100
          NutrientProportionFunctions PoolFractions
            CalculateCarbonFractionFromNConc Structural
            CalculateCarbonFractionFromNConc Metabolic
            CalculateCarbonFractionFromNConc Storage
          NutrientSupplyFunctions SupplyFunctions
            Constant Fixation: FixedValue=0
            Constant Uptake: FixedValue=0
            NutrientPoolFunctions ReAllocation
              Constant Structural: FixedValue=0
              MobilisationSupplyFunction Metabolic
                Constant Multiplier: FixedValue=1
              MobilisationSupplyFunction Storage
                Constant Multiplier: FixedValue=1
            NutrientPoolFunctions ReTranslocation
              Constant Structural: FixedValue=0
              MobilisationSupplyFunction Metabolic
                Constant Multiplier: FixedValue=0
              MobilisationSupplyFunction Storage
                Constant Multiplier: FixedValue=0.05
        OrganNutrientDelta Nitrogen: MaxCDelta=0
          OrganNutrientSupplies Supplies: Fixation=0; Uptake=0
            NutrientPoolsState ReAllocation
            NutrientPoolsState ReTranslocation
          NutrientDemandFunctions DemandFunctions
            DeficitDemandFunction Structural
            DeficitDemandFunction Metabolic
            DeficitDemandFunction Storage
            Constant QStructuralPriority: FixedValue=100
            Constant QMetabolicPriority: FixedValue=100
            Constant QStoragePriority: FixedValue=100
          NutrientSupplyFunctions SupplyFunctions
            Constant Fixation: FixedValue=0
            Constant Uptake: FixedValue=0
            NutrientPoolFunctions ReAllocation: same as Replacements.KiwiFruit.Trunk.Carbon.SupplyFunctions.ReAllocation
            NutrientPoolFunctions ReTranslocation
              Constant Structural: FixedValue=0
              MobilisationSupplyFunction Metabolic
                Constant Multiplier: FixedValue=0
              MobilisationSupplyFunction Storage
                Constant Multiplier: FixedValue=0
          NutrientConcentrationFunctions ConcFunctions
            LinearInterpolationFunction Maximum
              XYPairs: X=[0, 10, 40, 60]; Y=[0.02, 0.02, 0.01, 0.01]
              VariableReference XValue: VariableName=[Leaf].LeafNumber
              Memo
                These values have been fitted to the available data. The fitted values are within the observed maximum and minimum values obtained in the FACTS soybean experiments ([ARCHONTOULIS2020721]).
            MinimumFunction Critical
              Constant MaxNConc: FixedValue=0.01
              MultiplyFunction CritNConc
                VariableReference MinNConc: VariableName=[Trunk].Nitrogen.ConcFunctions.Minimum
                Constant CritNFactor: FixedValue=1.5
            Constant Minimum: FixedValue=0.004
        MultiplyFunction TotalDMDemand
          PhaseLookup PartitionFraction
            PhaseLookupValue NonReproductive: Start=BudBreak; End=StartFruitGrowth
              LinearInterpolationFunction PartitionFraction
                XYPairs: X=[1, 6, 17, 20, 25]; Y=[0, 0, 1, 1, 1]
                Memo
                  Allocation determined by node number - partitioning coefficients have been determined using the 2014 sowing date October data ([Khaembah_etal_2017]).
                VariableReference XValue: VariableName=[Leaf].LeafNumber
            PhaseLookupValue Reproductive: Start=StartFruitGrowth; End=FruitMature
              Constant PartitionFraction: FixedValue=0; Units=g/m^2
          VariableReference PotentialPhotosynthesis: VariableName=[Leaf].Photosynthesis
        BiomassRemoval BiomassRemovalDefaults: HarvestFractionLiveToRemove=0.95; HarvestFractionDeadToRemove=0; HarvestFractionLiveToResidue=0.05; HarvestFractionDeadToResidue=1
        MultiplyFunction TotalCarbonDemand
          VariableReference TotalDMDemand: VariableName=[Trunk].TotalDMDemand
          VariableReference Cconc: VariableName=[Trunk].Cconc
      Organ Leaf: Cconc=0.4; IsAboveGround=true
        Constant InitialWt: FixedValue=1; Units=g/m2
        Respiration: same as Replacements.KiwiFruit.Trunk.Respiration
        Constant DetachmentRate: FixedValue=0.2; Units=/d
        OrganNutrientDelta Carbon: MaxCDelta=0
          OrganNutrientSupplies Supplies: Fixation=0; Uptake=0
            NutrientPoolsState ReAllocation
            NutrientPoolsState ReTranslocation
          NutrientDemandFunctions DemandFunctions
            DeficitDemandFunction Structural
            DeficitDemandFunction Metabolic
            DeficitDemandFunction Storage
            Constant QStructuralPriority: FixedValue=100
            Constant QMetabolicPriority: FixedValue=100
            Constant QStoragePriority: FixedValue=0
          NutrientSupplyFunctions SupplyFunctions
            MultiplyFunction Fixation
              VariableReference Fixation: VariableName=[Leaf].Photosynthesis
              VariableReference Cconc: VariableName=[Leaf].Cconc
            Constant Uptake: FixedValue=0
            NutrientPoolFunctions ReAllocation: same as Replacements.KiwiFruit.Trunk.Carbon.SupplyFunctions.ReAllocation
            NutrientPoolFunctions ReTranslocation
              Constant Structural: FixedValue=0
              MobilisationSupplyFunction Metabolic
                Constant Multiplier: FixedValue=0
              MobilisationSupplyFunction Storage
                Constant Multiplier: FixedValue=0.5
          NutrientProportionFunctions PoolFractions
            Constant Structural: FixedValue=0.6
            Constant Metabolic: FixedValue=0.4
            Constant Storage: FixedValue=0
        OrganNutrientDelta Nitrogen: MaxCDelta=0
          OrganNutrientSupplies Supplies: Fixation=0; Uptake=0
            NutrientPoolsState ReAllocation
            NutrientPoolsState ReTranslocation
          NutrientDemandFunctions DemandFunctions
            DeficitDemandFunction Structural
            DeficitDemandFunction Metabolic
            DeficitDemandFunction Storage
            Constant QStructuralPriority: FixedValue=56.642
            Constant QMetabolicPriority: FixedValue=56.642
            Constant QStoragePriority: FixedValue=20.4379
          NutrientSupplyFunctions SupplyFunctions
            Constant Fixation: FixedValue=1
            Constant Uptake: FixedValue=0
            NutrientPoolFunctions ReAllocation: same as Replacements.KiwiFruit.Trunk.Carbon.SupplyFunctions.ReAllocation
            NutrientPoolFunctions ReTranslocation: same as Replacements.KiwiFruit.Leaf.Carbon.SupplyFunctions.ReTranslocation
          NutrientConcentrationFunctions ConcFunctions
            LinearInterpolationFunction Maximum
              XYPairs: X=[0, 10, 40, 60]; Y=[0.045, 0.045, 0.035, 0.035]
              VariableReference XValue: VariableName=[Leaf].LeafNumber
              Memo
                These values have been fitted to the available data. The fitted values are within the observed maximum and minimum values obtained in the FACTS soybean experiments ([ARCHONTOULIS2020721]).
            MinimumFunction Critical
              Constant MaxNConc: FixedValue=0.035
              MultiplyFunction CritNConc
                VariableReference MinNConc: VariableName=[Leaf].Nitrogen.ConcFunctions.Minimum
                Constant CritNFactor: FixedValue=1.57072
            Constant Minimum: FixedValue=0.0135454
        EnergyBalance Canopy: Albedo=0.2; Gsmax350=0.0103149; R50=59.6895; KDead=0; LAIDead=0
          MinimumFunction FRGRer
            VariableReference RUE_FT: VariableName=[Leaf].Photosynthesis.FT
            MinimumFunction Others
              VariableReference RUE_FN: VariableName=[Leaf].Photosynthesis.FN
              VariableReference RUE_FVPD: VariableName=[Leaf].Photosynthesis.FVPD
          StomatalConductanceCO2Modifier
            VariableReference PhotosynthesisCO2Modifier: VariableName=[Leaf].Photosynthesis.FCO2
          LinearInterpolationFunction Tallness
            XYPairs: X=[0, 24]; Y=[20, 500]
            Memo
              The maximum height of 500 mm was estimated from the 2014 sowing date trial ([Khaembah_etal_2017]).
            VariableReference XValue: VariableName=[Leaf].LeafNumber
          VariableReference Deepness: VariableName=[Leaf].Canopy.Height
          MultiplyFunction DeadAreaIndex
            VariableReference SLA: VariableName=[Leaf].SpecificArea
            VariableReference LeafDeadWt: VariableName=[Leaf].Dead.Wt
          MultiplyFunction GreenAreaIndex
            VariableReference SLA: VariableName=[Leaf].SpecificArea
            VariableReference LeafLiveStructuralWt: VariableName=[Leaf].Live.Wt
          MultiplyFunction GreenExtinctionCoefficient
            Constant PotentialExtinctionCoeff: FixedValue=0.833
              Memo
                Hayward’s larger, flatter leaves mean it intercepts more light per unit LAI, so its extinction coefficient is higher.

                k = 0.833 : Values of LAI and transmitted light(T) from Fig.5.5 (The architecture & radiation regime in kiwifruit stand, by E. Morgan)

                k = - ln(T)/LAI
            LinearInterpolationFunction WaterStress
              XYPairs: X=[0, 0.641792, 1]; Y=[1, 1, 1]
              VariableReference XValue: VariableName=[KiwiFruit].Leaf.Canopy.Fw
          Constant Wideness: FixedValue=0
          Constant DeadExtinctionCoefficient: FixedValue=0.3
        RUEModel Photosynthesis
          VariableReference RadnInt: VariableName=[Leaf].Canopy.RadiationIntercepted
          RUECO2Function FCO2: PhotosyntheticPathway=C3
          Constant RUE: FixedValue=1.8; Units=g(DM)/MJ
          WeightedTemperatureFunction FT: MaximumTemperatureWeighting=0.75
            XYPairs: X=[0, 14.1007, 30, 45]; Y=[0, 1, 1, 0]
              Memo
                different from the thermal time. The effect of temperature on photosynthesis in leaves and all the micro-mechanisms.
          LinearInterpolationFunction FW
            XYPairs: X=[0, 0.554282, 1]; Y=[1, 1, 1]
            VariableReference XValue: VariableName=[Leaf].Canopy.Fw
          LinearInterpolationFunction FN
            XYPairs: X=[0, 1, 1.5]; Y=[1, 1, 1]
            VariableReference XValue: VariableName=[Leaf].FNmetabolic
          Constant FVPD: FixedValue=1
        DivideFunction TotalDMDemand
          VariableReference DeltaLAI: VariableName=[Leaf].DeltaLAI
          VariableReference SLA: VariableName=[Leaf].SpecificArea
          Memo
            Growth in leaf area is used to calculate the leaf dry matter demand. The same was assumed in the original crop models in APSIM. Further model development can be taken once new experimental data for metabolic, structural and storage forms are provided.
          Memo Memo1
            DeltaLAI describes the LAI variation over the cycle and is calculated using the Area of Largest Leaf, relative leaf area, plant number, branch number and leaf appearance rate (thermal time/phyllochron).
        LinearInterpolationFunction ThawInverse
          XYPairs: X=[9, 13, 20, 28, 35, -]; Y=[0, 0.13, 0.33, 0.36, 0.36, -]
          VariableReference XValue: VariableName=[Phenology].HeatModelHourlyFlwr
          Memo
            Modelling Effect of Temperature on Area Expansion at the Leaf, the Shoot and the Whole Plant Level

            Fig.2.a

            &

            A functional–structural kiwifruit vine model integrating architecture, carbon dynamics and effects of the environment

            Fig.5
        LinearInterpolationFunction B
          XYPairs
            X=[0, 9, 10, 12, 15, 16, 17, 18, 19, 20, 21, 35, 80]
            Y=[-0.0006, -0.0038, -0.0027, -0.002, -0.0013, -0.001, -0.0006, -0.0004, -0.0003, -0.0001, 0, 0, 0]
          VariableReference XValue: VariableName=[Leaf].LeafNumber
          Memo
            A functional–structural kiwifruit vine model integrating architecture, carbon dynamics and effects of the environment

            Fig.7
        PhaseLookup DeltaLAI
          Memo
            DeltaLAI describes the LAI variation over the cycle and is calculated using the Area of Largest Leaf, relative leaf area, number of shoots, and leaf appearance rate (thermal time/phyllochron).
          PhaseLookupValue Vegetative: Start=BudBreak; End=FruitMature
            MultiplyFunction Delta
              MultiplyFunction VineShoots
                Constant CaneNum: FixedValue=20
                VariableReference ShootNumber: VariableName=[Phenology].BrokenBuds
              LinearInterpolationFunction RelativeArea
                XYPairs: X=[0, 10, 15, 20, 30, 50]; Y=[0, 0.9, 1, 0.9, 0.7, 0.3]
                VariableReference XValue: VariableName=[Leaf].LeafNumber
                Memo
                  Modelling Effect of Temperature on Area Expansion at the Leaf, the Shoot and the Whole Plant Level

                  Fig.5.a, solid triangles
              AddFunction SigmoidalGrowth
                MultiplyFunction
                  SubtractFunction A_B
                    VariableReference AreaLargestLeaf: VariableName=[Leaf].AreaLargestLeaf
                    VariableReference B: VariableName=[Leaf].B
                  ExpressionFunction SigmoidFunc
                    Expression=exp(([Leaf].LeafNumber - [KiwiFruit].Leaf.LeafAppearanceRate)*[Leaf].ThawInverse)/(1+exp(([Leaf].LeafNumber - [KiwiFruit].Leaf.LeafAppearanceRate)*[Leaf].ThawInverse))
                    Memo
                      Modelling Effect of Temperature on Area Expansion at the Leaf, the Shoot and the Whole Plant Level

                      Eq.1
                VariableReference B: VariableName=[Leaf].B
              LinearInterpolationFunction FW
                XYPairs: X=[0.290163, 0.814495, 2, 5]; Y=[0, 1, 1, 1]
                VariableReference XValue: VariableName=[Leaf].Canopy.Fw
        AccumulateFunction LeafGrowthAccumulatedTT: StartStageName=BudBreak; EndStageName=FruitMature; ResetStageName=BareTree; FractionRemovedOnCut=0; FractionRemovedOnHarvest=0; FractionRemovedOnGraze=0; FractionRemovedOnPrune=1
          VariableReference TT: VariableName=[Phenology].HeatModelHourlyFlwr
        AccumulateFunction LeafNumber: StartStageName=BudBreak; EndStageName=FruitMature; ResetStageName=BareTree; FractionRemovedOnCut=0; FractionRemovedOnHarvest=0; FractionRemovedOnGraze=0; FractionRemovedOnPrune=1
          VariableReference LeafAppearanceRate: VariableName=[Leaf].LeafAppearanceRate
        LinearInterpolationFunction LeafAppearanceRate
          XYPairs
            X=[0, 8.7, 12, 17, 20, 24, 26, 28, 29, 30, 35, 36, 40]
            Y=[0, 0, 0.15, 0.3, 0.45, 0.65, 0.8, 0.8, 0.75, 0.65, 0.1, 0, 0]
          VariableReference XValue: VariableName=[Phenology].HeatModelHourlyFlwr
          Memo
            A functional–structural kiwifruit vine model integrating architecture, carbon dynamics and effects of the environment

            Fig.5 (solid line)
        MultiplyFunction SpecificArea
          Constant SLA: FixedValue=0.00667; Units=m2/g
            Memo
              Monitoring water and nutrient balance

              Fig.120
          LinearInterpolationFunction StressFactor
            XYPairs: X=[0, 0.5, 1]; Y=[1, 1, 1]
            VariableReference XValue: VariableName=[Leaf].AccumulatedWaterStressEffect
        Constant AreaLargestLeaf: FixedValue=0.0175; Units=m2
          Memo
            Annette's PhD: p.65
        BiomassRemoval BiomassRemovalDefaults: HarvestFractionLiveToRemove=0; HarvestFractionDeadToRemove=0; HarvestFractionLiveToResidue=1; HarvestFractionDeadToResidue=1
        LinearInterpolationFunction FrostFraction
          XYPairs: X=[-4, 4]; Y=[0, 0]
          VariableReference XValue: VariableName=[Weather].MinT
        MovingAverageFunction AccumulatedWaterStressEffect: NumberOfDays=30; StageToStartMovingAverage=Emergence
          VariableReference FW: VariableName=[Leaf].Canopy.Fw
        MultiplyFunction TotalCarbonDemand
          VariableReference TotalDMDemand: VariableName=[Leaf].TotalDMDemand
          VariableReference Cconc: VariableName=[Leaf].Cconc
        PhaseLookup SenescenceRate
          PhaseLookupValue Dormant: Start=StartEndo; End=BudBreak
            Constant EightPercent: FixedValue=0.08
          PhaseLookupValue Vegetative: Start=BudBreak; End=FruitMature
            AddFunction Total
              MultiplyFunction CoverEffect
                LinearInterpolationFunction RelativeRate
                  XYPairs: X=[0, 0.25, 0.5, 0.8, 1]; Y=[0, 0, 0, 1, 1]
                  Memo
                    The maximum height of 500 mm was estimated from the 2014 sowing date trial ([Khaembah_etal_2017]).
                  VariableReference XValue: VariableName=[Leaf].Canopy.CoverTotal
                Constant MaxRate: FixedValue=0.035; Units=/d
              MultiplyFunction AgeEffect
                LinearInterpolationFunction RelativeRate
                  XYPairs: X=[0, 15, 20, 40, 45]; Y=[0, 0, 0, 1, 1]
                  Memo
                    The maximum height of 500 mm was estimated from the 2014 sowing date trial ([Khaembah_etal_2017]).
                  VariableReference XValue: VariableName=[Leaf].LeafNumber
                Constant MaxRate: FixedValue=0.05; Units=/d
          PhaseLookupValue SenescenceLeafFall: Start=FruitMature; End=BareTree
            Constant EightPercent: FixedValue=0.08
        ExpressionFunction Transmitted_light
          Expression=exp(- [Leaf].Canopy.GreenExtinctionCoefficient.PotentialExtinctionCoeff  * [Leaf].Canopy.LAI)
        ProtectedDivideFunction TranspirationPerLeafArea: NumeratorErrVal=0; DenominatorErrVal=0
          VariableReference Transpiration: VariableName=[RootUptakesArbitrator].WaterUptake.amount
          VariableReference LAI: VariableName=[Leaf].Canopy.LAI
      Organ Stem: Cconc=0.4; IsAboveGround=true
        Constant InitialWt: FixedValue=1; Units=g/m2
        Respiration: same as Replacements.KiwiFruit.Trunk.Respiration
        VariableReference SenescenceRate: VariableName=[Leaf].senescenceRate
        Constant DetachmentRate: FixedValue=0; Units=/d
        OrganNutrientDelta Carbon: MaxCDelta=0
          OrganNutrientSupplies Supplies: Fixation=0; Uptake=0
            NutrientPoolsState ReAllocation
            NutrientPoolsState ReTranslocation
          NutrientDemandFunctions DemandFunctions
            DeficitDemandFunction Structural
            DeficitDemandFunction Metabolic
            DeficitDemandFunction Storage
            Constant QStructuralPriority: FixedValue=0
            Constant QMetabolicPriority: FixedValue=0
            Constant QStoragePriority: FixedValue=2.93089
          NutrientSupplyFunctions SupplyFunctions
            Constant Fixation: FixedValue=0
            Constant Uptake: FixedValue=0
            NutrientPoolFunctions ReAllocation: same as Replacements.KiwiFruit.Trunk.Carbon.SupplyFunctions.ReAllocation
            NutrientPoolFunctions ReTranslocation
              Constant Structural: FixedValue=0
              MobilisationSupplyFunction Metabolic
                Constant Multiplier: FixedValue=0
              MobilisationSupplyFunction Storage
                Constant Multiplier: FixedValue=0.222186
          NutrientProportionFunctions PoolFractions: same as Replacements.KiwiFruit.Trunk.Carbon.PoolFractions
        OrganNutrientDelta Nitrogen: MaxCDelta=0
          OrganNutrientSupplies Supplies: Fixation=0; Uptake=0
            NutrientPoolsState ReAllocation
            NutrientPoolsState ReTranslocation
          NutrientDemandFunctions DemandFunctions
            DeficitDemandFunction Structural
            DeficitDemandFunction Metabolic
            DeficitDemandFunction Storage
            Constant QStructuralPriority: FixedValue=0
            Constant QMetabolicPriority: FixedValue=0
            Constant QStoragePriority: FixedValue=100
          NutrientSupplyFunctions SupplyFunctions
            Constant Fixation: FixedValue=0
            Constant Uptake: FixedValue=0
            NutrientPoolFunctions ReAllocation: same as Replacements.KiwiFruit.Trunk.Carbon.SupplyFunctions.ReAllocation
            NutrientPoolFunctions ReTranslocation: same as Replacements.KiwiFruit.Leaf.Carbon.SupplyFunctions.ReTranslocation
          NutrientConcentrationFunctions ConcFunctions
            LinearInterpolationFunction Maximum
              XYPairs: X=[-, 0, 40, 60]; Y=[-, 0.03, 0.02, 0.02]
              VariableReference XValue: VariableName=[Leaf].LeafNumber
              Memo
                These values have been fitted to the available data. The fitted values are within the observed maximum and minimum values obtained in the FACTS soybean experiments ([ARCHONTOULIS2020721]).
            MinimumFunction Critical
              Constant MaxNConc: FixedValue=0.02
              MultiplyFunction CritNConc
                VariableReference MinNConc: VariableName=[Stem].Nitrogen.ConcFunctions.Minimum
                Constant CritNFactor: FixedValue=1.5
            Constant Minimum: FixedValue=0.01
        AllometricDemandFunction TotalDMDemand: Const=0.1; Power=1.5
          VariableReference XValue: VariableName=[Leaf].Live.Wt
          VariableReference YValue: VariableName=[Stem].Live.Wt
        BiomassRemoval BiomassRemovalDefaults: HarvestFractionLiveToRemove=0; HarvestFractionDeadToRemove=0; HarvestFractionLiveToResidue=1; HarvestFractionDeadToResidue=1
        MultiplyFunction TotalCarbonDemand
          VariableReference TotalDMDemand: VariableName=[Stem].TotalDMDemand
          VariableReference Cconc: VariableName=[Stem].Cconc
      Organ Root: Cconc=0.4; IsAboveGround=false
        Constant InitialWt: FixedValue=0.5; Units=g/m2
        Respiration: same as Replacements.KiwiFruit.Trunk.Respiration
        Constant SenescenceRate: FixedValue=0; Units=/d
        Constant DetachmentRate: FixedValue=0; Units=/d
        OrganNutrientDelta Carbon: MaxCDelta=0
          OrganNutrientSupplies Supplies: Fixation=0; Uptake=0
            NutrientPoolsState ReAllocation
            NutrientPoolsState ReTranslocation
          NutrientDemandFunctions DemandFunctions
            DeficitDemandFunction Structural
            DeficitDemandFunction Metabolic
            DeficitDemandFunction Storage
            Constant QStructuralPriority: FixedValue=0
            Constant QMetabolicPriority: FixedValue=0
            Constant QStoragePriority: FixedValue=0
          NutrientSupplyFunctions SupplyFunctions: same as Replacements.KiwiFruit.Trunk.Nitrogen.SupplyFunctions
          NutrientProportionFunctions PoolFractions: same as Replacements.KiwiFruit.Trunk.Carbon.PoolFractions
        OrganNutrientDelta Nitrogen: MaxCDelta=0
          OrganNutrientSupplies Supplies: Fixation=0; Uptake=0
            NutrientPoolsState ReAllocation
            NutrientPoolsState ReTranslocation
          NutrientDemandFunctions DemandFunctions
            DeficitDemandFunction Structural
            DeficitDemandFunction Storage
            DeficitDemandFunction Metabolic
            Constant QStructuralPriority: FixedValue=1
            Constant QMetabolicPriority: FixedValue=1
            Constant QStoragePriority: FixedValue=0
          NutrientSupplyFunctions SupplyFunctions: same as Replacements.KiwiFruit.Trunk.Nitrogen.SupplyFunctions
          NutrientConcentrationFunctions ConcFunctions
            Constant Maximum: FixedValue=0.01
            Constant Critical: FixedValue=0.009
            Constant Minimum: FixedValue=0.0045
        RootNetwork Network
          RootShapeCylinder RootShape
          LinearInterpolationFunction KLModifier
            XYPairs: X=[0, 1]; Y=[1, 1]
            VariableReference XValue: VariableName=[Root].Network.LengthDensity
          Constant SoilWaterEffect: FixedValue=1
          Constant MaximumRootDepth: FixedValue=1400
          PhaseLookup RootFrontVelocity
            PhaseLookupValue Vegetative: Start=BudBreak; End=FruitMature
              MultiplyFunction Velocity
                Constant RFVmax: FixedValue=10; Units=mm/d
                VariableReference RUEstress: VariableName=[Leaf].Photosynthesis.FT
          Constant KNO3: FixedValue=0.02; Units=g/plant
          Constant KNH4: FixedValue=0.01; Units=g/plant
          LinearInterpolationFunction NUptakeSWFactor
            XYPairs: X=[0, 0.5, 1]; Y=[0, 0.2758, 1]
            VariableReference XValue: VariableName=[Root].Network.RWC
          Constant SpecificRootLength: FixedValue=40; Units=m/g
          LinearInterpolationFunction MaxDailyNUptake
            XYPairs: X=[0, 1000]; Y=[0, 100]
            Memo
              Early growth N uptake is assumed to be 0.1 kg N/ha/day, and this increases with root growth reaching a maximumof 5.8 kg N/ha/day. The maximum N uptake per day is assumed from sugar beet data (Armstrong et al., 1986).
            VariableReference XValue: VariableName=[Root].Wt
          Constant RootDepthStressFactor: FixedValue=1
        AllometricDemandFunction TotalDMDemand: Const=1; Power=1
          VariableReference XValue: VariableName=[Leaf].Live.Wt
          VariableReference YValue: VariableName=[Root].Live.Wt
        BiomassRemoval BiomassRemovalDefaults: HarvestFractionLiveToRemove=0; HarvestFractionDeadToRemove=0; HarvestFractionLiveToResidue=1; HarvestFractionDeadToResidue=1
        MultiplyFunction TotalCarbonDemand
          VariableReference TotalDMDemand: VariableName=[Root].TotalDMDemand
          VariableReference Cconc: VariableName=[Root].Cconc
      Organ Fruit: Cconc=0.4; IsAboveGround=true
        Constant InitialWt: FixedValue=0.001
        Respiration: same as Replacements.KiwiFruit.Trunk.Respiration
        Constant SenescenceRate: FixedValue=0; Units=/d
        Constant DetachmentRate: FixedValue=0; Units=/d
        OrganNutrientDelta Carbon: MaxCDelta=0
          OrganNutrientSupplies Supplies: Fixation=0; Uptake=0
            NutrientPoolsState ReAllocation
            NutrientPoolsState ReTranslocation
          NutrientDemandFunctions DemandFunctions
            VariableReference Structural: VariableName=[Fruit].TotalCarbonDemand
            DeficitDemandFunction Metabolic
            DeficitDemandFunction Storage
            Constant QStructuralPriority: FixedValue=79.7034
            Constant QMetabolicPriority: FixedValue=79.7034
            Constant QStoragePriority: FixedValue=100
          NutrientProportionFunctions PoolFractions: same as Replacements.KiwiFruit.Trunk.Carbon.PoolFractions
          NutrientSupplyFunctions SupplyFunctions: same as Replacements.KiwiFruit.Trunk.Nitrogen.SupplyFunctions
        OrganNutrientDelta Nitrogen: same as Replacements.KiwiFruit.Trunk.Nitrogen
        BiomassRemoval BiomassRemovalDefaults: HarvestFractionLiveToRemove=0.95; HarvestFractionDeadToRemove=0; HarvestFractionLiveToResidue=0.05; HarvestFractionDeadToResidue=1
        PhaseLookup TotalCarbonDemand
          PhaseLookupValue NoFruit: Start=StartEndo; End=EndFlowering
            Constant Zero: FixedValue=0
          PhaseLookupValue FruitingPhase: Start=EndFlowering; End=FruitMature
            MaximumFunction CarbonDemand
              DeltaFunction: StartStageName=EndFlowering
                MultiplyFunction Integral
                  VariableReference Number: VariableName=[Fruit].FruitNumberPerM2
                  VariableReference SingleBerryDW: VariableName=[Fruit].SingleBerryDW
                  VariableReference CarbonConc: VariableName=[Fruit].Cconc
              Constant Zero: FixedValue=0
        PhaseLookup SingleBerryDW
          PhaseLookupValue NoFruit: Start=StartEndo; End=EndFlowering
            Constant Zero: FixedValue=0
          PhaseLookupValue FruitingPhase: Start=EndFlowering; End=FruitMature
            AccumulateFunction ThermalTimeAfterFlowering: StartStageName=EndFlowering; EndStageName=FruitMature; ResetStageName=FruitMature; FractionRemovedOnCut=0; FractionRemovedOnHarvest=0; FractionRemovedOnGraze=0; FractionRemovedOnPrune=1
              MultiplyFunction
                Constant coefficient: FixedValue=0.012
                VariableReference TT: VariableName=[Phenology].HeatModelHourlyFruit
        PhaseLookup SingleBerryFW
          PhaseLookupValue NoFruit: Start=StartEndo; End=EndFlowering
            Constant Zero: FixedValue=0
          PhaseLookupValue FruitingPhase: Start=EndFlowering; End=FruitMature
            MinimumFunction FreshWt
              Constant MaxFreshWt: FixedValue=150; Units=g
              AccumulateFunction ExpectedFreshWt: StartStageName=EndFlowering; EndStageName=FruitMature; ResetStageName=FruitMature; FractionRemovedOnCut=0; FractionRemovedOnHarvest=0; FractionRemovedOnGraze=0; FractionRemovedOnPrune=1
                MultiplyFunction FreshWtStressed
                  MultiplyFunction FreshWtPotential
                    VariableReference TT: VariableName=[Phenology].HeatModelHourlyFruit
                    Constant coefficient: FixedValue=0.07
                  LinearInterpolationFunction FW
                    XYPairs: X=[0, 100, 250, 450, 500, 650, 850, 1000]; Y=[1, 1, 1, 1, 1, 1, 1, 1]
                    VariableReference XValue: VariableName=[Phenology].FruitGrowth.ProgressThroughPhase
        PhaseLookup SingleBerryDMC
          PhaseLookupValue NoFruit: Start=StartEndo; End=EndFlowering
            Constant Zero: FixedValue=0
          PhaseLookupValue FruitingPhase: Start=EndFlowering; End=FruitMature
            MultiplyFunction SingleBerryDMPercent
              Constant Percent: FixedValue=100
              AccumulateFunction SingleBerryDMC: StartStageName=EndFlowering; EndStageName=FruitMature; ResetStageName=FruitMature; FractionRemovedOnCut=0; FractionRemovedOnHarvest=0; FractionRemovedOnGraze=0; FractionRemovedOnPrune=1
                MultiplyFunction DailyDemand
                  VariableReference TT: VariableName=[Phenology].HeatModelHourlyFruit
                  Constant coefficient: FixedValue=0.0001
        PhaseLookup FruitNumberPerM2
          PhaseLookupValue NoFruit: Start=StartEndo; End=EndFlowering
            Constant Zero: FixedValue=0
          PhaseLookupValue FruitingPhase: Start=EndFlowering; End=FruitMature
            ProtectedDivideFunction PlantsPerM2: NumeratorErrVal=0; DenominatorErrVal=0
              MultiplyFunction FruitNumberPerVine
                VariableReference CaneNum: VariableName=[Leaf].DeltaLAI.Vegetative.Delta.VineShoots.CaneNum
                ExpressionFunction FruitingShoots: Expression=0.3 * [Phenology].BrokenBuds
                Constant AverageFruitNumPerShoot: FixedValue=1.5
                  Memo
                    Need to be determined for control & HC. The paper "Effects of hydrogen cyanamide on budbreak
                    and flowering in kiwifruit (Actinidia deliciosa
                    ’Hayward')" can be helpful.
                Constant RetainedPostThinning: FixedValue=1; Units=%
                  Memo
                    No thinning == 1
              MultiplyFunction Area
                Constant RowWidth: FixedValue=6; Units=M
                Constant RowLength: FixedValue=4; Units=M
      CompositeStates AboveGround
        Propertys=[[Leaf].Live, [Leaf].Dead, [Trunk].Live, [Trunk].Dead, [Stem].Live, [Stem].Dead, [Fruit].Live, [Fruit].Dead]
      CompositeStates AboveGroundDead: Propertys=[[Leaf].Dead, [Trunk].Dead, [Stem].Dead, [Fruit].Dead]
      CompositeStates BelowGround: Propertys=[[Root].Live, [Root].Dead]
      CompositeStates Total
        Propertys=[[Leaf].Live, [Leaf].Dead, [Trunk].Live, [Trunk].Dead, [Stem].Live, [Stem].Dead, [Root].Live, [Root].Dead, [Fruit].Live, [Fruit].Dead]
      CompositeStates TotalLive
        Propertys=[[Leaf].Live, [Stem].Live, [Trunk].Live, [Root].Live, [Fruit].Live]
      CompositeStates TotalDead
        Propertys=[[Leaf].Dead, [Stem].Dead, [Trunk].Dead, [Root].Dead, [Fruit].Dead]
      LinearInterpolationFunction MortalityRate
        XYPairs: X=[0.98, 1]; Y=[0, 0]
        VariableReference XValue: VariableName=[Leaf].Canopy.CoverGreen
      AddFunction SCS (disabled)
        VariableReference Storage: VariableName=[Trunk].Live.Weight.Storage
        VariableReference Metabolic: VariableName=[Trunk].Live.Weight.Metabolic
        Memo
          Non structural carbohydrates and sugars
      Folder Cultivars
        Cultivar Heyward_TP
        Cultivar Heyward_KK
        Cultivar Heyward
        Cultivar Gold
          Command:
            // Largest leaf area: 175 cm2 (Vigor-controlling rootstocks affect early shoot growth and leaf area development of kiwifruit: Fig 6)
            [Leaf].AreaLargestLeaf.FixedValue = 0.0175
            // Monitoring water and nutrient balance: Fig.120
            [Leaf].SpecificArea.SLA.FixedValue = 0.00785
            // The extinction coefficient value of 0.73 (Steve Green - Water and soil management of kiwifruit: Fig.31) was used
            [Leaf].Canopy.GreenExtinctionCoefficient.PotentialExtinctionCoeff.FixedValue = 0.73
            [Phenology].EndoDormancy.Target.HCEffect.FixedTarget.FixedValue = 1500
      Constant seedMortalityRate: FixedValue=0
      MultiplyFunction TranspirationPerTree
        VariableReference Transpiration_mm: VariableName=[Leaf].Canopy.Transpiration
        VariableReference RowWidth: VariableName=[KiwiFruit].RowWidth
        VariableReference InterRowSpacing: VariableName=[KiwiFruit].InterRowSpacing
    Report: EventNames=[Clock].DoReport
      VariableNames:
        [KiwiFruit].Leaf.LeafNumber
        [Clock].Today
        [Clock].Today.DayOfYear
        [IWeather].MeanT
        [KiwiFruit].Phenology.Stage
        [KiwiFruit].Phenology.CurrentStageName
        [KiwiFruit].Phenology.BrokenBuds
        [KiwiFruit].Phenology.BudBurstDOY
        [KiwiFruit].Phenology.EndoDormancy.ProgressThroughPhase
        [KiwiFruit].Phenology.EcoDormancy.ProgressThroughPhase
        [KiwiFruit].Phenology.EarlyLeaf.ProgressThroughPhase
        [KiwiFruit].Phenology.Flowering.ProgressThroughPhase
        [KiwiFruit].Phenology.FloweringDOY
        [KiwiFruit].Phenology.AccumulatedChillingPreEndo
        [KiwiFruit].Phenology.EndoDormancy.Target
        [KiwiFruit].Phenology.EcoDormancy.Target
        [Clock].Today.Year
        [KiwiFruit].Leaf.DeltaLAI
        [KiwiFruit].Leaf.Canopy.LAI
        [KiwiFruit].Phenology.ChillingAtHC
        [KiwiFruit].SowingData.BudNumber
        [KiwiFruit].SowingData.Population
        [KiwiFruit].Phenology.ProportionBB
        [KiwiFruit].Phenology.MaxBBP
        [KiwiFruit].Phenology.Photoperiod
        [KiwiFruit].Leaf.FN
        [KiwiFruit].Leaf.DeltaLAI.Vegetative.Delta.SigmoidalGrowth
        [KiwiFruit].Leaf.LeafAppearanceRate
        [KiwiFruit].Phenology.HeatModelHourlyFlwr
        [KiwiFruit].Phenology.TotalCaneLeaves
        [KiwiFruit].Leaf.LeafGrowthAccumulatedTT
        [KiwiFruit].Leaf.SpecificArea.SLA
        [KiwiFruit].Leaf.Canopy.CoverTotal
        [KiwiFruit].Leaf.Canopy.Fw
        [KiwiFruit].Leaf.Transmitted_light
        [KiwiFruit].Fruit.FruitNumberPerM2
        [KiwiFruit].Fruit.Wt
        [KiwiFruit].Fruit.TotalCarbonDemand
        [KiwiFruit].Leaf.Canopy.RadiationIntercepted
        [KiwiFruit].Leaf.Canopy.CoverGreen
        [KiwiFruit].Phenology.FruitGrowth.ProgressThroughPhase
        [KiwiFruit].Fruit.SingleBerryDW
        [KiwiFruit].Fruit.SingleBerryDMC
        [KiwiFruit].Fruit.SingleBerryFW
        [KiwiFruit].Fruit.FruitNumberPerM2
        [KiwiFruit].Fruit.TotalCarbonDemand
    Report Stages
      VariableNames:
        [KiwiFruit].Phenology.MaxBBP
        [KiwiFruit].Phenology.FloweringDOY
        [Clock].Today.Year
        [KiwiFruit].Phenology.CurrentStageName
  Simulation TPROB4BB2016control
    Weather: FileName=Te Puke.met
    Clock: Start=2015-01-01; End=2017-06-30
    Summary
    SoilArbitrator Soil Arbitrator
    Zone Block: Area=1; Slope=0; AspectAngle=0; Altitude=50
      Report: EventNames=[Clock].DoReport
        VariableNames:
          [KiwiFruit].Leaf.NodeNumber
          [Clock].Today
          [KiwiFruit].Phenology.Stage
          [KiwiFruit].Phenology.CurrentStageName
          [KiwiFruit].Phenology.ProportionBB
          [KiwiFruit].Phenology.BrokenBuds
          [KiwiFruit].Phenology.BudBurstDOY
          [KiwiFruit].Phenology.BrokenBuds.Vegetative.BrokenBuds.Max_buds
          [KiwiFruit].Phenology.EndoDormancy.ProgressThroughPhase
          [KiwiFruit].Phenology.EcoDormancy.ProgressThroughPhase
          [KiwiFruit].Phenology.ProportionCU
          [KiwiFruit].Phenology.MaxBBP
          [KiwiFruit].Phenology.Flowering.ProgressThroughPhase
          [KiwiFruit].Phenology.FloweringDOY
          [KiwiFruit].Phenology.AccumulatedChillingPreEndo
      Report Stages
        VariableNames:
          [KiwiFruit].Phenology.MaxBBP
          [KiwiFruit].Phenology.FloweringDOY
      Plant KiwiFruit
      Fertiliser
      SurfaceOrganicMatter: InitialResidueName=wheat_stubble; InitialResidueType=wheat; InitialResidueMass=500; InitialStandingFraction=0; InitialCPR=0; InitialCNR=100
      Irrigation
      MicroClimate: a_interception=0; b_interception=1; c_interception=0; d_interception=0; SoilHeatFluxFraction=0.4; MinimumHeightDiffForNewLayer=0; NightInterceptionFraction=0.5; ReferenceHeight=2
      Manager ReportOnEvents: same as Experiment.sensibility test.Block.ReportOnEvents
      Manager Reset on date: same as Experiment.sensibility test.Block.Reset on date
      Soil: same as Experiment.sensibility test.Block.Soil
      Manager AutomaticIrrigation: same as Experiment.sensibility test.Block.AutomaticIrrigation
      Manager FactorLabels: same as Experiment.sensibility test.Block.FactorLabels
      Manager AutomaticFertiliser: same as Experiment.sensibility test.Block.AutomaticFertiliser
      Manager WaterStatus: same as Experiment.sensibility test.Block.WaterStatus
      Manager SowDateCv
        InitialRootDepth = 5
        CropToSow = Heyward_TP
        SowingDate = 05/25/2015 00:00:00
        script: same as in Experiment.sensibility test.Block.SowDateCv
      AgriChemical
      BiomassRemovalEvents OnPrune: NameOfPlantToRemoveFrom=KiwiFruit; RemovalType=3
        BiomassRemovalFractions:
          PlantName  OrganName  TypeString  LiveToRemove  DeadToRemove  LiveToResidue  DeadToResidue
          KiwiFruit  Trunk      Pruning     0             0             0              0
          KiwiFruit  Leaf       Pruning     0             0             1              1
          KiwiFruit  Stem       Pruning     0             0             0              0
          KiwiFruit  Root       Pruning     0             0             0              0
          KiwiFruit  Fruit      Pruning     0             0             0              0
  Simulation HaywardTPBBCon1
    Weather: FileName=Te Puke.met
    Clock: Start=2014-01-01; End=2016-06-30
    Summary
    SoilArbitrator Soil Arbitrator
    Zone Block: Area=1; Slope=0; AspectAngle=0; Altitude=50
      Report: EventNames=[Clock].DoReport
        VariableNames:
          [KiwiFruit].Leaf.Wt
          [KiwiFruit].Leaf.Canopy.Height
          [KiwiFruit].Leaf.NodeNumber
          [Clock].Today
          [KiwiFruit].Phenology.Stage
          [KiwiFruit].Phenology.CurrentStageName
          [KiwiFruit].Stem.Wt
          [KiwiFruit].Trunk.Wt
          [KiwiFruit].Root.Wt
          [KiwiFruit].Fruit.Wt
          [KiwiFruit].Leaf.Photosynthesis
          [KiwiFruit].Leaf.Canopy.RadiationIntercepted
          [KiwiFruit].Leaf.Canopy.LAI
          [KiwiFruit].Leaf.AreaLargestLeaf
          [KiwiFruit].Phenology.ThermalTime
          [KiwiFruit].Phenology.ProportionBB
          [KiwiFruit].Phenology.BrokenBuds
          [KiwiFruit].Phenology.BudBurstDOY
          [KiwiFruit].Phenology.ProportionCU
          [KiwiFruit].Phenology.MaxBBP
          [KiwiFruit].Phenology.Flowering.ProgressThroughPhase
          [KiwiFruit].Phenology.FloweringDOY
      Report Stages
        VariableNames:
          [KiwiFruit].Phenology.MaxBBP
          [KiwiFruit].Phenology.FloweringDOY
      Plant KiwiFruit
      Fertiliser
      SurfaceOrganicMatter: InitialResidueName=wheat_stubble; InitialResidueType=wheat; InitialResidueMass=500; InitialStandingFraction=0; InitialCPR=0; InitialCNR=100
      Irrigation
      MicroClimate: a_interception=0; b_interception=1; c_interception=0; d_interception=0; SoilHeatFluxFraction=0.4; MinimumHeightDiffForNewLayer=0; NightInterceptionFraction=0.5; ReferenceHeight=2
      Manager ReportOnEvents: same as Experiment.sensibility test.Block.ReportOnEvents
      Manager Reset on date: same as Experiment.sensibility test.Block.Reset on date
      Soil: same as Experiment.sensibility test.Block.Soil
      Manager AutomaticIrrigation: same as Experiment.sensibility test.Block.AutomaticIrrigation
      Manager FactorLabels: same as Experiment.sensibility test.Block.FactorLabels
      Manager AutomaticFertiliser: same as Experiment.sensibility test.Block.AutomaticFertiliser
      Manager WaterStatus: same as Experiment.sensibility test.Block.WaterStatus
      Manager SowDateCv
        InitialRootDepth = 5
        CropToSow = Heyward_TP
        SowingDate = 05/25/2014 00:00:00
        script: same as in Experiment.sensibility test.Block.SowDateCv
      AgriChemical
      BiomassRemovalEvents OnPrune: same as TPROB4BB2016control.Block.OnPrune
  Simulation HaywardTPBBCon2
    Weather: FileName=Te Puke.met
    Clock: Start=2014-01-01; End=2016-06-30
    Summary
    SoilArbitrator Soil Arbitrator
    Zone Block: Area=1; Slope=0; AspectAngle=0; Altitude=50
      Report: same as HaywardTPBBCon1.Block.Report
      Report Stages
        VariableNames:
          [KiwiFruit].Phenology.MaxBBP
          [KiwiFruit].Phenology.FloweringDOY
      Plant KiwiFruit
      Fertiliser
      SurfaceOrganicMatter: InitialResidueName=wheat_stubble; InitialResidueType=wheat; InitialResidueMass=500; InitialStandingFraction=0; InitialCPR=0; InitialCNR=100
      Irrigation
      MicroClimate: a_interception=0; b_interception=1; c_interception=0; d_interception=0; SoilHeatFluxFraction=0.4; MinimumHeightDiffForNewLayer=0; NightInterceptionFraction=0.5; ReferenceHeight=2
      Manager ReportOnEvents
        script: same as in Experiment.sensibility test.Block.ReportOnEvents
      Manager Reset on date: same as Experiment.sensibility test.Block.Reset on date
      Soil: same as Experiment.sensibility test.Block.Soil
      Manager AutomaticIrrigation: same as Experiment.sensibility test.Block.AutomaticIrrigation
      Manager FactorLabels: same as Experiment.sensibility test.Block.FactorLabels
      Manager AutomaticFertiliser: same as Experiment.sensibility test.Block.AutomaticFertiliser
      Manager WaterStatus: same as Experiment.sensibility test.Block.WaterStatus
      Manager SowDateCv: same as HaywardTPBBCon1.Block.SowDateCv
      AgriChemical
      BiomassRemovalEvents OnPrune: same as TPROB4BB2016control.Block.OnPrune
  Simulation HaywardKKBBControl
    Weather: FileName=Kerikeri.met
    Clock: Start=2014-01-01; End=2016-06-30
    Summary
    SoilArbitrator Soil Arbitrator
    Zone Block: Area=1; Slope=0; AspectAngle=0; Altitude=50
      Report: same as HaywardTPBBCon1.Block.Report
      Report Stages
        VariableNames:
          [KiwiFruit].Phenology.MaxBBP
          [KiwiFruit].Phenology.FloweringDOY
          [Clock].Today.Year
      Plant KiwiFruit
      Fertiliser
      SurfaceOrganicMatter: InitialResidueName=wheat_stubble; InitialResidueType=wheat; InitialResidueMass=500; InitialStandingFraction=0; InitialCPR=0; InitialCNR=100
      Irrigation
      MicroClimate: a_interception=0; b_interception=1; c_interception=0; d_interception=0; SoilHeatFluxFraction=0.4; MinimumHeightDiffForNewLayer=0; NightInterceptionFraction=0.5; ReferenceHeight=2
      Manager ReportOnEvents
        script: same as in Experiment.sensibility test.Block.ReportOnEvents
      Manager Reset on date: same as Experiment.sensibility test.Block.Reset on date
      Soil: same as Experiment.sensibility test.Block.Soil
      Manager AutomaticIrrigation: same as Experiment.sensibility test.Block.AutomaticIrrigation
      Manager FactorLabels: same as Experiment.sensibility test.Block.FactorLabels
      Manager AutomaticFertiliser: same as Experiment.sensibility test.Block.AutomaticFertiliser
      Manager WaterStatus: same as Experiment.sensibility test.Block.WaterStatus
      Manager SowDateCv
        InitialRootDepth = 5
        CropToSow = Heyward_KK
        SowingDate = 05/25/2014 00:00:00
        script: same as in Experiment.sensibility test.Block.SowDateCv
      AgriChemical
      BiomassRemovalEvents OnPrune: same as TPROB4BB2016control.Block.OnPrune
  Simulation KatoaBB2008control
    Weather: FileName=Te Puke.met
    Clock: Start=2007-01-01; End=2009-06-30
    Summary
    SoilArbitrator Soil Arbitrator
    Zone Block: Area=1; Slope=0; AspectAngle=0; Altitude=50
      Report: same as HaywardTPBBCon1.Block.Report
      Report Stages
        VariableNames:
          [KiwiFruit].Phenology.MaxBBP
          [KiwiFruit].Phenology.FloweringDOY
      Plant KiwiFruit
      Fertiliser
      SurfaceOrganicMatter: InitialResidueName=wheat_stubble; InitialResidueType=wheat; InitialResidueMass=500; InitialStandingFraction=0; InitialCPR=0; InitialCNR=100
      Irrigation
      MicroClimate: a_interception=0; b_interception=1; c_interception=0; d_interception=0; SoilHeatFluxFraction=0.4; MinimumHeightDiffForNewLayer=0; NightInterceptionFraction=0.5; ReferenceHeight=2
      Manager ReportOnEvents: same as Experiment.sensibility test.Block.ReportOnEvents
      Manager Reset on date: same as Experiment.sensibility test.Block.Reset on date
      Soil: same as Experiment.sensibility test.Block.Soil
      Manager AutomaticIrrigation: same as Experiment.sensibility test.Block.AutomaticIrrigation
      Manager FactorLabels: same as Experiment.sensibility test.Block.FactorLabels
      Manager AutomaticFertiliser: same as Experiment.sensibility test.Block.AutomaticFertiliser
      Manager WaterStatus: same as Experiment.sensibility test.Block.WaterStatus
      Manager SowDateCv
        InitialRootDepth = 5
        CropToSow = Heyward_TP
        SowingDate = 05/25/2007 00:00:00
        script: same as in Experiment.sensibility test.Block.SowDateCv
      AgriChemical
      BiomassRemovalEvents OnPrune: same as TPROB4BB2016control.Block.OnPrune
  Simulation MeadBB2008control
    Weather: FileName=Te Puke.met
    Clock: Start=2007-01-01; End=2009-06-30
    Summary
    SoilArbitrator Soil Arbitrator
    Zone Block: same as KatoaBB2008control.Block
  Simulation KatoaBB2009control
    Weather: FileName=Te Puke.met
    Clock: Start=2008-01-01; End=2010-06-30
    Summary
    SoilArbitrator Soil Arbitrator
    Zone Block: Area=1; Slope=0; AspectAngle=0; Altitude=50
      Report: same as HaywardTPBBCon1.Block.Report
      Report Stages
        VariableNames:
          [KiwiFruit].Phenology.MaxBBP
          [KiwiFruit].Phenology.FloweringDOY
      Plant KiwiFruit
      Fertiliser
      SurfaceOrganicMatter: InitialResidueName=wheat_stubble; InitialResidueType=wheat; InitialResidueMass=500; InitialStandingFraction=0; InitialCPR=0; InitialCNR=100
      Irrigation
      MicroClimate: a_interception=0; b_interception=1; c_interception=0; d_interception=0; SoilHeatFluxFraction=0.4; MinimumHeightDiffForNewLayer=0; NightInterceptionFraction=0.5; ReferenceHeight=2
      Manager ReportOnEvents: same as Experiment.sensibility test.Block.ReportOnEvents
      Manager Reset on date: same as Experiment.sensibility test.Block.Reset on date
      Soil: same as Experiment.sensibility test.Block.Soil
      Manager AutomaticIrrigation: same as Experiment.sensibility test.Block.AutomaticIrrigation
      Manager FactorLabels: same as Experiment.sensibility test.Block.FactorLabels
      Manager AutomaticFertiliser: same as Experiment.sensibility test.Block.AutomaticFertiliser
      Manager WaterStatus: same as Experiment.sensibility test.Block.WaterStatus
      Manager SowDateCv
        InitialRootDepth = 5
        CropToSow = Heyward_TP
        SowingDate = 05/25/2008 00:00:00
        script: same as in Experiment.sensibility test.Block.SowDateCv
      AgriChemical
      BiomassRemovalEvents OnPrune: same as TPROB4BB2016control.Block.OnPrune
  Simulation MeadBB2009control
    Weather: FileName=Te Puke.met
    Clock: Start=2008-01-01; End=2010-06-30
    Summary
    SoilArbitrator Soil Arbitrator
    Zone Block: same as KatoaBB2009control.Block
  Simulation KatoaBB2010control
    Weather: FileName=Te Puke.met
    Clock: Start=2009-01-01; End=2011-06-30
    Summary
    SoilArbitrator Soil Arbitrator
    Zone Block: Area=1; Slope=0; AspectAngle=0; Altitude=50
      Report: same as HaywardTPBBCon1.Block.Report
      Report Stages
        VariableNames:
          [KiwiFruit].Phenology.MaxBBP
          [KiwiFruit].Phenology.FloweringDOY
      Plant KiwiFruit
      Fertiliser
      SurfaceOrganicMatter: InitialResidueName=wheat_stubble; InitialResidueType=wheat; InitialResidueMass=500; InitialStandingFraction=0; InitialCPR=0; InitialCNR=100
      Irrigation
      MicroClimate: a_interception=0; b_interception=1; c_interception=0; d_interception=0; SoilHeatFluxFraction=0.4; MinimumHeightDiffForNewLayer=0; NightInterceptionFraction=0.5; ReferenceHeight=2
      Manager ReportOnEvents: same as Experiment.sensibility test.Block.ReportOnEvents
      Manager Reset on date: same as Experiment.sensibility test.Block.Reset on date
      Soil: same as Experiment.sensibility test.Block.Soil
      Manager AutomaticIrrigation: same as Experiment.sensibility test.Block.AutomaticIrrigation
      Manager FactorLabels: same as Experiment.sensibility test.Block.FactorLabels
      Manager AutomaticFertiliser: same as Experiment.sensibility test.Block.AutomaticFertiliser
      Manager WaterStatus: same as Experiment.sensibility test.Block.WaterStatus
      Manager SowDateCv
        InitialRootDepth = 5
        CropToSow = Heyward_TP
        SowingDate = 05/25/2009 00:00:00
        script: same as in Experiment.sensibility test.Block.SowDateCv
      AgriChemical
      BiomassRemovalEvents OnPrune: same as TPROB4BB2016control.Block.OnPrune
  Simulation MeadBB2010control: same as KatoaBB2010control
  Simulation NBB2010control
    Weather: FileName=Kerikeri.met
    Clock: Start=2009-01-01; End=2011-06-30
    Summary
    SoilArbitrator Soil Arbitrator
    Zone Block: Area=1; Slope=0; AspectAngle=0; Altitude=50
      Report: same as HaywardTPBBCon1.Block.Report
      Report Stages
        VariableNames:
          [KiwiFruit].Phenology.MaxBBP
          [KiwiFruit].Phenology.FloweringDOY
      Plant KiwiFruit
      Fertiliser
      SurfaceOrganicMatter: InitialResidueName=wheat_stubble; InitialResidueType=wheat; InitialResidueMass=500; InitialStandingFraction=0; InitialCPR=0; InitialCNR=100
      Irrigation
      MicroClimate: a_interception=0; b_interception=1; c_interception=0; d_interception=0; SoilHeatFluxFraction=0.4; MinimumHeightDiffForNewLayer=0; NightInterceptionFraction=0.5; ReferenceHeight=2
      Manager ReportOnEvents: same as Experiment.sensibility test.Block.ReportOnEvents
      Manager Reset on date: same as Experiment.sensibility test.Block.Reset on date
      Soil: same as Experiment.sensibility test.Block.Soil
      Manager AutomaticIrrigation: same as Experiment.sensibility test.Block.AutomaticIrrigation
      Manager FactorLabels: same as Experiment.sensibility test.Block.FactorLabels
      Manager AutomaticFertiliser: same as Experiment.sensibility test.Block.AutomaticFertiliser
      Manager WaterStatus: same as Experiment.sensibility test.Block.WaterStatus
      Manager SowDateCv
        InitialRootDepth = 5
        CropToSow = Heyward_KK
        SowingDate = 05/25/2009 00:00:00
        script: same as in Experiment.sensibility test.Block.SowDateCv
      AgriChemical
      BiomassRemovalEvents OnPrune: same as TPROB4BB2016control.Block.OnPrune
  Simulation NBB2011control
    Weather: FileName=Kerikeri.met
    Clock: Start=2010-01-01; End=2012-06-30
    Summary
    SoilArbitrator Soil Arbitrator
    Zone Block: Area=1; Slope=0; AspectAngle=0; Altitude=50
      Report: same as HaywardTPBBCon1.Block.Report
      Report Stages
        VariableNames:
          [KiwiFruit].Phenology.MaxBBP
          [KiwiFruit].Phenology.FloweringDOY
      Plant KiwiFruit
      Fertiliser
      SurfaceOrganicMatter: InitialResidueName=wheat_stubble; InitialResidueType=wheat; InitialResidueMass=500; InitialStandingFraction=0; InitialCPR=0; InitialCNR=100
      Irrigation
      MicroClimate: a_interception=0; b_interception=1; c_interception=0; d_interception=0; SoilHeatFluxFraction=0.4; MinimumHeightDiffForNewLayer=0; NightInterceptionFraction=0.5; ReferenceHeight=2
      Manager ReportOnEvents: same as Experiment.sensibility test.Block.ReportOnEvents
      Manager Reset on date: same as Experiment.sensibility test.Block.Reset on date
      Soil: same as Experiment.sensibility test.Block.Soil
      Manager AutomaticIrrigation: same as Experiment.sensibility test.Block.AutomaticIrrigation
      Manager FactorLabels: same as Experiment.sensibility test.Block.FactorLabels
      Manager AutomaticFertiliser: same as Experiment.sensibility test.Block.AutomaticFertiliser
      Manager WaterStatus: same as Experiment.sensibility test.Block.WaterStatus
      Manager SowDateCv
        InitialRootDepth = 5
        CropToSow = Heyward_KK
        SowingDate = 05/25/2010 00:00:00
        script: same as in Experiment.sensibility test.Block.SowDateCv
      AgriChemical
      BiomassRemovalEvents OnPrune: same as TPROB4BB2016control.Block.OnPrune
  Simulation TeMaraBB2007Control (disabled)
    Weather: FileName=Te Puke.met
    Clock: Start=2007-01-01; End=2008-06-30
    Summary
    SoilArbitrator Soil Arbitrator
    Zone Block: Area=1; Slope=0; AspectAngle=0; Altitude=50
      Report: EventNames=[Clock].DoReport
        VariableNames:
          [KiwiFruit].Leaf.Wt
          [KiwiFruit].Leaf.Canopy.Height
          [KiwiFruit].Leaf.NodeNumber
          [Clock].Today
          [KiwiFruit].Phenology.Stage
          [KiwiFruit].Phenology.CurrentStageName
          [KiwiFruit].Stem.Wt
          [KiwiFruit].Trunk.Wt
          [KiwiFruit].Root.Wt
          [KiwiFruit].Fruit.Wt
          [KiwiFruit].Leaf.Photosynthesis
          [KiwiFruit].Leaf.Canopy.RadiationIntercepted
          [KiwiFruit].Leaf.Canopy.LAI
          [KiwiFruit].Leaf.AreaLargestLeaf
          [KiwiFruit].Phenology.ThermalTime
          [KiwiFruit].Phenology.ProportionBB
          [KiwiFruit].Phenology.BrokenBuds
          [KiwiFruit].Phenology.BudBurstDOY
          [KiwiFruit].Phenology.ProportionCU
          [KiwiFruit].Phenology.MaxBBP
          [KiwiFruit].Phenology.Flowering.ProgressThroughPhase
          [KiwiFruit].Phenology.FloweringDOY
      Report Stages
        VariableNames:
          [KiwiFruit].Phenology.MaxBBP
          [KiwiFruit].Phenology.FloweringDOY
      Plant KiwiFruit
      Fertiliser
      SurfaceOrganicMatter: InitialResidueName=wheat_stubble; InitialResidueType=wheat; InitialResidueMass=500; InitialStandingFraction=0; InitialCPR=0; InitialCNR=100
      Irrigation
      MicroClimate: a_interception=0; b_interception=1; c_interception=0; d_interception=0; SoilHeatFluxFraction=0.4; MinimumHeightDiffForNewLayer=0; NightInterceptionFraction=0.5; ReferenceHeight=2
      BiomassRemovalEvents OnHarvestAndPrune: NameOfPlantToRemoveFrom=KiwiFruit; RemovalType=2
      Manager ReportOnEvents
        script: same as in Experiment.sensibility test.Block.ReportOnEvents
      Manager Reset on date
        ResetWater = True
        ResetNutrients = True
        ResetSOM = True
        script: same as in Experiment.sensibility test.Block.Reset on date
      Soil: Latitude=0; Longitude=0
        LayerStructure: Thickness=[200, 200, 200, 200, 200, 200, 300, 300, 400, 800]
        Chemical: Thickness=[100, 200, 300, 300, 300, 300]; PH=[6.6, 6.2, 5.7, 5.5, 5.5, 5.5]; PHUnits=Water
        Water: Thickness=[300, 300, 300, 300, 300, 300, 1200]; InitialValues=[0.3, 0.21, 0.18, 0.17, 0.17, 0.17, 0.17]; FilledFromTop=false
        WaterBalance SoilWater: SummerDate=1-Nov; SummerU=9; SummerCona=4.4; WinterDate=1-Apr; WinterU=9; WinterCona=4.4; DiffusConst=88; DiffusSlope=35.4; Salb=0.3; CN2Bare=68; CNRed=20; CNCov=0.8; DischargeWidth=0; CatchmentArea=0; PSIDul=-100
          Thickness  SWCON  KLAT
          300        0.55   0
          300        0.55   0
          300        0.55   0
          300        0.55   0
          300        0.1    0
          300        0.02   0
          400        0.02   0
          800        0      0
        Organic: FOMCNRatio=30; CarbonUnits=Total
          Thickness  Carbon  SoilCNRatio  FBiom  FInert  FOM
          100        1.82    11.5         0.025  0.3     1243.931
          200        1.47    11.5         0.025  0.4     833.832
          300        1.2     11.5         0.015  0.75    457.617
          300        1.03    11.5         0.01   0.9     251.145
          300        0.47    11.5         0.01   0.96    137.831
          300        0.47    11.5         0.01   0.96    75.644
        OutputLayers: Thickness=[300, 300, 300, 300, 300, 300]
        Solute NO3: Thickness=[100, 200, 300, 300, 300, 300]; InitialValues=[217, 15, 1.66667, 1.66667, 0, 0]; InitialValuesUnits=ppm; WaterTableConcentration=0; D0=0; DepthConstant=0; MaxDepthSoluteAccessible=0; RunoffEffectivenessAtMovingSolute=0; MaxEffectiveRunoff=0
        Solute NH4: Thickness=[100, 200, 300, 300, 300, 300]; InitialValues=[0, 0, 0, 0, 0, 0]; InitialValuesUnits=ppm; WaterTableConcentration=0; D0=0; DepthConstant=0; MaxDepthSoluteAccessible=0; RunoffEffectivenessAtMovingSolute=0; MaxEffectiveRunoff=0
        Solute Urea: Thickness=[100, 200, 300, 300, 300, 300]; InitialValues=[0, 0, 0, 0, 0, 0]; InitialValuesUnits=kg/ha; WaterTableConcentration=0; D0=0; DepthConstant=0; MaxDepthSoluteAccessible=0; RunoffEffectivenessAtMovingSolute=0; MaxEffectiveRunoff=0
        Physical
          Thickness  ParticleSizeSand  ParticleSizeSilt  ParticleSizeClay  Rocks     BD  AirDry  LL15  DUL  SAT  KS
          300        5                 65                30                0.309221  1   0.15    0.15  0.3  0.4  100
          300        5                 65                30                0.309221  1   0.15    0.15  0.3  0.4  100
          300        5                 65                30                0.309221  1   0.15    0.15  0.3  0.4  50
          300        5                 65                30                0.309221  1   0.15    0.15  0.3  0.4  40
          300        5                 65                30                0.309221  1   0.15    0.15  0.3  0.4  40
          300        5                 65                30                0.309221  1   0.15    0.15  0.3  0.4  40
          1200       5                 65                30                0.309221  1   0.15    0.15  0.3  0.4  40
          Rocks, ParticleSizeSand, ParticleSizeSilt, ParticleSizeClay source: Calculated
          SoilCrop KiwiFruitSoil: LL=[0.15, 0.15, 0.15, 0.15, 0.15, 0.15, 0.15]; KL=[1, 1, 1, 1, 1, 1, 1]; XF=[1, 1, 1, 1, 1, 1, 1]
        Nutrient
        SoilTemperature Temperature
      Manager AutomaticIrrigation
        allowIrrigation = True
        seasonStart = 1-Aug
        seasonEnd = 30-May
        seasonsAllocation = 1000
        triggerDeficit = 70
        targetDeficit = 95
        returndays = 3
        maximumAmount = 30
        depthPAWC = 650
        script: same as in Experiment.sensibility test.Block.AutomaticIrrigation
      Manager FactorLabels
        AGENT_NO = 999
        Lat = 999
        Lon = 999
        SoilStamp = SiltLoam
        GCM = ERA
        RCP = ERA
        TS = BaseLine
        script: same as in Experiment.sensibility test.Block.FactorLabels
      Manager AutomaticFertiliser
        EachYear = True
        Dates = 30-nov, 15-apr
        UseCritNThreshold = False
        CritNThreshold = 50
        CritNDepth = 75
        Depth = 50
        Amount = 25
        FertiliserType = UreaN
        script: same as in Experiment.sensibility test.Block.AutomaticFertiliser
      Manager WaterStatus
        DepthToMonitorFollowRoots = False
        MinimumDepth = 0
        DepthToMonitor = 600
        script: same as in Experiment.sensibility test.Block.WaterStatus
      Manager SowDateCv
        InitialRootDepth = 5
        CropToSow = Heyward_TP
        SowingDate = 05/25/2007 00:00:00
        script: same as in Experiment.sensibility test.Block.SowDateCv
      Manager BudNumber
        MaxBudNum = 8.3
        script: same as in Experiment.sensibility test.Block.BudNumber
      AgriChemical
  Simulation TPROBB2007Control (disabled)
    Weather: FileName=Te Puke.met
    Clock: Start=2006-01-01; End=2008-06-30
    Summary
    SoilArbitrator Soil Arbitrator
    Zone Block: Area=1; Slope=0; AspectAngle=0; Altitude=50
      Report: same as TeMaraBB2007Control.Block.Report
      Report Stages
        VariableNames:
          [KiwiFruit].Phenology.MaxBBP
          [KiwiFruit].Phenology.FloweringDOY
      Plant KiwiFruit
      Fertiliser
      SurfaceOrganicMatter: InitialResidueName=wheat_stubble; InitialResidueType=wheat; InitialResidueMass=500; InitialStandingFraction=0; InitialCPR=0; InitialCNR=100
      Irrigation
      MicroClimate: a_interception=0; b_interception=1; c_interception=0; d_interception=0; SoilHeatFluxFraction=0.4; MinimumHeightDiffForNewLayer=0; NightInterceptionFraction=0.5; ReferenceHeight=2
      BiomassRemovalEvents OnHarvestAndPrune: NameOfPlantToRemoveFrom=KiwiFruit; RemovalType=2
      Manager ReportOnEvents: same as TeMaraBB2007Control.Block.ReportOnEvents
      Manager Reset on date: same as TeMaraBB2007Control.Block.Reset on date
      Soil: same as TeMaraBB2007Control.Block.Soil
      Manager AutomaticIrrigation: same as TeMaraBB2007Control.Block.AutomaticIrrigation
      Manager FactorLabels: same as TeMaraBB2007Control.Block.FactorLabels
      Manager AutomaticFertiliser: same as TeMaraBB2007Control.Block.AutomaticFertiliser
      Manager WaterStatus: same as TeMaraBB2007Control.Block.WaterStatus
      Manager SowDateCv
        InitialRootDepth = 5
        CropToSow = Heyward_TP
        SowingDate = 02/01/2007 00:00:00
        script: same as in Experiment.sensibility test.Block.SowDateCv
      Manager BudNumber
        MaxBudNum = 10
        script: same as in Experiment.sensibility test.Block.BudNumber
      AgriChemical
  Simulation TPHaywardBB2013Co
    Weather: FileName=Te Puke.met
    Clock: Start=2012-01-01; End=2014-06-30
    Summary
    SoilArbitrator Soil Arbitrator
    Zone Block: Area=1; Slope=0; AspectAngle=0; Altitude=50
      Report: same as HaywardTPBBCon1.Block.Report
      Report Stages
        VariableNames:
          [KiwiFruit].Phenology.MaxBBP
          [KiwiFruit].Phenology.FloweringDOY
      Plant KiwiFruit
      Fertiliser
      SurfaceOrganicMatter: InitialResidueName=wheat_stubble; InitialResidueType=wheat; InitialResidueMass=500; InitialStandingFraction=0; InitialCPR=0; InitialCNR=100
      Irrigation
      MicroClimate: a_interception=0; b_interception=1; c_interception=0; d_interception=0; SoilHeatFluxFraction=0.4; MinimumHeightDiffForNewLayer=0; NightInterceptionFraction=0.5; ReferenceHeight=2
      Manager ReportOnEvents: same as Experiment.sensibility test.Block.ReportOnEvents
      Manager Reset on date: same as Experiment.sensibility test.Block.Reset on date
      Soil: same as Experiment.sensibility test.Block.Soil
      Manager AutomaticIrrigation: same as Experiment.sensibility test.Block.AutomaticIrrigation
      Manager FactorLabels: same as Experiment.sensibility test.Block.FactorLabels
      Manager AutomaticFertiliser: same as Experiment.sensibility test.Block.AutomaticFertiliser
      Manager WaterStatus: same as Experiment.sensibility test.Block.WaterStatus
      Manager SowDateCv
        InitialRootDepth = 5
        CropToSow = Heyward_TP
        SowingDate = 05/25/2012 00:00:00
        script: same as in Experiment.sensibility test.Block.SowDateCv
      AgriChemical
      BiomassRemovalEvents OnPrune: same as TPROB4BB2016control.Block.OnPrune
  Simulation KKHaywardBB2013Co
    Weather: FileName=Kerikeri.met
    Clock: Start=2012-01-01; End=2014-06-30
    Summary
    SoilArbitrator Soil Arbitrator
    Zone Block: Area=1; Slope=0; AspectAngle=0; Altitude=50
      Report: same as HaywardTPBBCon1.Block.Report
      Report Stages
        VariableNames:
          [KiwiFruit].Phenology.MaxBBP
          [KiwiFruit].Phenology.FloweringDOY
      Plant KiwiFruit
      Fertiliser
      SurfaceOrganicMatter: InitialResidueName=wheat_stubble; InitialResidueType=wheat; InitialResidueMass=500; InitialStandingFraction=0; InitialCPR=0; InitialCNR=100
      Irrigation
      MicroClimate: a_interception=0; b_interception=1; c_interception=0; d_interception=0; SoilHeatFluxFraction=0.4; MinimumHeightDiffForNewLayer=0; NightInterceptionFraction=0.5; ReferenceHeight=2
      Manager ReportOnEvents: same as Experiment.sensibility test.Block.ReportOnEvents
      Manager Reset on date: same as Experiment.sensibility test.Block.Reset on date
      Soil: same as Experiment.sensibility test.Block.Soil
      Manager AutomaticIrrigation: same as Experiment.sensibility test.Block.AutomaticIrrigation
      Manager FactorLabels: same as Experiment.sensibility test.Block.FactorLabels
      Manager AutomaticFertiliser: same as Experiment.sensibility test.Block.AutomaticFertiliser
      Manager WaterStatus: same as Experiment.sensibility test.Block.WaterStatus
      Manager SowDateCv
        InitialRootDepth = 5
        CropToSow = Heyward_KK
        SowingDate = 05/25/2012 00:00:00
        script: same as in Experiment.sensibility test.Block.SowDateCv
      AgriChemical
      BiomassRemovalEvents OnPrune: same as TPROB4BB2016control.Block.OnPrune
  Simulation TPHaywardBB2018Control
    Weather: FileName=Te Puke.met
    Clock: Start=2017-01-01; End=2019-06-30
    Summary
    SoilArbitrator Soil Arbitrator
    Zone Block: Area=1; Slope=0; AspectAngle=0; Altitude=50
      Report: same as HaywardTPBBCon1.Block.Report
      Report Stages
        VariableNames:
          [KiwiFruit].Phenology.MaxBBP
          [KiwiFruit].Phenology.FloweringDOY
      Plant KiwiFruit
      Fertiliser
      SurfaceOrganicMatter: InitialResidueName=wheat_stubble; InitialResidueType=wheat; InitialResidueMass=500; InitialStandingFraction=0; InitialCPR=0; InitialCNR=100
      Irrigation
      MicroClimate: a_interception=0; b_interception=1; c_interception=0; d_interception=0; SoilHeatFluxFraction=0.4; MinimumHeightDiffForNewLayer=0; NightInterceptionFraction=0.5; ReferenceHeight=2
      Manager ReportOnEvents: same as Experiment.sensibility test.Block.ReportOnEvents
      Manager Reset on date: same as Experiment.sensibility test.Block.Reset on date
      Soil: same as Experiment.sensibility test.Block.Soil
      Manager AutomaticIrrigation: same as Experiment.sensibility test.Block.AutomaticIrrigation
      Manager FactorLabels: same as Experiment.sensibility test.Block.FactorLabels
      Manager AutomaticFertiliser: same as Experiment.sensibility test.Block.AutomaticFertiliser
      Manager WaterStatus: same as Experiment.sensibility test.Block.WaterStatus
      Manager SowDateCv
        InitialRootDepth = 5
        CropToSow = Heyward_TP
        SowingDate = 05/25/2017 00:00:00
        script: same as in Experiment.sensibility test.Block.SowDateCv
      AgriChemical
      BiomassRemovalEvents OnPrune: same as TPROB4BB2016control.Block.OnPrune
  Simulation KKHaywardBB2018UntreatedControl
    Weather: FileName=Kerikeri.met
    Clock: Start=2017-01-01; End=2024-06-30
    Summary
    SoilArbitrator Soil Arbitrator
    Zone Block: Area=1; Slope=0; AspectAngle=0; Altitude=50
      Report: EventNames=[Clock].DoReport
        VariableNames:
          [KiwiFruit].Leaf.Wt
          [KiwiFruit].Leaf.Canopy.Height
          [KiwiFruit].Leaf.NodeNumber
          [Clock].Today
          [KiwiFruit].Phenology.Stage
          [KiwiFruit].Phenology.CurrentStageName
          [KiwiFruit].Phenology.ProportionBB
          [KiwiFruit].Phenology.BrokenBuds
          [KiwiFruit].Phenology.BudBurstDOY
          [KiwiFruit].Phenology.EndoDormancy.ProgressThroughPhase
          [KiwiFruit].Phenology.EcoDormancy.ProgressThroughPhase
          [KiwiFruit].Phenology.BrokenBuds.Vegetative.BrokenBuds.Max_buds
          [KiwiFruit].Phenology.ProportionCU
          [KiwiFruit].Phenology.MaxBBP
          [KiwiFruit].Phenology.Flowering.ProgressThroughPhase
          [KiwiFruit].Phenology.FloweringDOY
      Report Stages
        VariableNames:
          [KiwiFruit].Phenology.MaxBBP
          [KiwiFruit].Phenology.FloweringDOY
      Plant KiwiFruit
      Fertiliser
      SurfaceOrganicMatter: InitialResidueName=wheat_stubble; InitialResidueType=wheat; InitialResidueMass=500; InitialStandingFraction=0; InitialCPR=0; InitialCNR=100
      Irrigation
      MicroClimate: a_interception=0; b_interception=1; c_interception=0; d_interception=0; SoilHeatFluxFraction=0.4; MinimumHeightDiffForNewLayer=0; NightInterceptionFraction=0.5; ReferenceHeight=2
      Manager ReportOnEvents: same as Experiment.sensibility test.Block.ReportOnEvents
      Manager Reset on date: same as Experiment.sensibility test.Block.Reset on date
      Soil: same as Experiment.sensibility test.Block.Soil
      Manager AutomaticIrrigation: same as Experiment.sensibility test.Block.AutomaticIrrigation
      Manager FactorLabels: same as Experiment.sensibility test.Block.FactorLabels
      Manager AutomaticFertiliser: same as Experiment.sensibility test.Block.AutomaticFertiliser
      Manager WaterStatus: same as Experiment.sensibility test.Block.WaterStatus
      Manager SowDateCv
        InitialRootDepth = 5
        CropToSow = Heyward_KK
        SowingDate = 05/25/2017 00:00:00
        script: same as in Experiment.sensibility test.Block.SowDateCv
      AgriChemical
      BiomassRemovalEvents OnPrune: same as TPROB4BB2016control.Block.OnPrune
  Simulation HaywardBB2019Untreatedcontrol
    Weather: FileName=Kerikeri.met
    Clock: Start=2018-01-01; End=2020-06-30
    Summary
    SoilArbitrator Soil Arbitrator
    Zone Block: Area=1; Slope=0; AspectAngle=0; Altitude=50
      Report: EventNames=[Clock].DoReport
        VariableNames:
          [KiwiFruit].Leaf.Wt
          [KiwiFruit].Leaf.Canopy.Height
          [KiwiFruit].Leaf.NodeNumber
          [Clock].Today
          [KiwiFruit].Phenology.Stage
          [KiwiFruit].Phenology.CurrentStageName
          [KiwiFruit].Phenology.ThermalTime
          [KiwiFruit].Phenology.ProportionBB
          [KiwiFruit].Phenology.BrokenBuds
          [KiwiFruit].Phenology.BudBurstDOY
          [KiwiFruit].Phenology.ProportionCU
          [KiwiFruit].Phenology.MaxBBP
          [KiwiFruit].Phenology.Flowering.ProgressThroughPhase
          [KiwiFruit].Phenology.FloweringDOY
      Report Stages
        VariableNames:
          [KiwiFruit].Phenology.MaxBBP
          [KiwiFruit].Phenology.FloweringDOY
      Plant KiwiFruit
      Fertiliser
      SurfaceOrganicMatter: InitialResidueName=wheat_stubble; InitialResidueType=wheat; InitialResidueMass=500; InitialStandingFraction=0; InitialCPR=0; InitialCNR=100
      Irrigation
      MicroClimate: a_interception=0; b_interception=1; c_interception=0; d_interception=0; SoilHeatFluxFraction=0.4; MinimumHeightDiffForNewLayer=0; NightInterceptionFraction=0.5; ReferenceHeight=2
      Manager ReportOnEvents
        script: same as in Experiment.sensibility test.Block.ReportOnEvents
      Manager Reset on date: same as Experiment.sensibility test.Block.Reset on date
      Soil: same as Experiment.sensibility test.Block.Soil
      Manager AutomaticIrrigation: same as Experiment.sensibility test.Block.AutomaticIrrigation
      Manager FactorLabels: same as Experiment.sensibility test.Block.FactorLabels
      Manager AutomaticFertiliser: same as Experiment.sensibility test.Block.AutomaticFertiliser
      Manager WaterStatus: same as Experiment.sensibility test.Block.WaterStatus
      Manager SowDateCv
        InitialRootDepth = 5
        CropToSow = Heyward_KK
        SowingDate = 05/25/2018 00:00:00
        script: same as in Experiment.sensibility test.Block.SowDateCv
      AgriChemical
      BiomassRemovalEvents OnPrune: same as TPROB4BB2016control.Block.OnPrune
  Simulation HWBBRaw2020Control
    Weather: FileName=Kerikeri.met
    Clock: Start=2019-01-01; End=2021-06-30
    Summary
    SoilArbitrator Soil Arbitrator
    Zone Block: Area=1; Slope=0; AspectAngle=0; Altitude=50
      Report: same as HaywardBB2019Untreatedcontrol.Block.Report
      Report Stages
        VariableNames:
          [KiwiFruit].Phenology.MaxBBP
          [KiwiFruit].Phenology.FloweringDOY
      Plant KiwiFruit
      Fertiliser
      SurfaceOrganicMatter: InitialResidueName=wheat_stubble; InitialResidueType=wheat; InitialResidueMass=500; InitialStandingFraction=0; InitialCPR=0; InitialCNR=100
      Irrigation
      MicroClimate: a_interception=0; b_interception=1; c_interception=0; d_interception=0; SoilHeatFluxFraction=0.4; MinimumHeightDiffForNewLayer=0; NightInterceptionFraction=0.5; ReferenceHeight=2
      Manager ReportOnEvents
        script: same as in Experiment.sensibility test.Block.ReportOnEvents
      Manager Reset on date: same as Experiment.sensibility test.Block.Reset on date
      Soil: same as Experiment.sensibility test.Block.Soil
      Manager AutomaticIrrigation: same as Experiment.sensibility test.Block.AutomaticIrrigation
      Manager FactorLabels: same as Experiment.sensibility test.Block.FactorLabels
      Manager AutomaticFertiliser: same as Experiment.sensibility test.Block.AutomaticFertiliser
      Manager WaterStatus: same as Experiment.sensibility test.Block.WaterStatus
      Manager SowDateCv
        InitialRootDepth = 5
        CropToSow = Heyward_KK
        SowingDate = 05/25/2019 00:00:00
        script: same as in Experiment.sensibility test.Block.SowDateCv
      AgriChemical
      BiomassRemovalEvents OnPrune: same as TPROB4BB2016control.Block.OnPrune
  Simulation HWBBRaw2021Control (disabled)
    Weather: FileName=Kerikeri.met
    Clock: Start=2020-01-01; End=2022-06-30
    Summary
    SoilArbitrator Soil Arbitrator
    Zone Block: Area=1; Slope=0; AspectAngle=0; Altitude=50
      Report: EventNames=[Clock].DoReport
        VariableNames:
          [KiwiFruit].Leaf.Wt
          [KiwiFruit].Leaf.Canopy.Height
          [KiwiFruit].Leaf.NodeNumber
          [Clock].Today
          [KiwiFruit].Phenology.Stage
          [KiwiFruit].Phenology.CurrentStageName
          [KiwiFruit].Phenology.ThermalTime
          [KiwiFruit].Phenology.ProportionBB
          [KiwiFruit].Phenology.BrokenBuds
          [KiwiFruit].Phenology.BudBurstDOY
          [KiwiFruit].Phenology.ProportionCU
          [KiwiFruit].Phenology.MaxBBP
          [KiwiFruit].Phenology.Flowering.ProgressThroughPhase
          [KiwiFruit].Phenology.FloweringDOY
      Report Stages
        VariableNames:
          [KiwiFruit].Phenology.MaxBBP
          [KiwiFruit].Phenology.FloweringDOY
      Plant KiwiFruit
      Fertiliser
      SurfaceOrganicMatter: InitialResidueName=wheat_stubble; InitialResidueType=wheat; InitialResidueMass=500; InitialStandingFraction=0; InitialCPR=0; InitialCNR=100
      Irrigation
      MicroClimate: a_interception=0; b_interception=1; c_interception=0; d_interception=0; SoilHeatFluxFraction=0.4; MinimumHeightDiffForNewLayer=0; NightInterceptionFraction=0.5; ReferenceHeight=2
      BiomassRemovalEvents OnHarvestAndPrune: NameOfPlantToRemoveFrom=KiwiFruit; RemovalType=2
      Manager ReportOnEvents: same as TeMaraBB2007Control.Block.ReportOnEvents
      Manager Reset on date: same as TeMaraBB2007Control.Block.Reset on date
      Soil: same as TeMaraBB2007Control.Block.Soil
      Manager AutomaticIrrigation: same as TeMaraBB2007Control.Block.AutomaticIrrigation
      Manager FactorLabels: same as TeMaraBB2007Control.Block.FactorLabels
      Manager AutomaticFertiliser: same as TeMaraBB2007Control.Block.AutomaticFertiliser
      Manager WaterStatus: same as TeMaraBB2007Control.Block.WaterStatus
      Manager SowDateCv
        InitialRootDepth = 5
        CropToSow = Heyward_KK
        SowingDate = 05/25/2020 00:00:00
        script: same as in Experiment.sensibility test.Block.SowDateCv
      Manager BudNumber
        MaxBudNum = 8.75
        script: same as in Experiment.sensibility test.Block.BudNumber
      AgriChemical
  Simulation HWBBRaw2022Control (disabled)
    Weather: FileName=Kerikeri.met
    Clock: Start=2021-01-01; End=2023-06-30
    Summary
    SoilArbitrator Soil Arbitrator
    Zone Block: Area=1; Slope=0; AspectAngle=0; Altitude=50
      Report: same as HWBBRaw2021Control.Block.Report
      Report Stages
        VariableNames:
          [KiwiFruit].Phenology.MaxBBP
          [KiwiFruit].Phenology.FloweringDOY
      Plant KiwiFruit
      Fertiliser
      SurfaceOrganicMatter: InitialResidueName=wheat_stubble; InitialResidueType=wheat; InitialResidueMass=500; InitialStandingFraction=0; InitialCPR=0; InitialCNR=100
      Irrigation
      MicroClimate: a_interception=0; b_interception=1; c_interception=0; d_interception=0; SoilHeatFluxFraction=0.4; MinimumHeightDiffForNewLayer=0; NightInterceptionFraction=0.5; ReferenceHeight=2
      BiomassRemovalEvents OnHarvestAndPrune: NameOfPlantToRemoveFrom=KiwiFruit; RemovalType=2
      Manager ReportOnEvents: same as TeMaraBB2007Control.Block.ReportOnEvents
      Manager Reset on date: same as TeMaraBB2007Control.Block.Reset on date
      Soil: same as TeMaraBB2007Control.Block.Soil
      Manager AutomaticIrrigation: same as TeMaraBB2007Control.Block.AutomaticIrrigation
      Manager FactorLabels: same as TeMaraBB2007Control.Block.FactorLabels
      Manager AutomaticFertiliser: same as TeMaraBB2007Control.Block.AutomaticFertiliser
      Manager WaterStatus: same as TeMaraBB2007Control.Block.WaterStatus
      Manager SowDateCv
        InitialRootDepth = 5
        CropToSow = Heyward_KK
        SowingDate = 05/25/2021 00:00:00
        script: same as in Experiment.sensibility test.Block.SowDateCv
      Manager BudNumber
        MaxBudNum = 2.5
        script: same as in Experiment.sensibility test.Block.BudNumber
      AgriChemical
  Simulation HWBBSpray2020Untreatedcontrol
    Weather: FileName=Kerikeri.met
    Clock: Start=2019-01-01; End=2021-06-30
    Summary
    SoilArbitrator Soil Arbitrator
    Zone Block: Area=1; Slope=0; AspectAngle=0; Altitude=50
      Report: EventNames=[Clock].DoReport
        VariableNames:
          [KiwiFruit].Leaf.Wt
          [KiwiFruit].Leaf.Canopy.Height
          [KiwiFruit].Leaf.NodeNumber
          [Clock].Today
          [KiwiFruit].Phenology.Stage
          [KiwiFruit].Phenology.CurrentStageName
          [KiwiFruit].Leaf.AreaLargestLeaf
          [KiwiFruit].Phenology.ThermalTime
          [KiwiFruit].Phenology.ProportionBB
          [KiwiFruit].Phenology.BrokenBuds
          [KiwiFruit].Phenology.BudBurstDOY
          [KiwiFruit].Phenology.MaxBBP
          [KiwiFruit].Phenology.Flowering.ProgressThroughPhase
          [KiwiFruit].Phenology.FloweringDOY
      Report Stages
        VariableNames:
          [KiwiFruit].Phenology.MaxBBP
          [KiwiFruit].Phenology.FloweringDOY
      Plant KiwiFruit
      Fertiliser
      SurfaceOrganicMatter: InitialResidueName=wheat_stubble; InitialResidueType=wheat; InitialResidueMass=500; InitialStandingFraction=0; InitialCPR=0; InitialCNR=100
      Irrigation
      MicroClimate: a_interception=0; b_interception=1; c_interception=0; d_interception=0; SoilHeatFluxFraction=0.4; MinimumHeightDiffForNewLayer=0; NightInterceptionFraction=0.5; ReferenceHeight=2
      Manager ReportOnEvents: same as Experiment.sensibility test.Block.ReportOnEvents
      Manager Reset on date: same as Experiment.sensibility test.Block.Reset on date
      Soil: same as Experiment.sensibility test.Block.Soil
      Manager AutomaticIrrigation: same as Experiment.sensibility test.Block.AutomaticIrrigation
      Manager FactorLabels: same as Experiment.sensibility test.Block.FactorLabels
      Manager AutomaticFertiliser: same as Experiment.sensibility test.Block.AutomaticFertiliser
      Manager WaterStatus: same as Experiment.sensibility test.Block.WaterStatus
      Manager SowDateCv: same as HWBBRaw2020Control.Block.SowDateCv
      AgriChemical
      BiomassRemovalEvents OnPrune: same as TPROB4BB2016control.Block.OnPrune
  Simulation HW-BudbreakTP2020Control
    Weather: FileName=Te Puke.met
    Clock: Start=2019-01-01; End=2021-06-30
    Summary
    SoilArbitrator Soil Arbitrator
    Zone Block: Area=1; Slope=0; AspectAngle=0; Altitude=50
      Report: EventNames=[Clock].DoReport
        VariableNames:
          [KiwiFruit].Leaf.Wt
          [KiwiFruit].Leaf.Canopy.Height
          [KiwiFruit].Leaf.NodeNumber
          [Clock].Today
          [KiwiFruit].Phenology.Stage
          [KiwiFruit].Phenology.CurrentStageName
          [KiwiFruit].Phenology.ProportionBB
          [KiwiFruit].Phenology.BrokenBuds
          [KiwiFruit].Phenology.BudBurstDOY
          [KiwiFruit].Phenology.BrokenBuds.Vegetative.BrokenBuds.Max_buds
          [KiwiFruit].Phenology.EndoDormancy.ProgressThroughPhase
          [KiwiFruit].Phenology.EcoDormancy.ProgressThroughPhase
          [KiwiFruit].Phenology.ProportionCU
          [KiwiFruit].Phenology.EarlyLeaf.ProgressThroughPhase
          [KiwiFruit].Phenology.Flowering.ProgressThroughPhase
          [KiwiFruit].Phenology.FloweringDOY
          [KiwiFruit].Phenology.AccumulatedChillingPreEndo
      Report Stages
        VariableNames:
          [KiwiFruit].Phenology.MaxBBP
          [KiwiFruit].Phenology.FloweringDOY
      Plant KiwiFruit
      Fertiliser
      SurfaceOrganicMatter: InitialResidueName=wheat_stubble; InitialResidueType=wheat; InitialResidueMass=500; InitialStandingFraction=0; InitialCPR=0; InitialCNR=100
      Irrigation
      MicroClimate: a_interception=0; b_interception=1; c_interception=0; d_interception=0; SoilHeatFluxFraction=0.4; MinimumHeightDiffForNewLayer=0; NightInterceptionFraction=0.5; ReferenceHeight=2
      Manager ReportOnEvents
        script: same as in Experiment.sensibility test.Block.ReportOnEvents
      Manager Reset on date: same as Experiment.sensibility test.Block.Reset on date
      Soil: same as Experiment.sensibility test.Block.Soil
      Manager AutomaticIrrigation: same as Experiment.sensibility test.Block.AutomaticIrrigation
      Manager FactorLabels: same as Experiment.sensibility test.Block.FactorLabels
      Manager AutomaticFertiliser: same as Experiment.sensibility test.Block.AutomaticFertiliser
      Manager WaterStatus: same as Experiment.sensibility test.Block.WaterStatus
      Manager SowDateCv: same as HWBBRaw2020Control.Block.SowDateCv
      AgriChemical
      BiomassRemovalEvents OnPrune: same as TPROB4BB2016control.Block.OnPrune
  Simulation HWBBRawTP2021Control
    Weather: FileName=Te Puke.met
    Clock: Start=2020-01-01; End=2022-06-30
    Summary
    SoilArbitrator Soil Arbitrator
    Zone Block: Area=1; Slope=0; AspectAngle=0; Altitude=50
      Report: same as HW-BudbreakTP2020Control.Block.Report
      Report Stages
        VariableNames:
          [KiwiFruit].Phenology.MaxBBP
          [KiwiFruit].Phenology.FloweringDOY
      Plant KiwiFruit
      Fertiliser
      SurfaceOrganicMatter: InitialResidueName=wheat_stubble; InitialResidueType=wheat; InitialResidueMass=500; InitialStandingFraction=0; InitialCPR=0; InitialCNR=100
      Irrigation
      MicroClimate: a_interception=0; b_interception=1; c_interception=0; d_interception=0; SoilHeatFluxFraction=0.4; MinimumHeightDiffForNewLayer=0; NightInterceptionFraction=0.5; ReferenceHeight=2
      Manager ReportOnEvents: same as HW-BudbreakTP2020Control.Block.ReportOnEvents
      Manager Reset on date: same as Experiment.sensibility test.Block.Reset on date
      Soil: same as Experiment.sensibility test.Block.Soil
      Manager AutomaticIrrigation: same as Experiment.sensibility test.Block.AutomaticIrrigation
      Manager FactorLabels: same as Experiment.sensibility test.Block.FactorLabels
      Manager AutomaticFertiliser: same as Experiment.sensibility test.Block.AutomaticFertiliser
      Manager WaterStatus: same as Experiment.sensibility test.Block.WaterStatus
      Manager SowDateCv
        InitialRootDepth = 5
        CropToSow = Heyward_KK
        SowingDate = 05/25/2020 00:00:00
        script: same as in Experiment.sensibility test.Block.SowDateCv
      AgriChemical
      BiomassRemovalEvents OnPrune: same as TPROB4BB2016control.Block.OnPrune
  Simulation HW-Budbreak-TP2020Control
    Weather: FileName=Te Puke.met
    Clock: Start=2019-01-01; End=2021-06-30
    Summary
    SoilArbitrator Soil Arbitrator
    Zone Block: same as HW-BudbreakTP2020Control.Block
  Simulation HW-BudbreakTP2020HiCane223
    Weather: FileName=Te Puke.met
    Clock: Start=2019-01-01; End=2021-06-30
    Summary
    SoilArbitrator Soil Arbitrator
    Zone Block: Area=1; Slope=0; AspectAngle=0; Altitude=50
      Report: same as HW-BudbreakTP2020Control.Block.Report
      Report Stages
        VariableNames:
          [KiwiFruit].Phenology.MaxBBP
          [KiwiFruit].Phenology.FloweringDOY
      Plant KiwiFruit
      Fertiliser
      SurfaceOrganicMatter: InitialResidueName=wheat_stubble; InitialResidueType=wheat; InitialResidueMass=500; InitialStandingFraction=0; InitialCPR=0; InitialCNR=100
      Irrigation
      MicroClimate: a_interception=0; b_interception=1; c_interception=0; d_interception=0; SoilHeatFluxFraction=0.4; MinimumHeightDiffForNewLayer=0; NightInterceptionFraction=0.5; ReferenceHeight=2
      Manager ReportOnEvents: same as HW-BudbreakTP2020Control.Block.ReportOnEvents
      Manager Reset on date: same as Experiment.sensibility test.Block.Reset on date
      Soil: same as Experiment.sensibility test.Block.Soil
      Manager AutomaticIrrigation: same as Experiment.sensibility test.Block.AutomaticIrrigation
      Manager FactorLabels: same as Experiment.sensibility test.Block.FactorLabels
      Manager AutomaticFertiliser: same as Experiment.sensibility test.Block.AutomaticFertiliser
      Manager WaterStatus: same as Experiment.sensibility test.Block.WaterStatus
      Manager SowDateCv
        InitialRootDepth = 5
        CropToSow = Heyward_TP
        SowingDate = 05/25/2019 00:00:00
        script: same as in Experiment.sensibility test.Block.SowDateCv
      AgriChemical
      Operations
        2020-08-10  [AgriChemical].Apply()
      BiomassRemovalEvents OnPrune: same as TPROB4BB2016control.Block.OnPrune
  Simulation HW-Budbreak-TP2020HiCane226
    Weather: FileName=Te Puke.met
    Clock: Start=2019-01-01; End=2021-06-30
    Summary
    SoilArbitrator Soil Arbitrator
    Zone Block: Area=1; Slope=0; AspectAngle=0; Altitude=50
      Report: same as HW-BudbreakTP2020Control.Block.Report
      Report Stages
        VariableNames:
          [KiwiFruit].Phenology.MaxBBP
          [KiwiFruit].Phenology.FloweringDOY
      Plant KiwiFruit
      Fertiliser
      SurfaceOrganicMatter: InitialResidueName=wheat_stubble; InitialResidueType=wheat; InitialResidueMass=500; InitialStandingFraction=0; InitialCPR=0; InitialCNR=100
      Irrigation
      MicroClimate: a_interception=0; b_interception=1; c_interception=0; d_interception=0; SoilHeatFluxFraction=0.4; MinimumHeightDiffForNewLayer=0; NightInterceptionFraction=0.5; ReferenceHeight=2
      Manager ReportOnEvents: same as HW-BudbreakTP2020Control.Block.ReportOnEvents
      Manager Reset on date: same as Experiment.sensibility test.Block.Reset on date
      Soil: same as Experiment.sensibility test.Block.Soil
      Manager AutomaticIrrigation: same as Experiment.sensibility test.Block.AutomaticIrrigation
      Manager FactorLabels: same as Experiment.sensibility test.Block.FactorLabels
      Manager AutomaticFertiliser: same as Experiment.sensibility test.Block.AutomaticFertiliser
      Manager WaterStatus: same as Experiment.sensibility test.Block.WaterStatus
      Manager SowDateCv: same as HW-BudbreakTP2020HiCane223.Block.SowDateCv
      AgriChemical
      Operations
        2020-08-13  [AgriChemical].Apply()
      BiomassRemovalEvents OnPrune: same as TPROB4BB2016control.Block.OnPrune
  Simulation HWBBRawTP2021HiCane223
    Weather: FileName=Te Puke.met
    Clock: Start=2020-01-01; End=2022-06-30
    Summary
    SoilArbitrator Soil Arbitrator
    Zone Block: Area=1; Slope=0; AspectAngle=0; Altitude=50
      Report: same as HW-BudbreakTP2020Control.Block.Report
      Report Stages
        VariableNames:
          [KiwiFruit].Phenology.MaxBBP
          [KiwiFruit].Phenology.FloweringDOY
      Plant KiwiFruit
      Fertiliser
      SurfaceOrganicMatter: InitialResidueName=wheat_stubble; InitialResidueType=wheat; InitialResidueMass=500; InitialStandingFraction=0; InitialCPR=0; InitialCNR=100
      Irrigation
      MicroClimate: a_interception=0; b_interception=1; c_interception=0; d_interception=0; SoilHeatFluxFraction=0.4; MinimumHeightDiffForNewLayer=0; NightInterceptionFraction=0.5; ReferenceHeight=2
      Manager ReportOnEvents: same as HW-BudbreakTP2020Control.Block.ReportOnEvents
      Manager Reset on date: same as Experiment.sensibility test.Block.Reset on date
      Soil: same as Experiment.sensibility test.Block.Soil
      Manager AutomaticIrrigation: same as Experiment.sensibility test.Block.AutomaticIrrigation
      Manager FactorLabels: same as Experiment.sensibility test.Block.FactorLabels
      Manager AutomaticFertiliser: same as Experiment.sensibility test.Block.AutomaticFertiliser
      Manager WaterStatus: same as Experiment.sensibility test.Block.WaterStatus
      Manager SowDateCv
        InitialRootDepth = 5
        CropToSow = Heyward_TP
        SowingDate = 05/25/2020 00:00:00
        script: same as in Experiment.sensibility test.Block.SowDateCv
      AgriChemical
      Operations
        2021-08-11  [AgriChemical].Apply()
      BiomassRemovalEvents OnPrune: same as TPROB4BB2016control.Block.OnPrune
  Simulation HWBBRawTP2021HiCane232
    Weather: FileName=Te Puke.met
    Clock: Start=2020-01-01; End=2022-06-30
    Summary
    SoilArbitrator Soil Arbitrator
    Zone Block: Area=1; Slope=0; AspectAngle=0; Altitude=50
      Report: same as HW-BudbreakTP2020Control.Block.Report
      Report Stages
        VariableNames:
          [KiwiFruit].Phenology.MaxBBP
          [KiwiFruit].Phenology.FloweringDOY
      Plant KiwiFruit
      Fertiliser
      SurfaceOrganicMatter: InitialResidueName=wheat_stubble; InitialResidueType=wheat; InitialResidueMass=500; InitialStandingFraction=0; InitialCPR=0; InitialCNR=100
      Irrigation
      MicroClimate: a_interception=0; b_interception=1; c_interception=0; d_interception=0; SoilHeatFluxFraction=0.4; MinimumHeightDiffForNewLayer=0; NightInterceptionFraction=0.5; ReferenceHeight=2
      Manager ReportOnEvents: same as HW-BudbreakTP2020Control.Block.ReportOnEvents
      Manager Reset on date: same as Experiment.sensibility test.Block.Reset on date
      Soil: same as Experiment.sensibility test.Block.Soil
      Manager AutomaticIrrigation: same as Experiment.sensibility test.Block.AutomaticIrrigation
      Manager FactorLabels: same as Experiment.sensibility test.Block.FactorLabels
      Manager AutomaticFertiliser: same as Experiment.sensibility test.Block.AutomaticFertiliser
      Manager WaterStatus: same as Experiment.sensibility test.Block.WaterStatus
      Manager SowDateCv: same as HWBBRawTP2021HiCane223.Block.SowDateCv
      AgriChemical
      Operations
        2021-08-20  [AgriChemical].Apply()
      BiomassRemovalEvents OnPrune: same as TPROB4BB2016control.Block.OnPrune
  Simulation NBB2010HC236
    Weather: FileName=Kerikeri.met
    Clock: Start=2009-01-01; End=2011-06-30
    Summary
    SoilArbitrator Soil Arbitrator
    Zone Block: Area=1; Slope=0; AspectAngle=0; Altitude=50
      Report: same as HW-BudbreakTP2020Control.Block.Report
      Report Stages
        VariableNames:
          [KiwiFruit].Phenology.MaxBBP
          [KiwiFruit].Phenology.FloweringDOY
      Plant KiwiFruit
      Fertiliser
      SurfaceOrganicMatter: InitialResidueName=wheat_stubble; InitialResidueType=wheat; InitialResidueMass=500; InitialStandingFraction=0; InitialCPR=0; InitialCNR=100
      Irrigation
      MicroClimate: a_interception=0; b_interception=1; c_interception=0; d_interception=0; SoilHeatFluxFraction=0.4; MinimumHeightDiffForNewLayer=0; NightInterceptionFraction=0.5; ReferenceHeight=2
      Manager ReportOnEvents: same as HW-BudbreakTP2020Control.Block.ReportOnEvents
      Manager Reset on date: same as Experiment.sensibility test.Block.Reset on date
      Soil: same as Experiment.sensibility test.Block.Soil
      Manager AutomaticIrrigation: same as Experiment.sensibility test.Block.AutomaticIrrigation
      Manager FactorLabels: same as Experiment.sensibility test.Block.FactorLabels
      Manager AutomaticFertiliser: same as Experiment.sensibility test.Block.AutomaticFertiliser
      Manager WaterStatus: same as Experiment.sensibility test.Block.WaterStatus
      Manager SowDateCv: same as NBB2010control.Block.SowDateCv
      AgriChemical
      Operations
        2010-08-24  [AgriChemical].Apply()
      BiomassRemovalEvents OnPrune: same as TPROB4BB2016control.Block.OnPrune
  Simulation NBB2011HC248
    Weather: FileName=Kerikeri.met
    Clock: Start=2010-01-01; End=2012-06-30
    Summary
    SoilArbitrator Soil Arbitrator
    Zone Block: Area=1; Slope=0; AspectAngle=0; Altitude=50
      Report: same as HW-BudbreakTP2020Control.Block.Report
      Report Stages
        VariableNames:
          [KiwiFruit].Phenology.MaxBBP
          [KiwiFruit].Phenology.FloweringDOY
      Plant KiwiFruit
      Fertiliser
      SurfaceOrganicMatter: InitialResidueName=wheat_stubble; InitialResidueType=wheat; InitialResidueMass=500; InitialStandingFraction=0; InitialCPR=0; InitialCNR=100
      Irrigation
      MicroClimate: a_interception=0; b_interception=1; c_interception=0; d_interception=0; SoilHeatFluxFraction=0.4; MinimumHeightDiffForNewLayer=0; NightInterceptionFraction=0.5; ReferenceHeight=2
      Manager ReportOnEvents: same as HW-BudbreakTP2020Control.Block.ReportOnEvents
      Manager Reset on date: same as Experiment.sensibility test.Block.Reset on date
      Soil: same as Experiment.sensibility test.Block.Soil
      Manager AutomaticIrrigation: same as Experiment.sensibility test.Block.AutomaticIrrigation
      Manager FactorLabels: same as Experiment.sensibility test.Block.FactorLabels
      Manager AutomaticFertiliser: same as Experiment.sensibility test.Block.AutomaticFertiliser
      Manager WaterStatus: same as Experiment.sensibility test.Block.WaterStatus
      Manager SowDateCv: same as NBB2011control.Block.SowDateCv
      AgriChemical
      Operations
        2011-09-05  [AgriChemical].Apply()
      BiomassRemovalEvents OnPrune: same as TPROB4BB2016control.Block.OnPrune
  Simulation KKHaywardBB2013HC239
    Weather: FileName=Kerikeri.met
    Clock: Start=2012-01-01; End=2014-06-30
    Summary
    SoilArbitrator Soil Arbitrator
    Zone Block: Area=1; Slope=0; AspectAngle=0; Altitude=50
      Report: same as HW-BudbreakTP2020Control.Block.Report
      Report Stages
        VariableNames:
          [KiwiFruit].Phenology.MaxBBP
          [KiwiFruit].Phenology.FloweringDOY
      Plant KiwiFruit
      Fertiliser
      SurfaceOrganicMatter: InitialResidueName=wheat_stubble; InitialResidueType=wheat; InitialResidueMass=500; InitialStandingFraction=0; InitialCPR=0; InitialCNR=100
      Irrigation
      MicroClimate: a_interception=0; b_interception=1; c_interception=0; d_interception=0; SoilHeatFluxFraction=0.4; MinimumHeightDiffForNewLayer=0; NightInterceptionFraction=0.5; ReferenceHeight=2
      Manager ReportOnEvents: same as HW-BudbreakTP2020Control.Block.ReportOnEvents
      Manager Reset on date: same as Experiment.sensibility test.Block.Reset on date
      Soil: same as Experiment.sensibility test.Block.Soil
      Manager AutomaticIrrigation: same as Experiment.sensibility test.Block.AutomaticIrrigation
      Manager FactorLabels: same as Experiment.sensibility test.Block.FactorLabels
      Manager AutomaticFertiliser: same as Experiment.sensibility test.Block.AutomaticFertiliser
      Manager WaterStatus: same as Experiment.sensibility test.Block.WaterStatus
      Manager SowDateCv: same as KKHaywardBB2013Co.Block.SowDateCv
      AgriChemical
      Operations
        2013-08-27  [AgriChemical].Apply()
      BiomassRemovalEvents OnPrune: same as TPROB4BB2016control.Block.OnPrune
  Simulation KKHaywardBB2018HiCaneDriftstop239
    Weather: FileName=Kerikeri.met
    Clock: Start=2017-01-01; End=2019-06-30
    Summary
    SoilArbitrator Soil Arbitrator
    Zone Block: Area=1; Slope=0; AspectAngle=0; Altitude=50
      Report: same as HW-BudbreakTP2020Control.Block.Report
      Report Stages
        VariableNames:
          [KiwiFruit].Phenology.MaxBBP
          [KiwiFruit].Phenology.FloweringDOY
      Plant KiwiFruit
      Fertiliser
      SurfaceOrganicMatter: InitialResidueName=wheat_stubble; InitialResidueType=wheat; InitialResidueMass=500; InitialStandingFraction=0; InitialCPR=0; InitialCNR=100
      Irrigation
      MicroClimate: a_interception=0; b_interception=1; c_interception=0; d_interception=0; SoilHeatFluxFraction=0.4; MinimumHeightDiffForNewLayer=0; NightInterceptionFraction=0.5; ReferenceHeight=2
      Manager ReportOnEvents: same as HW-BudbreakTP2020Control.Block.ReportOnEvents
      Manager Reset on date: same as Experiment.sensibility test.Block.Reset on date
      Soil: same as Experiment.sensibility test.Block.Soil
      Manager AutomaticIrrigation: same as Experiment.sensibility test.Block.AutomaticIrrigation
      Manager FactorLabels: same as Experiment.sensibility test.Block.FactorLabels
      Manager AutomaticFertiliser: same as Experiment.sensibility test.Block.AutomaticFertiliser
      Manager WaterStatus: same as Experiment.sensibility test.Block.WaterStatus
      Manager SowDateCv: same as KKHaywardBB2018UntreatedControl.Block.SowDateCv
      AgriChemical
      Operations
        2018-08-27  [AgriChemical].Apply()
      BiomassRemovalEvents OnPrune: same as TPROB4BB2016control.Block.OnPrune
  Simulation KKHaywardBB2018HiCaneDriftstop248
    Weather: FileName=Kerikeri.met
    Clock: Start=2017-01-01; End=2019-06-30
    Summary
    SoilArbitrator Soil Arbitrator
    Zone Block: Area=1; Slope=0; AspectAngle=0; Altitude=50
      Report: same as HW-BudbreakTP2020Control.Block.Report
      Report Stages
        VariableNames:
          [KiwiFruit].Phenology.MaxBBP
          [KiwiFruit].Phenology.FloweringDOY
      Plant KiwiFruit
      Fertiliser
      SurfaceOrganicMatter: InitialResidueName=wheat_stubble; InitialResidueType=wheat; InitialResidueMass=500; InitialStandingFraction=0; InitialCPR=0; InitialCNR=100
      Irrigation
      MicroClimate: a_interception=0; b_interception=1; c_interception=0; d_interception=0; SoilHeatFluxFraction=0.4; MinimumHeightDiffForNewLayer=0; NightInterceptionFraction=0.5; ReferenceHeight=2
      Manager ReportOnEvents: same as HW-BudbreakTP2020Control.Block.ReportOnEvents
      Manager Reset on date: same as Experiment.sensibility test.Block.Reset on date
      Soil: same as Experiment.sensibility test.Block.Soil
      Manager AutomaticIrrigation: same as Experiment.sensibility test.Block.AutomaticIrrigation
      Manager FactorLabels: same as Experiment.sensibility test.Block.FactorLabels
      Manager AutomaticFertiliser: same as Experiment.sensibility test.Block.AutomaticFertiliser
      Manager WaterStatus: same as Experiment.sensibility test.Block.WaterStatus
      Manager SowDateCv: same as KKHaywardBB2018UntreatedControl.Block.SowDateCv
      AgriChemical
      Operations
        2018-09-05  [AgriChemical].Apply()
      BiomassRemovalEvents OnPrune: same as TPROB4BB2016control.Block.OnPrune
  Simulation HaywardBB2019HCDS236
    Weather: FileName=Kerikeri.met
    Clock: Start=2018-01-01; End=2020-06-30
    Summary
    SoilArbitrator Soil Arbitrator
    Zone Block: Area=1; Slope=0; AspectAngle=0; Altitude=50
      Report: same as HW-BudbreakTP2020Control.Block.Report
      Report Stages
        VariableNames:
          [KiwiFruit].Phenology.MaxBBP
          [KiwiFruit].Phenology.FloweringDOY
      Plant KiwiFruit
      Fertiliser
      SurfaceOrganicMatter: InitialResidueName=wheat_stubble; InitialResidueType=wheat; InitialResidueMass=500; InitialStandingFraction=0; InitialCPR=0; InitialCNR=100
      Irrigation
      MicroClimate: a_interception=0; b_interception=1; c_interception=0; d_interception=0; SoilHeatFluxFraction=0.4; MinimumHeightDiffForNewLayer=0; NightInterceptionFraction=0.5; ReferenceHeight=2
      Manager ReportOnEvents: same as HW-BudbreakTP2020Control.Block.ReportOnEvents
      Manager Reset on date: same as Experiment.sensibility test.Block.Reset on date
      Soil: same as Experiment.sensibility test.Block.Soil
      Manager AutomaticIrrigation: same as Experiment.sensibility test.Block.AutomaticIrrigation
      Manager FactorLabels: same as Experiment.sensibility test.Block.FactorLabels
      Manager AutomaticFertiliser: same as Experiment.sensibility test.Block.AutomaticFertiliser
      Manager WaterStatus: same as Experiment.sensibility test.Block.WaterStatus
      Manager SowDateCv: same as HaywardBB2019Untreatedcontrol.Block.SowDateCv
      AgriChemical
      Operations
        2019-08-24  [AgriChemical].Apply()
      BiomassRemovalEvents OnPrune: same as TPROB4BB2016control.Block.OnPrune
  Simulation HaywardBB2019HCDS243
    Weather: FileName=Kerikeri.met
    Clock: Start=2018-01-01; End=2020-06-30
    Summary
    SoilArbitrator Soil Arbitrator
    Zone Block: Area=1; Slope=0; AspectAngle=0; Altitude=50
      Report: same as HW-BudbreakTP2020Control.Block.Report
      Report Stages
        VariableNames:
          [KiwiFruit].Phenology.MaxBBP
          [KiwiFruit].Phenology.FloweringDOY
      Plant KiwiFruit
      Fertiliser
      SurfaceOrganicMatter: InitialResidueName=wheat_stubble; InitialResidueType=wheat; InitialResidueMass=500; InitialStandingFraction=0; InitialCPR=0; InitialCNR=100
      Irrigation
      MicroClimate: a_interception=0; b_interception=1; c_interception=0; d_interception=0; SoilHeatFluxFraction=0.4; MinimumHeightDiffForNewLayer=0; NightInterceptionFraction=0.5; ReferenceHeight=2
      Manager ReportOnEvents: same as HW-BudbreakTP2020Control.Block.ReportOnEvents
      Manager Reset on date: same as Experiment.sensibility test.Block.Reset on date
      Soil: same as Experiment.sensibility test.Block.Soil
      Manager AutomaticIrrigation: same as Experiment.sensibility test.Block.AutomaticIrrigation
      Manager FactorLabels: same as Experiment.sensibility test.Block.FactorLabels
      Manager AutomaticFertiliser: same as Experiment.sensibility test.Block.AutomaticFertiliser
      Manager WaterStatus: same as Experiment.sensibility test.Block.WaterStatus
      Manager SowDateCv: same as HaywardBB2019Untreatedcontrol.Block.SowDateCv
      AgriChemical
      Operations
        2019-08-31  [AgriChemical].Apply()
      BiomassRemovalEvents OnPrune: same as TPROB4BB2016control.Block.OnPrune
  Simulation HWBBRaw2020HiCaneDriftstop240
    Weather: FileName=Kerikeri.met
    Clock: Start=2019-01-01; End=2021-06-30
    Summary
    SoilArbitrator Soil Arbitrator
    Zone Block: Area=1; Slope=0; AspectAngle=0; Altitude=50
      Report: same as HW-BudbreakTP2020Control.Block.Report
      Report Stages
        VariableNames:
          [KiwiFruit].Phenology.MaxBBP
          [KiwiFruit].Phenology.FloweringDOY
      Plant KiwiFruit
      Fertiliser
      SurfaceOrganicMatter: InitialResidueName=wheat_stubble; InitialResidueType=wheat; InitialResidueMass=500; InitialStandingFraction=0; InitialCPR=0; InitialCNR=100
      Irrigation
      MicroClimate: a_interception=0; b_interception=1; c_interception=0; d_interception=0; SoilHeatFluxFraction=0.4; MinimumHeightDiffForNewLayer=0; NightInterceptionFraction=0.5; ReferenceHeight=2
      Manager ReportOnEvents: same as HW-BudbreakTP2020Control.Block.ReportOnEvents
      Manager Reset on date: same as Experiment.sensibility test.Block.Reset on date
      Soil: same as Experiment.sensibility test.Block.Soil
      Manager AutomaticIrrigation: same as Experiment.sensibility test.Block.AutomaticIrrigation
      Manager FactorLabels: same as Experiment.sensibility test.Block.FactorLabels
      Manager AutomaticFertiliser: same as Experiment.sensibility test.Block.AutomaticFertiliser
      Manager WaterStatus: same as Experiment.sensibility test.Block.WaterStatus
      Manager SowDateCv: same as HWBBRaw2020Control.Block.SowDateCv
      AgriChemical
      Operations
        2020-08-27  [AgriChemical].Apply()
      BiomassRemovalEvents OnPrune: same as TPROB4BB2016control.Block.OnPrune
  Simulation HWBBRaw2020HiCaneDriftstop235
    Weather: FileName=Kerikeri.met
    Clock: Start=2019-01-01; End=2021-06-30
    Summary
    SoilArbitrator Soil Arbitrator
    Zone Block: Area=1; Slope=0; AspectAngle=0; Altitude=50
      Report: same as HW-BudbreakTP2020Control.Block.Report
      Report Stages
        VariableNames:
          [KiwiFruit].Phenology.MaxBBP
          [KiwiFruit].Phenology.FloweringDOY
      Plant KiwiFruit
      Fertiliser
      SurfaceOrganicMatter: InitialResidueName=wheat_stubble; InitialResidueType=wheat; InitialResidueMass=500; InitialStandingFraction=0; InitialCPR=0; InitialCNR=100
      Irrigation
      MicroClimate: a_interception=0; b_interception=1; c_interception=0; d_interception=0; SoilHeatFluxFraction=0.4; MinimumHeightDiffForNewLayer=0; NightInterceptionFraction=0.5; ReferenceHeight=2
      Manager ReportOnEvents: same as HW-BudbreakTP2020Control.Block.ReportOnEvents
      Manager Reset on date: same as Experiment.sensibility test.Block.Reset on date
      Soil: same as Experiment.sensibility test.Block.Soil
      Manager AutomaticIrrigation: same as Experiment.sensibility test.Block.AutomaticIrrigation
      Manager FactorLabels: same as Experiment.sensibility test.Block.FactorLabels
      Manager AutomaticFertiliser: same as Experiment.sensibility test.Block.AutomaticFertiliser
      Manager WaterStatus: same as Experiment.sensibility test.Block.WaterStatus
      Manager SowDateCv: same as HWBBRaw2020Control.Block.SowDateCv
      AgriChemical
      Operations
        2020-08-22  [AgriChemical].Apply()
      BiomassRemovalEvents OnPrune: same as TPROB4BB2016control.Block.OnPrune
  Simulation HWBBRaw2020HiCaneDriftstop247
    Weather: FileName=Kerikeri.met
    Clock: Start=2019-01-01; End=2021-06-30
    Summary
    SoilArbitrator Soil Arbitrator
    Zone Block: Area=1; Slope=0; AspectAngle=0; Altitude=50
      Report: same as HW-BudbreakTP2020Control.Block.Report
      Report Stages
        VariableNames:
          [KiwiFruit].Phenology.MaxBBP
          [KiwiFruit].Phenology.FloweringDOY
      Plant KiwiFruit
      Fertiliser
      SurfaceOrganicMatter: InitialResidueName=wheat_stubble; InitialResidueType=wheat; InitialResidueMass=500; InitialStandingFraction=0; InitialCPR=0; InitialCNR=100
      Irrigation
      MicroClimate: a_interception=0; b_interception=1; c_interception=0; d_interception=0; SoilHeatFluxFraction=0.4; MinimumHeightDiffForNewLayer=0; NightInterceptionFraction=0.5; ReferenceHeight=2
      Manager ReportOnEvents: same as HW-BudbreakTP2020Control.Block.ReportOnEvents
      Manager Reset on date: same as Experiment.sensibility test.Block.Reset on date
      Soil: same as Experiment.sensibility test.Block.Soil
      Manager AutomaticIrrigation: same as Experiment.sensibility test.Block.AutomaticIrrigation
      Manager FactorLabels: same as Experiment.sensibility test.Block.FactorLabels
      Manager AutomaticFertiliser: same as Experiment.sensibility test.Block.AutomaticFertiliser
      Manager WaterStatus: same as Experiment.sensibility test.Block.WaterStatus
      Manager SowDateCv: same as HWBBRaw2020Control.Block.SowDateCv
      AgriChemical
      Operations
        2020-09-03  [AgriChemical].Apply()
      BiomassRemovalEvents OnPrune: same as TPROB4BB2016control.Block.OnPrune
  Simulation HWBBSpray2020HiCaneDriftstop248
    Weather: FileName=Kerikeri.met
    Clock: Start=2019-01-01; End=2021-06-30
    Summary
    SoilArbitrator Soil Arbitrator
    Zone Block: Area=1; Slope=0; AspectAngle=0; Altitude=50
      Report: same as HW-BudbreakTP2020Control.Block.Report
      Report Stages
        VariableNames:
          [KiwiFruit].Phenology.MaxBBP
          [KiwiFruit].Phenology.FloweringDOY
      Plant KiwiFruit
      Fertiliser
      SurfaceOrganicMatter: InitialResidueName=wheat_stubble; InitialResidueType=wheat; InitialResidueMass=500; InitialStandingFraction=0; InitialCPR=0; InitialCNR=100
      Irrigation
      MicroClimate: a_interception=0; b_interception=1; c_interception=0; d_interception=0; SoilHeatFluxFraction=0.4; MinimumHeightDiffForNewLayer=0; NightInterceptionFraction=0.5; ReferenceHeight=2
      Manager ReportOnEvents: same as HW-BudbreakTP2020Control.Block.ReportOnEvents
      Manager Reset on date: same as Experiment.sensibility test.Block.Reset on date
      Soil: same as Experiment.sensibility test.Block.Soil
      Manager AutomaticIrrigation: same as Experiment.sensibility test.Block.AutomaticIrrigation
      Manager FactorLabels: same as Experiment.sensibility test.Block.FactorLabels
      Manager AutomaticFertiliser: same as Experiment.sensibility test.Block.AutomaticFertiliser
      Manager WaterStatus: same as Experiment.sensibility test.Block.WaterStatus
      Manager SowDateCv: same as HWBBRaw2020Control.Block.SowDateCv
      AgriChemical
      Operations
        2020-09-04  [AgriChemical].Apply()
      BiomassRemovalEvents OnPrune: same as TPROB4BB2016control.Block.OnPrune
  Simulation HWBBSpray2020HiCaneDriftstop243
    Weather: FileName=Kerikeri.met
    Clock: Start=2019-01-01; End=2021-06-30
    Summary
    SoilArbitrator Soil Arbitrator
    Zone Block: Area=1; Slope=0; AspectAngle=0; Altitude=50
      Report: same as HW-BudbreakTP2020Control.Block.Report
      Report Stages
        VariableNames:
          [KiwiFruit].Phenology.MaxBBP
          [KiwiFruit].Phenology.FloweringDOY
      Plant KiwiFruit
      Fertiliser
      SurfaceOrganicMatter: InitialResidueName=wheat_stubble; InitialResidueType=wheat; InitialResidueMass=500; InitialStandingFraction=0; InitialCPR=0; InitialCNR=100
      Irrigation
      MicroClimate: a_interception=0; b_interception=1; c_interception=0; d_interception=0; SoilHeatFluxFraction=0.4; MinimumHeightDiffForNewLayer=0; NightInterceptionFraction=0.5; ReferenceHeight=2
      Manager ReportOnEvents: same as HW-BudbreakTP2020Control.Block.ReportOnEvents
      Manager Reset on date: same as Experiment.sensibility test.Block.Reset on date
      Soil: Latitude=0; Longitude=0
        LayerStructure: Thickness=[200, 200, 200, 200, 200, 200, 300, 300, 400, 800]
        Chemical: PHUnits=Water
          Thickness  PH   CEC
          100        6.6  12.44
          200        6.2  11.6525
          300        5.7  11.045
          300        5.5  10.6625
          300        5.5  9.4025
          300        5.5  9.4025
          CEC source: Calculated
        Water: Thickness=[300, 300, 300, 300, 300, 300, 1200]; InitialValues=[0.3, 0.21, 0.18, 0.17, 0.17, 0.17, 0.17]; FilledFromTop=false
        WaterBalance SoilWater: same as Experiment.sensibility test.Block.Soil.SoilWater
        Organic: same as Experiment.sensibility test.Block.Soil.Organic
        OutputLayers: Thickness=[300, 300, 300, 300, 300, 300]
        Solute NO3: same as Experiment.sensibility test.Block.Soil.NO3
        Solute NH4: same as Experiment.sensibility test.Block.Soil.NH4
        Solute Urea: same as Experiment.sensibility test.Block.Soil.Urea
        Physical: same as Experiment.sensibility test.Block.Soil.Physical
        Nutrient
        SoilTemperature Temperature
      Manager AutomaticIrrigation: same as Experiment.sensibility test.Block.AutomaticIrrigation
      Manager FactorLabels: same as Experiment.sensibility test.Block.FactorLabels
      Manager AutomaticFertiliser: same as Experiment.sensibility test.Block.AutomaticFertiliser
      Manager WaterStatus: same as Experiment.sensibility test.Block.WaterStatus
      Manager SowDateCv
        InitialRootDepth = 5
        CropToSow = Heyward_KK
        SowingDate = 05/25/2019 00:00:00
```csharp
using Models.Soils;
using System;
using Models.Core;
using System.Collections.Generic;
using System.Text;
using Models.PMF;
using Models;
using System.Xml.Serialization;
using APSIM.Shared.Utilities;
using System.Data;
using Models.PMF.Interfaces;
using Models.Surface;

namespace Models
{
    [Serializable] 
    //[System.Xml.Serialization.XmlInclude(typeof(Model))]
    public class Script : Model
    {
        [Link] Plant KiwiFruit;
        [Link] Clock Clock;
        [Link] Zone zone;
        [Link] Simulation Simulation;
        [Link] SurfaceOrganicMatter SurfOM;
        
                
        [Description("Initial Root Depth")]
        public double InitialRootDepth { get; set; }
        [Description("Sown Crop")]
        public string CropToSow { get; set; }
        [Description("Sowing Date")]
        public DateTime SowingDate { get; set; }
        
        
        [EventSubscribe("DoManagement")]
        private void OnDoManagement(object sender, EventArgs e)
        {
            if (Clock.Today.Date == SowingDate)
            {
                KiwiFruit.Sow(cultivar: CropToSow, population: 0.041, depth: InitialRootDepth, rowSpacing: 4);}            
            
            
        }
    }
}
```
      AgriChemical
      Operations
        2020-08-30  [AgriChemical].Apply()
      BiomassRemovalEvents OnPrune: NameOfPlantToRemoveFrom=KiwiFruit; RemovalType=3
        BiomassRemovalFractions:
          PlantName  OrganName  TypeString  LiveToRemove  DeadToRemove  LiveToResidue  DeadToResidue
          KiwiFruit  Trunk      Pruning     0             0             0              0
          KiwiFruit  Leaf       Pruning     0             0             1              1
          KiwiFruit  Stem       Pruning     0             0             1              1
          KiwiFruit  Root       Pruning     0             0             0              0
          KiwiFruit  Fruit      Pruning     0.9           0             0.1            0
    Memo
      Relationship between canopy density and fruit quality of kiwifruit

      Abstract: mean leaf area index (LAI) values ranging from 3.0 to 5.5 m2 (Hayward)
    Memo
      Relationship between canopy density and fruit quality of kiwifruit

      Abstract: mean leaf area index (LAI) values ranging from 3.0 to 5.5 m2 (Hayward)
    Memo
      Annette Richardson's thesis: Fig 3.10.A

      Carbon acquisition of single shoots on daily basis (~photosynthesis?)
    Memo
      Annette Richardson's thesis: Fig 3.10.A

      Carbon acquisition of single shoots on daily basis (~photosynthesis?)
  Simulation Gold_Kiwifruit_LAI_Test
    Weather: FileName=Kerikeri.met
    Clock: Start=2007-01-01; End=2015-06-30
    Summary
    SoilArbitrator Soil Arbitrator
    Zone Block: Area=1; Slope=0; AspectAngle=0; Altitude=50
      Report: EventNames=[Clock].DoReport
      Report Stages
        VariableNames:
          [KiwiFruit].Phenology.MaxBBP
          [KiwiFruit].Phenology.FloweringDOY
      Plant KiwiFruit
      Fertiliser
      SurfaceOrganicMatter: InitialResidueName=wheat_stubble; InitialResidueType=wheat; InitialResidueMass=500; InitialStandingFraction=0; InitialCPR=0; InitialCNR=100
      Irrigation
      MicroClimate: a_interception=0; b_interception=1; c_interception=0; d_interception=0; SoilHeatFluxFraction=0.4; MinimumHeightDiffForNewLayer=0; NightInterceptionFraction=0.5; ReferenceHeight=2
      Manager ReportOnEvents: same as HW-BudbreakTP2020Control.Block.ReportOnEvents
      Manager Reset on date: same as Experiment.sensibility test.Block.Reset on date
      Soil: same as HWBBSpray2020HiCaneDriftstop243.Block.Soil
      Manager AutomaticIrrigation: same as Experiment.sensibility test.Block.AutomaticIrrigation
      Manager FactorLabels: same as Experiment.sensibility test.Block.FactorLabels
      Manager AutomaticFertiliser: same as Experiment.sensibility test.Block.AutomaticFertiliser
      Manager WaterStatus: same as Experiment.sensibility test.Block.WaterStatus
      Manager SowDateCv
        InitialRootDepth = 5
        CropToSow = Gold
        SowingDate = 05/25/2007 00:00:00
```csharp
using Models.Soils;
using System;
using Models.Core;
using System.Collections.Generic;
using System.Text;
using Models.PMF;
using Models;
using System.Xml.Serialization;
using APSIM.Shared.Utilities;
using System.Data;
using Models.PMF.Interfaces;
using Models.Surface;

namespace Models
{
    [Serializable] 
    //[System.Xml.Serialization.XmlInclude(typeof(Model))]
    public class Script : Model
    {
        [Link] Plant KiwiFruit;
        [Link] Clock Clock;
        [Link] Zone zone;
        [Link] Simulation Simulation;
        [Link] SurfaceOrganicMatter SurfOM;
        
                
        [Description("Initial Root Depth")]
        public double InitialRootDepth { get; set; }
        [Description("Sown Crop")]
        public string CropToSow { get; set; }
        [Description("Sowing Date")]
        public DateTime SowingDate { get; set; }
        
        
        [EventSubscribe("DoManagement")]
        private void OnDoManagement(object sender, EventArgs e)
        {
            if (Clock.Today.Date == SowingDate)
            {
                KiwiFruit.Sow(cultivar: CropToSow, population: 1, depth: InitialRootDepth, rowSpacing: 500);}            
            
            
        }
    }
}
```
      AgriChemical
      Operations
      BiomassRemovalEvents OnPrune: same as Experiment.sensibility test.Block.OnPrune
    Memo
      Vigor-controlling rootstocks affect early shoot growth and leaf area development of kiwifruit

      Fig.1, typical LAI of 2-5 m2 (Gold)

      To check the single shoot areas, remove the factor of "[Leaf].DeltaLAI.Vegetative.Delta.VineShoots.ShootNumber" to just calculate lai for 1 shoot. Compare with the following:

      Table 5, single shoot leaf area (short/medium/long shoots) ranges from 0.06 to 0.25 m2.
    Memo: same as Gold_Kiwifruit_LAI_Test.Memo
  Folder FruitingAll
    Simulation TPHW2016_2024
      Weather: FileName=Te Puke.met
      Clock: Start=2014-01-01; End=2024-12-30
      Summary
      SoilArbitrator Soil Arbitrator
      Zone Block: Area=1; Slope=0; AspectAngle=0; Altitude=50
        Report: same as HW-BudbreakTP2020Control.Block.Report
        Report Stages
          VariableNames:
            [KiwiFruit].Phenology.MaxBBP
            [KiwiFruit].Phenology.FloweringDOY
        Plant KiwiFruit
        Fertiliser
        SurfaceOrganicMatter: InitialResidueName=wheat_stubble; InitialResidueType=wheat; InitialResidueMass=500; InitialStandingFraction=0; InitialCPR=0; InitialCNR=100
        Irrigation
        MicroClimate: a_interception=0; b_interception=1; c_interception=0; d_interception=0; SoilHeatFluxFraction=0.4; MinimumHeightDiffForNewLayer=0; NightInterceptionFraction=0.5; ReferenceHeight=2
        Manager ReportOnEvents: same as HW-BudbreakTP2020Control.Block.ReportOnEvents
        Manager Reset on date: same as Experiment.sensibility test.Block.Reset on date
        Soil: same as HWBBSpray2020HiCaneDriftstop243.Block.Soil
        Manager AutomaticIrrigation: same as Experiment.sensibility test.Block.AutomaticIrrigation
        Manager FactorLabels: same as Experiment.sensibility test.Block.FactorLabels
        Manager AutomaticFertiliser: same as Experiment.sensibility test.Block.AutomaticFertiliser
        Manager WaterStatus: same as Experiment.sensibility test.Block.WaterStatus
        Manager SowDateCv
          InitialRootDepth = 5
          CropToSow = Heyward_TP
          SowingDate = 05/25/2014 00:00:00
          script: same as in HWBBSpray2020HiCaneDriftstop243.Block.SowDateCv
        AgriChemical
        Operations
        BiomassRemovalEvents OnPrune: same as HWBBSpray2020HiCaneDriftstop243.Block.OnPrune
      Memo
        Relationship between canopy density and fruit quality of kiwifruit

        Abstract: mean leaf area index (LAI) values ranging from 3.0 to 5.5 m2 (Hayward)
      Memo
        Relationship between canopy density and fruit quality of kiwifruit

        Abstract: mean leaf area index (LAI) values ranging from 3.0 to 5.5 m2 (Hayward)
      Memo
        Annette Richardson's thesis: Fig 3.10.A

        Carbon acquisition of single shoots on daily basis (~photosynthesis?)
      Memo
        Steve Green's report : @@ZesIR-Avg Fruit growth (2025).xlsx
      Memo
        Steve Green's report : @@ZesIR-Avg Fruit growth (2025).xlsx
      Memo
        Steve Green's report : @@ZesIR-Avg Fruit growth (2025).xlsx
      Memo
        Steve Green's report : @@ZesIR-Avg Fruit growth (2025).xlsx
    Simulation KKHW2020_2024
      Weather: FileName=Kerikeri.met
      Clock: Start=2018-01-01; End=2024-12-30
      Summary
      SoilArbitrator Soil Arbitrator
      Zone Block: Area=1; Slope=0; AspectAngle=0; Altitude=50
        Report: same as HW-BudbreakTP2020Control.Block.Report
        Report Stages
          VariableNames:
            [KiwiFruit].Phenology.MaxBBP
            [KiwiFruit].Phenology.FloweringDOY
        Plant KiwiFruit
        Fertiliser
        SurfaceOrganicMatter: InitialResidueName=wheat_stubble; InitialResidueType=wheat; InitialResidueMass=500; InitialStandingFraction=0; InitialCPR=0; InitialCNR=100
        Irrigation
        MicroClimate: a_interception=0; b_interception=1; c_interception=0; d_interception=0; SoilHeatFluxFraction=0.4; MinimumHeightDiffForNewLayer=0; NightInterceptionFraction=0.5; ReferenceHeight=2
        Manager ReportOnEvents: same as HW-BudbreakTP2020Control.Block.ReportOnEvents
        Manager Reset on date: same as Experiment.sensibility test.Block.Reset on date
        Soil: same as HWBBSpray2020HiCaneDriftstop243.Block.Soil
        Manager AutomaticIrrigation: same as Experiment.sensibility test.Block.AutomaticIrrigation
        Manager FactorLabels: same as Experiment.sensibility test.Block.FactorLabels
        Manager AutomaticFertiliser: same as Experiment.sensibility test.Block.AutomaticFertiliser
        Manager WaterStatus: same as Experiment.sensibility test.Block.WaterStatus
        Manager SowDateCv
          InitialRootDepth = 5
          CropToSow = Heyward_KK
          SowingDate = 05/25/2018 00:00:00
          script: same as in HWBBSpray2020HiCaneDriftstop243.Block.SowDateCv
        AgriChemical
        Operations
        BiomassRemovalEvents OnPrune: same as HWBBSpray2020HiCaneDriftstop243.Block.OnPrune
      Memo
        Relationship between canopy density and fruit quality of kiwifruit

        Abstract: mean leaf area index (LAI) values ranging from 3.0 to 5.5 m2 (Hayward)
      Memo
        Relationship between canopy density and fruit quality of kiwifruit

        Abstract: mean leaf area index (LAI) values ranging from 3.0 to 5.5 m2 (Hayward)
      Memo
        Annette Richardson's thesis: Fig 3.10.A

        Carbon acquisition of single shoots on daily basis (~photosynthesis?)
      Memo
        Steve Green's report : @@ZesIR-Avg Fruit growth (2025).xlsx
      Memo
        Steve Green's report : @@ZesIR-Avg Fruit growth (2025).xlsx
      Memo
        Steve Green's report : @@ZesIR-Avg Fruit growth (2025).xlsx
  Folder FruitingAllByYear
    Simulation TPHW2016
      Weather: FileName=Te Puke.met
      Clock: Start=2014-01-01; End=2017-12-30
      Summary
      SoilArbitrator Soil Arbitrator
      Zone Block: same as FruitingAll.TPHW2016_2024.Block
      Memo
        Relationship between canopy density and fruit quality of kiwifruit

        Abstract: mean leaf area index (LAI) values ranging from 3.0 to 5.5 m2 (Hayward)
      Memo
        Relationship between canopy density and fruit quality of kiwifruit

        Abstract: mean leaf area index (LAI) values ranging from 3.0 to 5.5 m2 (Hayward)
      Memo
        Annette Richardson's thesis: Fig 3.10.A

        Carbon acquisition of single shoots on daily basis (~photosynthesis?)
      Memo
        Steve Green's report : @@ZesIR-Avg Fruit growth (2025).xlsx
      Memo
        Steve Green's report : @@ZesIR-Avg Fruit growth (2025).xlsx
      Memo
        Steve Green's report : @@ZesIR-Avg Fruit growth (2025).xlsx
    Simulation TPHW2017
      Weather: FileName=Te Puke.met
      Clock: Start=2015-01-01; End=2018-12-30
      Summary
      SoilArbitrator Soil Arbitrator
      Zone Block: Area=1; Slope=0; AspectAngle=0; Altitude=50
        Report: same as HW-BudbreakTP2020Control.Block.Report
        Report Stages
          VariableNames:
            [KiwiFruit].Phenology.MaxBBP
            [KiwiFruit].Phenology.FloweringDOY
        Plant KiwiFruit
        Fertiliser
        SurfaceOrganicMatter: InitialResidueName=wheat_stubble; InitialResidueType=wheat; InitialResidueMass=500; InitialStandingFraction=0; InitialCPR=0; InitialCNR=100
        Irrigation
        MicroClimate: a_interception=0; b_interception=1; c_interception=0; d_interception=0; SoilHeatFluxFraction=0.4; MinimumHeightDiffForNewLayer=0; NightInterceptionFraction=0.5; ReferenceHeight=2
        Manager ReportOnEvents: same as HW-BudbreakTP2020Control.Block.ReportOnEvents
        Manager Reset on date: same as Experiment.sensibility test.Block.Reset on date
        Soil: same as HWBBSpray2020HiCaneDriftstop243.Block.Soil
        Manager AutomaticIrrigation: same as Experiment.sensibility test.Block.AutomaticIrrigation
        Manager FactorLabels: same as Experiment.sensibility test.Block.FactorLabels
        Manager AutomaticFertiliser: same as Experiment.sensibility test.Block.AutomaticFertiliser
        Manager WaterStatus: same as Experiment.sensibility test.Block.WaterStatus
        Manager SowDateCv
          InitialRootDepth = 5
          CropToSow = Heyward_TP
          SowingDate = 05/25/2015 00:00:00
          script: same as in HWBBSpray2020HiCaneDriftstop243.Block.SowDateCv
        AgriChemical
        Operations
        BiomassRemovalEvents OnPrune: same as HWBBSpray2020HiCaneDriftstop243.Block.OnPrune
      Memo
        Relationship between canopy density and fruit quality of kiwifruit

        Abstract: mean leaf area index (LAI) values ranging from 3.0 to 5.5 m2 (Hayward)
      Memo
        Relationship between canopy density and fruit quality of kiwifruit

        Abstract: mean leaf area index (LAI) values ranging from 3.0 to 5.5 m2 (Hayward)
      Memo
        Annette Richardson's thesis: Fig 3.10.A

        Carbon acquisition of single shoots on daily basis (~photosynthesis?)
      Memo
        Steve Green's report : @@ZesIR-Avg Fruit growth (2025).xlsx
      Memo
        Steve Green's report : @@ZesIR-Avg Fruit growth (2025).xlsx
      Memo
        Steve Green's report : @@ZesIR-Avg Fruit growth (2025).xlsx
    Simulation TPHW2018
      Weather: FileName=Te Puke.met
      Clock: Start=2016-01-01; End=2019-12-30
      Summary
      SoilArbitrator Soil Arbitrator
      Zone Block: Area=1; Slope=0; AspectAngle=0; Altitude=50
        Report: same as HW-BudbreakTP2020Control.Block.Report
        Report Stages
          VariableNames:
            [KiwiFruit].Phenology.MaxBBP
            [KiwiFruit].Phenology.FloweringDOY
        Plant KiwiFruit
        Fertiliser
        SurfaceOrganicMatter: InitialResidueName=wheat_stubble; InitialResidueType=wheat; InitialResidueMass=500; InitialStandingFraction=0; InitialCPR=0; InitialCNR=100
        Irrigation
        MicroClimate: a_interception=0; b_interception=1; c_interception=0; d_interception=0; SoilHeatFluxFraction=0.4; MinimumHeightDiffForNewLayer=0; NightInterceptionFraction=0.5; ReferenceHeight=2
        Manager ReportOnEvents: same as HW-BudbreakTP2020Control.Block.ReportOnEvents
        Manager Reset on date: same as Experiment.sensibility test.Block.Reset on date
        Soil: same as HWBBSpray2020HiCaneDriftstop243.Block.Soil
        Manager AutomaticIrrigation: same as Experiment.sensibility test.Block.AutomaticIrrigation
        Manager FactorLabels: same as Experiment.sensibility test.Block.FactorLabels
        Manager AutomaticFertiliser: same as Experiment.sensibility test.Block.AutomaticFertiliser
        Manager WaterStatus: same as Experiment.sensibility test.Block.WaterStatus
        Manager SowDateCv
          InitialRootDepth = 5
          CropToSow = Heyward_TP
          SowingDate = 05/25/2016 00:00:00
          script: same as in HWBBSpray2020HiCaneDriftstop243.Block.SowDateCv
        AgriChemical
        Operations
        BiomassRemovalEvents OnPrune: same as HWBBSpray2020HiCaneDriftstop243.Block.OnPrune
      Memo
        Relationship between canopy density and fruit quality of kiwifruit

        Abstract: mean leaf area index (LAI) values ranging from 3.0 to 5.5 m2 (Hayward)
      Memo
        Relationship between canopy density and fruit quality of kiwifruit

        Abstract: mean leaf area index (LAI) values ranging from 3.0 to 5.5 m2 (Hayward)
      Memo
        Annette Richardson's thesis: Fig 3.10.A

        Carbon acquisition of single shoots on daily basis (~photosynthesis?)
      Memo
        Steve Green's report : @@ZesIR-Avg Fruit growth (2025).xlsx
      Memo
        Steve Green's report : @@ZesIR-Avg Fruit growth (2025).xlsx
      Memo
        Steve Green's report : @@ZesIR-Avg Fruit growth (2025).xlsx
    Simulation TPHW2019
      Weather: FileName=Te Puke.met
      Clock: Start=2017-01-01; End=2020-12-30
      Summary
      SoilArbitrator Soil Arbitrator
      Zone Block: Area=1; Slope=0; AspectAngle=0; Altitude=50
        Report: same as HW-BudbreakTP2020Control.Block.Report
        Report Stages
          VariableNames:
            [KiwiFruit].Phenology.MaxBBP
            [KiwiFruit].Phenology.FloweringDOY
        Plant KiwiFruit
        Fertiliser
        SurfaceOrganicMatter: InitialResidueName=wheat_stubble; InitialResidueType=wheat; InitialResidueMass=500; InitialStandingFraction=0; InitialCPR=0; InitialCNR=100
        Irrigation
        MicroClimate: a_interception=0; b_interception=1; c_interception=0; d_interception=0; SoilHeatFluxFraction=0.4; MinimumHeightDiffForNewLayer=0; NightInterceptionFraction=0.5; ReferenceHeight=2
        Manager ReportOnEvents: same as HW-BudbreakTP2020Control.Block.ReportOnEvents
        Manager Reset on date: same as Experiment.sensibility test.Block.Reset on date
        Soil: same as HWBBSpray2020HiCaneDriftstop243.Block.Soil
        Manager AutomaticIrrigation: same as Experiment.sensibility test.Block.AutomaticIrrigation
        Manager FactorLabels: same as Experiment.sensibility test.Block.FactorLabels
        Manager AutomaticFertiliser: same as Experiment.sensibility test.Block.AutomaticFertiliser
        Manager WaterStatus: same as Experiment.sensibility test.Block.WaterStatus
        Manager SowDateCv
          InitialRootDepth = 5
          CropToSow = Heyward_TP
          SowingDate = 05/25/2017 00:00:00
          script: same as in HWBBSpray2020HiCaneDriftstop243.Block.SowDateCv
        AgriChemical
        Operations
        BiomassRemovalEvents OnPrune: same as HWBBSpray2020HiCaneDriftstop243.Block.OnPrune
      Memo
        Relationship between canopy density and fruit quality of kiwifruit

        Abstract: mean leaf area index (LAI) values ranging from 3.0 to 5.5 m2 (Hayward)
      Memo
        Relationship between canopy density and fruit quality of kiwifruit

        Abstract: mean leaf area index (LAI) values ranging from 3.0 to 5.5 m2 (Hayward)
      Memo
        Annette Richardson's thesis: Fig 3.10.A

        Carbon acquisition of single shoots on daily basis (~photosynthesis?)
      Memo
        Steve Green's report : @@ZesIR-Avg Fruit growth (2025).xlsx
      Memo
        Steve Green's report : @@ZesIR-Avg Fruit growth (2025).xlsx
      Memo
        Steve Green's report : @@ZesIR-Avg Fruit growth (2025).xlsx
    Simulation TPHW2020
      Weather: FileName=Te Puke.met
      Clock: Start=2018-01-01; End=2021-12-30
      Summary
      SoilArbitrator Soil Arbitrator
      Zone Block: Area=1; Slope=0; AspectAngle=0; Altitude=50
        Report: same as HW-BudbreakTP2020Control.Block.Report
        Report Stages
          VariableNames:
            [KiwiFruit].Phenology.MaxBBP
            [KiwiFruit].Phenology.FloweringDOY
        Plant KiwiFruit
        Fertiliser
        SurfaceOrganicMatter: InitialResidueName=wheat_stubble; InitialResidueType=wheat; InitialResidueMass=500; InitialStandingFraction=0; InitialCPR=0; InitialCNR=100
        Irrigation
        MicroClimate: a_interception=0; b_interception=1; c_interception=0; d_interception=0; SoilHeatFluxFraction=0.4; MinimumHeightDiffForNewLayer=0; NightInterceptionFraction=0.5; ReferenceHeight=2
        Manager ReportOnEvents: same as HW-BudbreakTP2020Control.Block.ReportOnEvents
        Manager Reset on date: same as Experiment.sensibility test.Block.Reset on date
        Soil: same as HWBBSpray2020HiCaneDriftstop243.Block.Soil
        Manager AutomaticIrrigation: same as Experiment.sensibility test.Block.AutomaticIrrigation
        Manager FactorLabels: same as Experiment.sensibility test.Block.FactorLabels
        Manager AutomaticFertiliser: same as Experiment.sensibility test.Block.AutomaticFertiliser
        Manager WaterStatus: same as Experiment.sensibility test.Block.WaterStatus
        Manager SowDateCv
          InitialRootDepth = 5
          CropToSow = Heyward_TP
          SowingDate = 05/25/2018 00:00:00
          script: same as in HWBBSpray2020HiCaneDriftstop243.Block.SowDateCv
        AgriChemical
        Operations
        BiomassRemovalEvents OnPrune: same as HWBBSpray2020HiCaneDriftstop243.Block.OnPrune
      Memo
        Relationship between canopy density and fruit quality of kiwifruit

        Abstract: mean leaf area index (LAI) values ranging from 3.0 to 5.5 m2 (Hayward)
      Memo
        Relationship between canopy density and fruit quality of kiwifruit

        Abstract: mean leaf area index (LAI) values ranging from 3.0 to 5.5 m2 (Hayward)
      Memo
        Annette Richardson's thesis: Fig 3.10.A

        Carbon acquisition of single shoots on daily basis (~photosynthesis?)
      Memo
        Steve Green's report : @@ZesIR-Avg Fruit growth (2025).xlsx
      Memo
        Steve Green's report : @@ZesIR-Avg Fruit growth (2025).xlsx
      Memo
        Steve Green's report : @@ZesIR-Avg Fruit growth (2025).xlsx
    Simulation TPHW2021
      Weather: FileName=Te Puke.met
      Clock: Start=2019-01-01; End=2022-12-30
      Summary
      SoilArbitrator Soil Arbitrator
      Zone Block: Area=1; Slope=0; AspectAngle=0; Altitude=50
        Report: same as HW-BudbreakTP2020Control.Block.Report
        Report Stages
          VariableNames:
            [KiwiFruit].Phenology.MaxBBP
            [KiwiFruit].Phenology.FloweringDOY
        Plant KiwiFruit
        Fertiliser
        SurfaceOrganicMatter: InitialResidueName=wheat_stubble; InitialResidueType=wheat; InitialResidueMass=500; InitialStandingFraction=0; InitialCPR=0; InitialCNR=100
        Irrigation
        MicroClimate: a_interception=0; b_interception=1; c_interception=0; d_interception=0; SoilHeatFluxFraction=0.4; MinimumHeightDiffForNewLayer=0; NightInterceptionFraction=0.5; ReferenceHeight=2
        Manager ReportOnEvents: same as HW-BudbreakTP2020Control.Block.ReportOnEvents
        Manager Reset on date: same as Experiment.sensibility test.Block.Reset on date
        Soil: same as HWBBSpray2020HiCaneDriftstop243.Block.Soil
        Manager AutomaticIrrigation: same as Experiment.sensibility test.Block.AutomaticIrrigation
        Manager FactorLabels: same as Experiment.sensibility test.Block.FactorLabels
        Manager AutomaticFertiliser: same as Experiment.sensibility test.Block.AutomaticFertiliser
        Manager WaterStatus: same as Experiment.sensibility test.Block.WaterStatus
        Manager SowDateCv
          InitialRootDepth = 5
          CropToSow = Heyward_TP
          SowingDate = 05/25/2019 00:00:00
          script: same as in HWBBSpray2020HiCaneDriftstop243.Block.SowDateCv
        AgriChemical
        Operations
        BiomassRemovalEvents OnPrune: same as HWBBSpray2020HiCaneDriftstop243.Block.OnPrune
      Memo
        Relationship between canopy density and fruit quality of kiwifruit

        Abstract: mean leaf area index (LAI) values ranging from 3.0 to 5.5 m2 (Hayward)
      Memo
        Relationship between canopy density and fruit quality of kiwifruit

        Abstract: mean leaf area index (LAI) values ranging from 3.0 to 5.5 m2 (Hayward)
      Memo
        Annette Richardson's thesis: Fig 3.10.A

        Carbon acquisition of single shoots on daily basis (~photosynthesis?)
      Memo
        Steve Green's report : @@ZesIR-Avg Fruit growth (2025).xlsx
      Memo
        Steve Green's report : @@ZesIR-Avg Fruit growth (2025).xlsx
      Memo
        Steve Green's report : @@ZesIR-Avg Fruit growth (2025).xlsx
    Simulation TPHW2022
      Weather: FileName=Te Puke.met
      Clock: Start=2020-01-01; End=2023-12-30
      Summary
      SoilArbitrator Soil Arbitrator
      Zone Block: Area=1; Slope=0; AspectAngle=0; Altitude=50
        Report: same as HW-BudbreakTP2020Control.Block.Report
        Report Stages
          VariableNames:
            [KiwiFruit].Phenology.MaxBBP
            [KiwiFruit].Phenology.FloweringDOY
        Plant KiwiFruit
        Fertiliser
        SurfaceOrganicMatter: InitialResidueName=wheat_stubble; InitialResidueType=wheat; InitialResidueMass=500; InitialStandingFraction=0; InitialCPR=0; InitialCNR=100
        Irrigation
        MicroClimate: a_interception=0; b_interception=1; c_interception=0; d_interception=0; SoilHeatFluxFraction=0.4; MinimumHeightDiffForNewLayer=0; NightInterceptionFraction=0.5; ReferenceHeight=2
        Manager ReportOnEvents: same as HW-BudbreakTP2020Control.Block.ReportOnEvents
        Manager Reset on date: same as Experiment.sensibility test.Block.Reset on date
        Soil: same as HWBBSpray2020HiCaneDriftstop243.Block.Soil
        Manager AutomaticIrrigation: same as Experiment.sensibility test.Block.AutomaticIrrigation
        Manager FactorLabels: same as Experiment.sensibility test.Block.FactorLabels
        Manager AutomaticFertiliser: same as Experiment.sensibility test.Block.AutomaticFertiliser
        Manager WaterStatus: same as Experiment.sensibility test.Block.WaterStatus
        Manager SowDateCv
          InitialRootDepth = 5
          CropToSow = Heyward_TP
          SowingDate = 05/25/2020 00:00:00
          script: same as in HWBBSpray2020HiCaneDriftstop243.Block.SowDateCv
        AgriChemical
        Operations
        BiomassRemovalEvents OnPrune: same as HWBBSpray2020HiCaneDriftstop243.Block.OnPrune
      Memo
        Relationship between canopy density and fruit quality of kiwifruit

        Abstract: mean leaf area index (LAI) values ranging from 3.0 to 5.5 m2 (Hayward)
      Memo
        Relationship between canopy density and fruit quality of kiwifruit

        Abstract: mean leaf area index (LAI) values ranging from 3.0 to 5.5 m2 (Hayward)
      Memo
        Annette Richardson's thesis: Fig 3.10.A

        Carbon acquisition of single shoots on daily basis (~photosynthesis?)
      Memo
        Steve Green's report : @@ZesIR-Avg Fruit growth (2025).xlsx
      Memo
        Steve Green's report : @@ZesIR-Avg Fruit growth (2025).xlsx
      Memo
        Steve Green's report : @@ZesIR-Avg Fruit growth (2025).xlsx
    Simulation TPHW2023
      Weather: FileName=Te Puke.met
      Clock: Start=2021-01-01; End=2024-12-30
      Summary
      SoilArbitrator Soil Arbitrator
      Zone Block: Area=1; Slope=0; AspectAngle=0; Altitude=50
        Report: same as HW-BudbreakTP2020Control.Block.Report
        Report Stages
          VariableNames:
            [KiwiFruit].Phenology.MaxBBP
            [KiwiFruit].Phenology.FloweringDOY
        Plant KiwiFruit
        Fertiliser
        SurfaceOrganicMatter: InitialResidueName=wheat_stubble; InitialResidueType=wheat; InitialResidueMass=500; InitialStandingFraction=0; InitialCPR=0; InitialCNR=100
        Irrigation
        MicroClimate: a_interception=0; b_interception=1; c_interception=0; d_interception=0; SoilHeatFluxFraction=0.4; MinimumHeightDiffForNewLayer=0; NightInterceptionFraction=0.5; ReferenceHeight=2
        Manager ReportOnEvents: same as HW-BudbreakTP2020Control.Block.ReportOnEvents
        Manager Reset on date: same as Experiment.sensibility test.Block.Reset on date
        Soil: same as HWBBSpray2020HiCaneDriftstop243.Block.Soil
        Manager AutomaticIrrigation: same as Experiment.sensibility test.Block.AutomaticIrrigation
        Manager FactorLabels: same as Experiment.sensibility test.Block.FactorLabels
        Manager AutomaticFertiliser: same as Experiment.sensibility test.Block.AutomaticFertiliser
        Manager WaterStatus: same as Experiment.sensibility test.Block.WaterStatus
        Manager SowDateCv
          InitialRootDepth = 5
          CropToSow = Heyward_TP
          SowingDate = 05/25/2021 00:00:00
          script: same as in HWBBSpray2020HiCaneDriftstop243.Block.SowDateCv
        AgriChemical
        Operations
        BiomassRemovalEvents OnPrune: same as HWBBSpray2020HiCaneDriftstop243.Block.OnPrune
      Memo
        Relationship between canopy density and fruit quality of kiwifruit

        Abstract: mean leaf area index (LAI) values ranging from 3.0 to 5.5 m2 (Hayward)
      Memo
        Relationship between canopy density and fruit quality of kiwifruit

        Abstract: mean leaf area index (LAI) values ranging from 3.0 to 5.5 m2 (Hayward)
      Memo
        Annette Richardson's thesis: Fig 3.10.A

        Carbon acquisition of single shoots on daily basis (~photosynthesis?)
      Memo
        Steve Green's report : @@ZesIR-Avg Fruit growth (2025).xlsx
      Memo
        Steve Green's report : @@ZesIR-Avg Fruit growth (2025).xlsx
      Memo
        Steve Green's report : @@ZesIR-Avg Fruit growth (2025).xlsx
    Simulation TPHW2024
      Weather: FileName=Te Puke.met
      Clock: Start=2022-01-01; End=2024-12-30
      Summary
      SoilArbitrator Soil Arbitrator
      Zone Block: Area=1; Slope=0; AspectAngle=0; Altitude=50
        Report: same as HW-BudbreakTP2020Control.Block.Report
        Report Stages
          VariableNames:
            [KiwiFruit].Phenology.MaxBBP
            [KiwiFruit].Phenology.FloweringDOY
        Plant KiwiFruit
        Fertiliser
        SurfaceOrganicMatter: InitialResidueName=wheat_stubble; InitialResidueType=wheat; InitialResidueMass=500; InitialStandingFraction=0; InitialCPR=0; InitialCNR=100
        Irrigation
        MicroClimate: a_interception=0; b_interception=1; c_interception=0; d_interception=0; SoilHeatFluxFraction=0.4; MinimumHeightDiffForNewLayer=0; NightInterceptionFraction=0.5; ReferenceHeight=2
        Manager ReportOnEvents: same as HW-BudbreakTP2020Control.Block.ReportOnEvents
        Manager Reset on date: same as Experiment.sensibility test.Block.Reset on date
        Soil: same as HWBBSpray2020HiCaneDriftstop243.Block.Soil
        Manager AutomaticIrrigation: same as Experiment.sensibility test.Block.AutomaticIrrigation
        Manager FactorLabels: same as Experiment.sensibility test.Block.FactorLabels
        Manager AutomaticFertiliser: same as Experiment.sensibility test.Block.AutomaticFertiliser
        Manager WaterStatus: same as Experiment.sensibility test.Block.WaterStatus
        Manager SowDateCv
          InitialRootDepth = 5
          CropToSow = Heyward_TP
          SowingDate = 05/25/2022 00:00:00
          script: same as in HWBBSpray2020HiCaneDriftstop243.Block.SowDateCv
        AgriChemical
        Operations
        BiomassRemovalEvents OnPrune: same as HWBBSpray2020HiCaneDriftstop243.Block.OnPrune
      Memo
        Relationship between canopy density and fruit quality of kiwifruit

        Abstract: mean leaf area index (LAI) values ranging from 3.0 to 5.5 m2 (Hayward)
      Memo
        Relationship between canopy density and fruit quality of kiwifruit

        Abstract: mean leaf area index (LAI) values ranging from 3.0 to 5.5 m2 (Hayward)
      Memo
        Annette Richardson's thesis: Fig 3.10.A

        Carbon acquisition of single shoots on daily basis (~photosynthesis?)
      Memo
        Steve Green's report : @@ZesIR-Avg Fruit growth (2025).xlsx
      Memo
        Steve Green's report : @@ZesIR-Avg Fruit growth (2025).xlsx
      Memo
        Steve Green's report : @@ZesIR-Avg Fruit growth (2025).xlsx
    Simulation KKHW2020
      Weather: FileName=Kerikeri.met
      Clock: Start=2018-01-01; End=2021-12-30
      Summary
      SoilArbitrator Soil Arbitrator
      Zone Block: same as FruitingAllByYear.TPHW2020.Block
      Memo
        Relationship between canopy density and fruit quality of kiwifruit

        Abstract: mean leaf area index (LAI) values ranging from 3.0 to 5.5 m2 (Hayward)
      Memo
        Relationship between canopy density and fruit quality of kiwifruit

        Abstract: mean leaf area index (LAI) values ranging from 3.0 to 5.5 m2 (Hayward)
      Memo
        Annette Richardson's thesis: Fig 3.10.A

        Carbon acquisition of single shoots on daily basis (~photosynthesis?)
      Memo
        Steve Green's report : @@ZesIR-Avg Fruit growth (2025).xlsx
      Memo
        Steve Green's report : @@ZesIR-Avg Fruit growth (2025).xlsx
      Memo
        Steve Green's report : @@ZesIR-Avg Fruit growth (2025).xlsx
    Simulation KKHW2021
      Weather: FileName=Kerikeri.met
      Clock: Start=2019-01-01; End=2022-12-30
      Summary
      SoilArbitrator Soil Arbitrator
      Zone Block: same as FruitingAllByYear.TPHW2021.Block
      Memo
        Relationship between canopy density and fruit quality of kiwifruit

        Abstract: mean leaf area index (LAI) values ranging from 3.0 to 5.5 m2 (Hayward)
      Memo
        Relationship between canopy density and fruit quality of kiwifruit

        Abstract: mean leaf area index (LAI) values ranging from 3.0 to 5.5 m2 (Hayward)
      Memo
        Annette Richardson's thesis: Fig 3.10.A

        Carbon acquisition of single shoots on daily basis (~photosynthesis?)
      Memo
        Steve Green's report : @@ZesIR-Avg Fruit growth (2025).xlsx
      Memo
        Steve Green's report : @@ZesIR-Avg Fruit growth (2025).xlsx
      Memo
        Steve Green's report : @@ZesIR-Avg Fruit growth (2025).xlsx
    Simulation KKHW2022
      Weather: FileName=Kerikeri.met
      Clock: Start=2020-01-01; End=2023-12-30
      Summary
      SoilArbitrator Soil Arbitrator
      Zone Block: same as FruitingAllByYear.TPHW2022.Block
      Memo
        Relationship between canopy density and fruit quality of kiwifruit

        Abstract: mean leaf area index (LAI) values ranging from 3.0 to 5.5 m2 (Hayward)
      Memo
        Relationship between canopy density and fruit quality of kiwifruit

        Abstract: mean leaf area index (LAI) values ranging from 3.0 to 5.5 m2 (Hayward)
      Memo
        Annette Richardson's thesis: Fig 3.10.A

        Carbon acquisition of single shoots on daily basis (~photosynthesis?)
      Memo
        Steve Green's report : @@ZesIR-Avg Fruit growth (2025).xlsx
      Memo
        Steve Green's report : @@ZesIR-Avg Fruit growth (2025).xlsx
      Memo
        Steve Green's report : @@ZesIR-Avg Fruit growth (2025).xlsx
    Simulation KKHW2023
      Weather: FileName=Kerikeri.met
      Clock: Start=2021-01-01; End=2024-12-30
      Summary
      SoilArbitrator Soil Arbitrator
      Zone Block: same as FruitingAllByYear.TPHW2023.Block
      Memo
        Relationship between canopy density and fruit quality of kiwifruit

        Abstract: mean leaf area index (LAI) values ranging from 3.0 to 5.5 m2 (Hayward)
      Memo
        Relationship between canopy density and fruit quality of kiwifruit

        Abstract: mean leaf area index (LAI) values ranging from 3.0 to 5.5 m2 (Hayward)
      Memo
        Annette Richardson's thesis: Fig 3.10.A

        Carbon acquisition of single shoots on daily basis (~photosynthesis?)
      Memo
        Steve Green's report : @@ZesIR-Avg Fruit growth (2025).xlsx
      Memo
        Steve Green's report : @@ZesIR-Avg Fruit growth (2025).xlsx
      Memo
        Steve Green's report : @@ZesIR-Avg Fruit growth (2025).xlsx
    Simulation KKHW2024
      Weather: FileName=Kerikeri.met
      Clock: Start=2022-01-01; End=2024-12-30
      Summary
      SoilArbitrator Soil Arbitrator
      Zone Block: same as FruitingAllByYear.TPHW2024.Block
      Memo
        Relationship between canopy density and fruit quality of kiwifruit

        Abstract: mean leaf area index (LAI) values ranging from 3.0 to 5.5 m2 (Hayward)
      Memo
        Relationship between canopy density and fruit quality of kiwifruit

        Abstract: mean leaf area index (LAI) values ranging from 3.0 to 5.5 m2 (Hayward)
      Memo
        Annette Richardson's thesis: Fig 3.10.A

        Carbon acquisition of single shoots on daily basis (~photosynthesis?)
      Memo
        Steve Green's report : @@ZesIR-Avg Fruit growth (2025).xlsx
      Memo
        Steve Green's report : @@ZesIR-Avg Fruit growth (2025).xlsx
      Memo
        Steve Green's report : @@ZesIR-Avg Fruit growth (2025).xlsx
  Folder FruitingAllByYearMedian
    Simulation TPHW2016Median: same as FruitingAllByYear.TPHW2016
    Simulation TPHW2017Median: same as FruitingAllByYear.TPHW2017
    Simulation TPHW2018Median: same as FruitingAllByYear.TPHW2018
    Simulation TPHW2019Median: same as FruitingAllByYear.TPHW2019
    Simulation TPHW2020Median: same as FruitingAllByYear.TPHW2020
    Simulation TPHW2021Median: same as FruitingAllByYear.TPHW2021
    Simulation TPHW2022Median: same as FruitingAllByYear.TPHW2022
    Simulation TPHW2023Median: same as FruitingAllByYear.TPHW2023
    Simulation TPHW2024Median: same as FruitingAllByYear.TPHW2024
    Simulation KKHW2020Median: same as FruitingAllByYear.KKHW2020
    Simulation KKHW2021Median: same as FruitingAllByYear.KKHW2021
    Simulation KKHW2022Median: same as FruitingAllByYear.KKHW2022
    Simulation KKHW2023Median: same as FruitingAllByYear.KKHW2023
    Simulation KKHW2024Median: same as FruitingAllByYear.KKHW2024
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